// SBML level 2 version 1

model YeastWTmodel2()
  // Proctor2006_telomere
  // To the extent possible under law, all copyright and related or neighbouring rights to this encoded model have been dedicated to the public domain worldwide. Please refer to CC0 Public Domain Dedication for more information.
  // In summary, you are entitled to use this encoded model in absolutely any manner you deem suitable, verbatim, or with modification, alone or embedded it in a larger context, redistribute it, commercially or not, in a restricted way or not.
  // To cite BioModels Database, please use: Li C, Donizelli M, Rodriguez N, Dharuri H, Endler L, Chelliah V, Li L, He E, Henry A, Stefan MI, Snoep JL, Hucka M, Le Novère N, Laibe C (2010) BioModels Database: An enhanced, curated and annotated resource for published quantitative kinetic models. BMC Syst Biol., 4:92.
  // biomodels.db:MODEL8679489165
  // biomodels.db:BIOMD0000000087
  // isDescribedBy pubmed:17015293
  // hasTaxon taxonomy:4932
  // isPartOf kegg.pathway:sce04111
  // isVersionOf GO:0000075

  // Compartments:
  compartment cellMembrane = 1;  // isVersionOf GO:0016020
  compartment nucleus in cellMembrane = 1;  // isVersionOf GO:0005634

  // Species:
  substanceOnly species Ctelo in nucleus = 64;  // hasPart GO:0000782; isVersionOf GO:0000781
  substanceOnly species Utelo in nucleus = 0;  // isVersionOf GO:0000781
  substanceOnly species Cdc13 in nucleus = 300;  // uniprot:P32797
  substanceOnly species Rad17Utelo in nucleus = 0;  // hasPart uniprot:P48581 GO:0000781
  substanceOnly species Rad17 in nucleus = 70;  // uniprot:P48581
  substanceOnly species Rad24 in nucleus = 70;  // uniprot:P32641
  substanceOnly species RPA in nucleus = 4000;  // isVersionOf pirsf:PIRSF002091
  substanceOnly species Mec1 in nucleus = 4000;  // uniprot:P38111
  substanceOnly species ssDNA in nucleus = 0;  // isVersionOf CHEBI:09160 kegg.compound:C00271
  substanceOnly species RPAssDNA in nucleus = 0;  // hasPart kegg.compound:C00271 pirsf:PIRSF002091 CHEBI:9160
  substanceOnly species RPAssDNA1 in nucleus = 0;  // hasPart kegg.compound:C00271 pirsf:PIRSF002091 CHEBI:9160
  substanceOnly species RPAssDNA2 in nucleus = 0;  // hasPart kegg.compound:C00271 pirsf:PIRSF002091 CHEBI:9160
  substanceOnly species Mec1RPAssDNA in nucleus = 0;  // hasPart uniprot:P38111 kegg.compound:C00271 pirsf:PIRSF002091 CHEBI:9160
  substanceOnly species ExoXI in nucleus = 70;  // isHomologTo uniprot:P0AEK1
  substanceOnly species ExoXA in nucleus = 0;  // isHomologTo uniprot:P0AEK1
  substanceOnly species Exo1I in nucleus = 670;  // uniprot:P39875
  substanceOnly species Exo1A in nucleus = 0;  // isVersionOf uniprot:P39875
  substanceOnly species Rad9I in nucleus = 20;  // isVersionOf uniprot:P14737
  substanceOnly species Rad9A in nucleus = 0;  // uniprot:P14737
  substanceOnly species Rad53I in nucleus = 6900;  // uniprot:P22216
  substanceOnly species Rad53A in nucleus = 0;  // isVersionOf uniprot:P22216
  substanceOnly species Chk1I in nucleus = 60;  // uniprot:P38147
  substanceOnly species Chk1A in nucleus = 0;  // uniprot:P38147
  substanceOnly species Dun1I in nucleus = 3000;  // uniprot:P39009
  substanceOnly species Dun1A in nucleus = 0;  // uniprot:P39009
  substanceOnly species ATP in nucleus = 10000;  // CHEBI:15422
  substanceOnly species ADP in nucleus = 1000;  // CHEBI:16761
  substanceOnly species Rad9Kin in nucleus = 0;
  substanceOnly species recovery in nucleus = 0;
  substanceOnly species G1 in nucleus = 1;  // isVersionOf GO:0051318
  substanceOnly species S in nucleus = 0;  // isVersionOf GO:0000084
  substanceOnly species G2 in nucleus = 0;  // isVersionOf GO:0051319
  substanceOnly species M in nucleus = 0;  // isVersionOf GO:0000279
  substanceOnly species G1cyclin in nucleus = 0;  // hasVersion uniprot:P20437
  substanceOnly species Scyclin in nucleus = 0;  // hasVersion uniprot:P30283
  substanceOnly species G2cyclin in nucleus = 0;  // hasVersion uniprot:P24868
  substanceOnly species Mcyclin in nucleus = 0;  // isHomologTo uniprot:O14332
  substanceOnly species G1CdkI in nucleus = 1;  // isVersionOf GO:0019908
  substanceOnly species G1CdkA in nucleus = 0;  // isVersionOf GO:0019908
  substanceOnly species SCdkI in nucleus = 1;  // isVersionOf GO:0019908
  substanceOnly species SCdkA in nucleus = 0;  // isVersionOf GO:0019908
  substanceOnly species G2CdkI in nucleus = 1;  // isVersionOf GO:0019908
  substanceOnly species G2CdkA in nucleus = 0;  // isVersionOf GO:0019908
  substanceOnly species MCdkI in nucleus = 1;  // isVersionOf GO:0019908
  substanceOnly species MCdkA in nucleus = 0;  // isVersionOf GO:0019908
  substanceOnly species G1Soff in nucleus = 1;  // isVersionOf GO:0031575
  substanceOnly species G1Son in nucleus = 0;  // isVersionOf GO:0000082
  substanceOnly species SG2off in nucleus = 1;  // isVersionOf GO:0000115
  substanceOnly species SG2on in nucleus = 0;  // isVersionOf GO:0000115
  substanceOnly species G2Moff in nucleus = 1;  // isVersionOf GO:0031572
  substanceOnly species G2Mon in nucleus = 0;  // isVersionOf GO:0000086
  substanceOnly species MG1off in nucleus = 1;
  substanceOnly species MG1on in nucleus = 0;  // isVersionOf GO:0000087
  substanceOnly species $sink in nucleus = 0;
  substanceOnly species budscar in cellMembrane = 0;  // isVersionOf GO:0005621

  // Parameters:
  kalive = 1;

  // Reactions:
  Capping: Cdc13 + Utelo => Ctelo; k1*Cdc13*Utelo*kalive;  // isVersionOf GO:0016233
    k1 = 0.0005;
  Uncapping: Ctelo => Cdc13 + Utelo; k2*Ctelo*kalive;  // isVersionOf GO:0043241
    k2 = 0.000385;
  Rad17binding: Utelo + Rad17 + Rad24 + ATP => Rad17Utelo + Rad24 + ADP; k3*Utelo*Rad17*Rad24*ATP*kalive/(5000 + ATP);  // isVersionOf GO:0005515 GO:0016887
    k3 = 1.5e-8;
  ExoXactivation: ExoXI + Rad17Utelo => ExoXA + Rad17Utelo; k4*ExoXI*Rad17Utelo*kalive;  // isVersionOf GO:0032075
    k4 = 0.01;
  ExoXactivity: ExoXA + Rad17Utelo => ExoXA + Rad17Utelo + ssDNA; k5*ExoXA*Rad17Utelo*kalive;  // isVersionOf GO:0008856; isVersionOf ec-code:3.1.11.1
    k5 = 0.0003;
  Exo1activation: Exo1I => Exo1A; k6a*Exo1I*kalive; Exo1activation is "Rad24independentExo1Activation";  // isVersionOf GO:0032075
    k6a = 5e-5;
  Exo1Rad24dependentActivation: Exo1I + Rad24 => Exo1A + Rad24; k6b*Exo1I*Rad24*kalive; Exo1Rad24dependentActivation is "Rad24dependentExo1Activation";  // isVersionOf GO:0032075
    k6b = 0.0005;
  Exo1Rad17independentActivity: Utelo + Exo1A => Utelo + Exo1A + ssDNA; k7a*Utelo*Exo1A*kalive; Exo1Rad17independentActivity is "Rad17independentExo1Activity";  // isVersionOf GO:0008856
    k7a = 3e-5;
  Exo1Rad17dependentActivity: Rad17Utelo + Exo1A => Rad17Utelo + Exo1A + ssDNA; k7b*Rad17Utelo*Exo1A*kalive; Exo1Rad17dependentActivity is "Rad17dependentExo1Activity";  // isVersionOf GO:0008856
    k7b = 3e-5;
  RPAbinding1: ssDNA + RPA => RPAssDNA1; k8a*RPA*ssDNA*kalive; RPAbinding1 is "RPAbinding-stage1";  // isVersionOf GO:0003676 GO:0005515
    k8a = 0.001;
  RPAbinding2: ssDNA + RPAssDNA1 => RPAssDNA2; k8b*RPAssDNA1*ssDNA*kalive; RPAbinding2 is "RPAbinding-stage2";  // isVersionOf GO:0003676 GO:0032403
    k8b = 100;
  RPAbinding: ssDNA + RPAssDNA2 => RPAssDNA; k8c*RPAssDNA2*ssDNA*kalive; RPAbinding is "RPAbinding-completed";  // isVersionOf GO:0003676 GO:0032403
    k8c = 100;
  Mec1binding: RPAssDNA + Mec1 => Mec1RPAssDNA; k8d*RPAssDNA*Mec1*kalive;  // isVersionOf GO:0005515; isVersionOf GO:0006461
    k8d = 0.004;
  Rad9activation: Rad9Kin + Rad9I => Rad9Kin + Rad9A; k9*Rad9Kin*Rad9I*kalive;  // isVersionOf GO:0030295
    k9 = 100;
  ExoXinhibition: ExoXA + Rad9A => ExoXI + Rad9A; ExoXA*k10a*Rad9A*kalive;  // isVersionOf GO:0004860
    k10a = 0.05;
  ExoXinhibition2: ExoXA + Rad9I => ExoXI + Rad9I; ExoXA*k10b*Rad9I*kalive;  // isVersionOf GO:0004860
    k10b = 0.05;
  Rad53activation: Rad53I + Rad9A => Rad53A + Rad9A; k11*Rad53I*Rad9A*kalive;  // isVersionOf GO:0030295
    k11 = 1e-5;
  Chk1Activation: Chk1I + Rad9A => Chk1A + Rad9A; Chk1I*k12*Rad9A*kalive;  // isVersionOf GO:0030295
    k12 = 0.00017;
  Exo1inhibition: Exo1A + Rad53A => Exo1I + Rad53A; Exo1A*k13*Rad53A*kalive;  // isVersionOf GO:0004860
    k13 = 1;
  Dun1activation: Dun1I + Rad53A => Dun1A + Rad53A; Dun1I*k14*Rad53A*kalive;  // isVersionOf GO:0030295
    k14 = 3.3e-6;
  Chk1cellArrest: Chk1A + G2Mon => Chk1A + G2Moff; Chk1A*G2Mon*k15*kalive;  // isVersionOf GO:0007050
    k15 = 0.2;
  Dun1cellArrest: Dun1A + G2Mon => Dun1A + G2Moff; Dun1A*G2Mon*k16*kalive;  // isVersionOf GO:0007050
    k16 = 0.1;
  SDNArepair1: Mec1RPAssDNA + S => Mec1 + RPA + S + 3 ssDNA; k17a*Mec1RPAssDNA*S*kalive;  // isVersionOf GO:0043241; isVersionOf GO:0006281
    k17a = 0.05;
  G2DNArepair1: G2 + G2Moff + Mec1RPAssDNA => G2 + G2Moff + Mec1 + RPA + 3 ssDNA; G2*G2Moff*k17b*Mec1RPAssDNA*kalive;  // isVersionOf GO:0043241; isVersionOf GO:0006281
    k17b = 0.05;
  SDNArepair2: S + ssDNA => S; k18a*S*ssDNA*kalive;  // isVersionOf GO:0006308
    k18a = 0.001;
  G2DNArepair2: G2 + G2Moff + ssDNA => G2 + G2Moff; G2*G2Moff*k18b*ssDNA*kalive;  // isVersionOf GO:0006308
    k18b = 1e-5;
  Recovery: Cdc13 + Rad17Utelo + recovery => Ctelo + Rad17 + recovery; Cdc13*k19*Rad17Utelo*recovery*kalive;  // isVersionOf GO:0005515 GO:0016233
    k19 = 0.001;
  G1cyclinSynthesis: G1 => G1cyclin + G1; G1*G1cyclinSynthesis_kc1*kalive;  // isVersionOf GO:0006412
    G1cyclinSynthesis_kc1 = 0.16;
  ScyclinSynthesis: S => Scyclin + S; ScyclinSynthesis_kc1*S*kalive;  // isVersionOf GO:0006412
    ScyclinSynthesis_kc1 = 0.16;
  G2cyclinSynthesis: G2 => G2cyclin + G2; G2*G2cyclinSynthesis_kc1*kalive;  // isVersionOf GO:0006412
    G2cyclinSynthesis_kc1 = 0.16;
  McyclinSynthesis: M => Mcyclin + M; McyclinSynthesis_kc1*M*kalive;  // isVersionOf GO:0006412
    McyclinSynthesis_kc1 = 0.16;
  G1toSGenesOn: G1Soff + G1 + G1CdkA => G1Son + G1 + G1CdkA; G1*G1CdkA*G1Soff*G1toSGenesOn_kc2*kalive;  // isVersionOf GO:0007089
    G1toSGenesOn_kc2 = 0.01;
  StoG2GenesOn: SG2off + S + SCdkA => SG2on + S + SCdkA; StoG2GenesOn_kc2*S*SCdkA*SG2off*kalive;
    StoG2GenesOn_kc2 = 0.01;
  G2toMGenesOn: G2Moff + G2 + G2CdkA => G2Mon + G2 + G2CdkA; G2*G2CdkA*G2Moff*G2toMGenesOn_kc2*kalive;  // isVersionOf GO:0031572
    G2toMGenesOn_kc2 = 0.01;
  MtoG1GenesOn: MG1off + M + MCdkA => MG1on + M + MCdkA; MtoG1GenesOn_kc2*M*MCdkA*MG1off*kalive;
    MtoG1GenesOn_kc2 = 0.01;
  G1cyclinDegradation: G1cyclin => $sink; G1cyclin*G1cyclinDegradation_kc3*kalive;  // isVersionOf GO:0008054
    G1cyclinDegradation_kc3 = 0.0012;
  ScyclinDegradation: Scyclin => $sink; ScyclinDegradation_kc3*Scyclin*kalive;  // isVersionOf GO:0008054
    ScyclinDegradation_kc3 = 0.0012;
  G2cyclinDegradation: G2cyclin => $sink; G2cyclin*G2cyclinDegradation_kc3*kalive;  // isVersionOf GO:0008054
    G2cyclinDegradation_kc3 = 0.0012;
  McyclinDegradation: Mcyclin => $sink; McyclinDegradation_kc3*Mcyclin*kalive;  // isVersionOf GO:0008054
    McyclinDegradation_kc3 = 0.0012;
  G1toSProgession: G1 + G1CdkA + G1Son => G1CdkI + G1Soff + S; G1*G1CdkA*G1Son*G1toSProgession_kc4*kalive;  // isVersionOf GO:0000082
    G1toSProgession_kc4 = 0.01;
  StoG2Progession: S + SCdkA + SG2on => G2 + SCdkI + SG2off; StoG2Progession_kc4*S*SCdkA*SG2on*kalive;
    StoG2Progession_kc4 = 0.01;
  G2toMProgession: G2 + G2CdkA + G2Mon => G2CdkI + G2Moff + M; G2*G2CdkA*G2Mon*G2toMProgession_kc4*kalive;  // isVersionOf GO:0000086
    G2toMProgession_kc4 = 0.01;
  MtoG1Progession: M + MCdkA + MG1on => budscar + G1 + MCdkI + MG1off; MtoG1Progession_kc4*M*MCdkA*MG1on*kalive;  // isVersionOf GO:0000216
    MtoG1Progession_kc4 = 0.01;

  // Events:
  Rad9KinaseActivation: at (Mec1RPAssDNA >= 800): Rad9Kin = 1;  // isPartOf GO:0000077
  ssDNAremoval: at (Mec1RPAssDNA + RPAssDNA + ssDNA <= 1): recovery = 1, Mec1RPAssDNA = 0, RPAssDNA = 0, ssDNA = 0;
  G2MRecoveryCompleted: at ((G2 == 1) && (Rad17Utelo == 0)): G2Mon = 1, G2Moff = 0, recovery = 0, Rad9A = 0, Rad9I = 20, Chk1A = 0, Chk1I = 60, Dun1A = 0, Dun1I = 3000, Exo1A = 0, Exo1I = 670, ExoXA = 0, ExoXI = 70, Rad53I = 6900, Rad53A = 0;
  SphaseRecoveryCompleted: at (Rad17Utelo == 0): recovery = 0;
  G1CdkActivation: at (G1cyclin > 100): G1CdkA = 1, G1CdkI = 0;
  SCdkActivation: at (Scyclin > 100): SCdkA = 1, SCdkI = 0;
  G2CdkActivation: at (G2cyclin > 100): G2CdkA = 1, G2CdkI = 0;
  MCdkActivation: at (Mcyclin > 100): MCdkA = 1, MCdkI = 0;
  CellDeath: at (Mec1RPAssDNA + RPAssDNA + ssDNA >= 2000): kalive = 0;  // isVersionOf GO:0008219

  // Unit definitions:
  unit substance = item;
end
