// SBML level 2 version 1

model Chan2004_TCell_receptor_activation()
  // The model reproduces Fig 3a of the paper. Please note that the authors mention that they used a value of 2 for n, n being the power in the positive feedback function for kinase autocatalysis, however the model here has n=1.95 because this results in a simulation that is identical to Fig 3a. The model was successfully tested on MathSBML.
  // To the extent possible under law, all copyright and related or neighbouring rights to this encoded model have been dedicated to the public domain worldwide. Please refer to CC0 Public Domain Dedication for more information.
  // In summary, you are entitled to use this encoded model in absolutely any manner you deem suitable, verbatim, or with modification, alone or embedded it in a larger context, redistribute it, commercially or not, in a restricted way or not.
  // To cite BioModels Database, please use: Li C, Donizelli M, Rodriguez N, Dharuri H, Endler L, Chelliah V, Li L, He E, Henry A, Stefan MI, Snoep JL, Hucka M, Le Novère N, Laibe C (2010) BioModels Database: An enhanced, curated and annotated resource for published quantitative kinetic models. BMC Syst Biol., 4:92.
  // biomodels.db:MODEL2514697386
  // biomodels.db:BIOMD0000000120
  // isDescribedBy pubmed:15255048
  // hasTaxon taxonomy:131567
  // isVersionOf kegg.pathway:hsa04660 GO:0050856
  // hasProperty mamo:MAMO_0000046

  // Compartments:
  compartment compartment = 1; compartment is "cell";  // GO:0005623

  // Species:
  substanceOnly species lck_inactive in compartment = 0; lck_inactive is "Inactive lck";  // isVersionOf uniprot:P06239
  substanceOnly species lck_active in compartment = 0; lck_active is "Active lck";  // isVersionOf uniprot:P06239
  substanceOnly species phosphatase_inactive in compartment = 0.6; phosphatase_inactive is "Inactive phosphatase";  // isVersionOf uniprot:P29350
  substanceOnly species phosphatase_active in compartment = 0.6; phosphatase_active is "Active phosphatase";  // isVersionOf uniprot:P29350
  substanceOnly species lck_total in compartment; lck_total is "Total kinase";  // isVersionOf uniprot:P06239

  // Parameters:
  n1 = 1 sec_inv_item_inv;
  k1 = 0.01 sec_inv;
  m1 = 1;
  d0 = 0.15 sec_inv;
  d1 = 0.15 sec_inv;
  k2 = 0.01 sec_inv;
  m2 = 1 sec_inv_item_inv;
  n2 = 0.02 sec_inv;
  d2 = 0 sec_inv;
  n = 1.95 dimensionless;
  r_l = 0 items_per_time;

  // Assignment rules:
  lck_total := lck_inactive + lck_active;

  // Reactions:
  v1: => lck_inactive; r_l; v1 is "Kinase recruitment to T-cell receptor";  // isVersionOf GO:0042605
  Kinase_inactivation: lck_active => lck_inactive; n1*lck_active*phosphatase_active;  // modifiers: phosphatase_active; ec-code:3.1.3.48 GO:0004725
  Basal_kinase_activation: lck_inactive => lck_active; k1*lck_inactive;  // isVersionOf GO:0032147
  Catalytic_kinase_activation: lck_inactive => lck_active; m1*lck_active^n*lck_inactive;  // isVersionOf GO:0032147
  Inactive_kinase_diffusion: lck_inactive => ; d0*lck_inactive;  // isVersionOf GO:0050868
  Active_kinase_diffusion: lck_active => ; d1*lck_active;  // isVersionOf GO:0050868
  Basal_phosphatase_activation: phosphatase_inactive => phosphatase_active; k2*phosphatase_inactive;  // isVersionOf GO:0032516
  Catalyzed_phosphatase_activation: phosphatase_inactive => phosphatase_active; m2*lck_active*phosphatase_inactive;  // modifiers: lck_active; isVersionOf GO:0032516
  Phosphatase_inactivation: phosphatase_active => phosphatase_inactive; n2*phosphatase_active;  // isVersionOf GO:0032515
  Active_phosphatase_diffusion: phosphatase_active => ; d2*phosphatase_active;

  // Events:
  Setting_r_l_to_1: at (time >= 10): r_l = 1; Setting_r_l_to_1 is "Setting r(l) to 1";
  Resetting_r_l_to_0: at (time >= 24): r_l = 0; Resetting_r_l_to_0 is "Resetting r(l) to 0";

  // Unit definitions:
  unit substance = item;
  unit items_per_time = item / second;
  unit sec_inv = 1 / second;
  unit sec_inv_item_inv = 1 / (item * second); sec_inv_item_inv is "per_sec_per_item";
end
