// SBML level 2 version 1

model model_0000001()
  // Bertram2006_Endothelin
  // The model is according to the paper Endothelin Action on Pituitary Lactotrophs: One Receptor, Many GTP-Binding Proteins Figure 1 has been simulated by MathSBML. The figure for the [Ca2+]i and [Ca2+]ER have been normalized in the paper.Original model comes from http://www.math.fsu.edu/~bertram/software/pituitary
  // The units for parameters and species are varied from one to another, so I omit the unit definition here . Conductances in pS; currents in fA; Ca concentrations in uM; time in ms
  // To the extent possible under law, all copyright and related or neighbouring rights to this encoded model have been dedicated to the public domain worldwide. Please refer to CC0 Public Domain Dedication for more information.
  // In summary, you are entitled to use this encoded model in absolutely any manner you deem suitable, verbatim, or with modification, alone or embedded it in a larger context, redistribute it, commercially or not, in a restricted way or not.
  // To cite BioModels Database, please use: Li C, Donizelli M, Rodriguez N, Dharuri H, Endler L, Chelliah V, Li L, He E, Henry A, Stefan MI, Snoep JL, Hucka M, Le Novère N, Laibe C (2010) BioModels Database: An enhanced, curated and annotated resource for published quantitative kinetic models. BMC Syst Biol., 4:92.
  // biomodels.db:MODEL6509019628
  // biomodels.db:BIOMD0000000128
  // isDescribedBy pubmed:16434725
  // hasTaxon taxonomy:10114
  // isVersionOf GO:0007188 GO:0004962 GO:0001664
  // hasProperty mamo:MAMO_0000046

  // Compartments:
  compartment cell = 1;  // isVersionOf GO:0005623

  // Species:
  species c in cell = 0.3; c is "cytosolic calcium concentration";  // CHEBI:29108 kegg.compound:C00076
  species cer in cell = 260; cer is "ER calcium concentration";  // CHEBI:29108 kegg.compound:C00076
  species cAMP in cell = 1;  // CHEBI:17489 kegg.compound:C00575

  // Parameters:
  vh = -20;
  sh = 70;
  tauh = 20;
  kserca = 0.4;
  sigmav = 10;
  kc = 0.15;
  vn = -16;
  vk = -75;
  taun = 20;
  gk = 3500;
  sn = 5;
  vca = 25;
  gca = 2000;
  vm = -20;
  sm = 12;
  lambda = 1.25;
  cm = 5300;
  f = 0.01;
  fer = 0.01;
  alpha = 4.5e-6;
  perl = 0.0005;
  dact = 0.35;
  dip3 = 0.5;
  dinh = 0.4;
  girk = 1000;
  IP3 = 0;
  ki = 0.5;
  taudir = 20000;
  // Set cAMPlow=0.2 for nM ET, and cAMPlow=0.5 for pM ET
  cAMPlow = 0.2;
  ETswitch = 0;
  h = 0;
  inh = 1; inh is "variable for direct inhibition of secretion";
  V = -60; V is "voltage";
  n = 0; n is "delayed rectifier activation";

  // Assignment rules:
  minf := 1/(1 + exp((vm - V)/sm));
  ninf := 1/(1 + exp((vn - V)/sn));
  hinf := 1/(1 + exp((vh - V)/sh));
  ica := gca*minf*(V - vca);
  igirk := girk*h*(V - vk);
  ik := gk*n*(V - vk);
  ainf := 1/(1 + dact/c);
  hinfer := 1/(1 + c/dinh);
  jerp := kserca*c;
  binf := IP3/(IP3 + dip3);
  o := ainf^3*binf^3*hinfer^3;
  jmemtot := -(alpha*ica + kc*c);
  jerleak := perl*(cer - c);
  jerip3 := o*(cer - c);
  jertot := jerleak + jerip3 - jerp;
  perl_inf := inh*cAMP*c^4/(ki^4 + c^4);

  // Rate rules:
  h' = (hinf - h)/tauh;
  inh' = ETswitch*((0.2 - inh)/taudir);
  V' = (-ica - ik - igirk)/cm;
  n' = lambda*(ninf - n)/taun;

  // Reactions:
  reaction_0000001: => c; cell*f*(jertot + jmemtot);  // isVersionOf GO:0051480
  reaction_0000002: => cer; -fer*sigmav*jertot*cell;  // isVersionOf GO:0032469
  reaction_000003: => cAMP; cell*ETswitch*((cAMPlow - cAMP)/taudir);  // isVersionOf GO:0004016 GO:0030817

  // Events:
  // At time 1 minute a nanomolar concentration of endothelin is added.
  ET_1_switch: at (time > 60000): IP3 = 0.3, girk = 3000, ETswitch = 1; ET_1_switch is "ET-1 switch";  // isVersionOf GO:0004962

  // Unit definitions:
  unit ms = 1e-3 second; ms is "millisecond";
end
