// SBML level 2 version 4

model Izhikevich2004_SpikingNeurons_integrator()
  // This a model from the article:
  // Which model to use for cortical spiking neurons?
  // Izhikevich, EM Neural Networks, IEEE Transactions on2004:15(5):1063-1070 15484883,
  // Abstract:
  // We discuss the biological plausibility and computational efficiency of some of the most useful models of spiking and bursting neurons. We compare their applicability to large-scale simulations of cortical neural networks.
  // The model is according to the paperWhich Model to Use for Cortical Spiking Neurons? Figure1(L) integrator has been reproduced by MathSBML. The ODE and the parameters values are taken from the a paper Simple Model of Spiking NeuronsThe original format of the models are encoded in the MATLAB format existed in the ModelDB with Accession number 39948
  // Figure1 are the simulation results of the same model with different choices of parameters and different stimulus function or events. a=0.02; b=-0.1; c=-55; d=6; V=-60; u=b*V;
  // This model originates from BioModels Database: A Database of Annotated Published Models. It is copyright (c) 2005-2010 The BioModels Team.
  // For more information see the terms of use.
  // To cite BioModels Database, please use Le Novère N., Bornstein B., Broicher A., Courtot M., Donizelli M., Dharuri H., Li L., Sauro H., Schilstra M., Shapiro B., Snoep J.L., Hucka M. (2006) BioModels Database: A Free, Centralized Database of Curated, Published, Quantitative Kinetic Models of Biochemical and Cellular Systems Nucleic Acids Res., 34: D689-D691.
  // biomodels.db:MODEL5572213333
  // biomodels.db:BIOMD0000000130
  // isDescribedBy pubmed:15484883
  // isVersionOf GO:0019228
  // hasTaxon taxonomy:40674
  // hasProperty mamo:MAMO_0000046

  // Compartments:
  compartment cell = 1;  // isVersionOf GO:0005623

  // Parameters:
  a = 0.02;
  b = -0.1;
  c = -55;
  d = 6;
  Vthresh = 30;
  i = 0;
  v = -60;
  u = 6;

  // Rate rules:
  // For this model, the ODE for "v" is different from the others. v'=0.04*v^2+4.1*v+108-u+i
  v' = 0.04*v^2 + 4.1*v + 108 - u + i;
  u' = a*(b*v - u);

  // Events:
  event_0000001: at (v > Vthresh): v = c, u = u + d;
  event_0000002: at (((time > 9) && (time < 11)) || ((time > 14) && (time < 16))): i = 9;
  event_0000003: at (((time > 70) && (time < 72)) || ((time > 80) && (time < 82))): i = 9;
  event_0000004: at (((time >= 11) && (time <= 14)) || ((time >= 14) && (time < 16))): i = 0;
  event_0000005: at (((time >= 16) && (time <= 70)) || ((time >= 72) && (time <= 80)) || (time >= 82)): i = 0;
end
