// SBML level 2 version 1

model Hoffmann2002_WT_IkBNFkB_Signaling()
  // This model corresponds to the IkB-NFkB signaling in wild type cells and reproduces the dynamics of the species as depicted in Figure 2 F of the paper. The authors mention that the simulation is carried out in three phases, where the steady state values of the species in one phase are fed to the succeding phase. This model captures the simulation dynamics of two phases and makes use of the event section to introduce the stimulus and thereby transition to the next phase. Accordingly, a few terms have been introduced that make this transition possible, this in no way compromises the original model. Also, the simulation plots are not an exact reproduction of the figures in the paper, they do however match the simulation results that the authors shared with us. Model was successfully tested on MathSBML.
  // To the extent possible under law, all copyright and related or neighbouring rights to this encoded model have been dedicated to the public domain worldwide. Please refer to CC0 Public Domain Dedication for more information.
  // In summary, you are entitled to use this encoded model in absolutely any manner you deem suitable, verbatim, or with modification, alone or embedded it in a larger context, redistribute it, commercially or not, in a restricted way or not.
  // To cite BioModels Database, please use: Li C, Donizelli M, Rodriguez N, Dharuri H, Endler L, Chelliah V, Li L, He E, Henry A, Stefan MI, Snoep JL, Hucka M, Le Novère N, Laibe C (2010) BioModels Database: An enhanced, curated and annotated resource for published quantitative kinetic models. BMC Syst Biol., 4:92.
  // biomodels.db:MODEL7158174175
  // biomodels.db:BIOMD0000000140
  // isDescribedBy pubmed:12424381
  // hasTaxon taxonomy:10090
  // isPartOf kegg.pathway:mmu04660 GO:0007249
  // hasProperty mamo:MAMO_0000046

  // Compartments:
  compartment cytoplasm = 1;  // GO:0005737
  compartment nucleus in cytoplasm = 1;  // GO:0005634

  // Species:
  species IkBalpha in cytoplasm = 0.1;  // isVersionOf uniprot:Q9Z1E3
  species NFkB in cytoplasm = 0.1;  // isVersionOf uniprot:P25799
  species IkBalpha_NFkB in cytoplasm = 0;  // hasPart uniprot:P25799 uniprot:Q9Z1E3
  species IkBbeta in cytoplasm = 0;  // isVersionOf uniprot:Q60778
  species IkBbeta_NFkB in cytoplasm = 0;  // hasPart uniprot:Q60778 uniprot:P25799
  species IkBeps in cytoplasm = 0;  // isVersionOf uniprot:O54910
  species IkBeps_NFkB in cytoplasm = 0;  // hasPart uniprot:O54910 uniprot:P25799
  species IKK_IkBalpha in cytoplasm = 0;  // hasPart uniprot:O88351 uniprot:O88522 uniprot:Q60680 uniprot:Q9Z1E3
  species IKK_IkBalpha_NFkB in cytoplasm = 0;  // hasPart uniprot:O88351 uniprot:O88522 uniprot:Q60680 uniprot:Q9Z1E3
  species IKK in cytoplasm = 0;  // hasPart uniprot:O88351 uniprot:O88522 uniprot:Q60680
  species IKK_IkBbeta in cytoplasm = 0;  // isVersionOf uniprot:O88351 uniprot:O88522 uniprot:Q60680 uniprot:Q60778
  species IKK_IkBbeta_NFkB in cytoplasm = 0;  // hasPart uniprot:Q60680 uniprot:O88351 uniprot:O88522 uniprot:Q60778
  species IKK_IkBeps in cytoplasm = 0;  // hasPart uniprot:O88351 uniprot:O88522 uniprot:Q60680 uniprot:O54910
  species IKK_IkBeps_NFkB in cytoplasm = 0;  // hasPart uniprot:O54910 uniprot:O88351 uniprot:O88522 uniprot:Q60680
  species NFkB_nuc in nucleus = 0.001;  // isVersionOf uniprot:P25799
  species IkBalpha_nuc in nucleus = 0;  // isVersionOf uniprot:Q9Z1E3
  species IkBalpha_nuc_NFkB_nuc in nucleus = 0;  // hasPart uniprot:Q9Z1E3 uniprot:P25799
  species IkBbeta_nuc in nucleus = 0;  // isVersionOf uniprot:Q60778
  species IkBbeta_nuc_NFkB_nuc in nucleus = 0;  // hasPart uniprot:Q60778 uniprot:P25799
  species IkBeps_nuc in nucleus = 0;  // isVersionOf uniprot:O54910
  species IkBalpha_transcript in nucleus = 0;
  species IkBbeta_transcript in nucleus = 0;
  species IkBeps_transcript in nucleus = 0;
  species IkBeps_nuc_NFkB_nuc in nucleus = 0;  // hasPart uniprot:O54910 uniprot:P25799

  // Parameters:
  a4 = 30;
  d4 = 0.03;
  a5 = 30;
  d5 = 0.03;
  a6 = 30;
  d6 = 0.03;
  r4 = 1.224;
  r5 = 0.45;
  r6 = 0.66;
  deg4 = 0.00135;
  k1 = 5.4;
  k01 = 0.0048;
  tr2a = 9.25e-5;
  tr2 = 0.99;
  tr3 = 0.0168;
  tr2b = 1.068e-5;
  tr2e = 7.62e-6;
  a1 = 1.35;
  d1 = 0.075;
  tr1 = 0.2448;
  deg1 = 0.00678;
  tp1 = 0.018;
  tp2 = 0.012;
  a2 = 0.36;
  d2 = 0.105;
  a3 = 0.54;
  d3 = 0.105;
  a7 = 11.1;
  k2 = 0.828;
  a8 = 2.88;
  k2_beta = 0.624;
  a9 = 4.2;
  k2_eps = 0.624;
  r1 = 0.2442;
  r2 = 0.09;
  r3 = 0.132;
  k02 = 0.0072;
  trigger_value = 0;
  fr = 1;
  fr_after_trigger = 0.5;
  flag_for_after_trigger = 0.5;

  // Assignment rules:
  Total_IkBbeta := IkBbeta + IkBbeta_NFkB + IKK_IkBbeta + IKK_IkBbeta_NFkB;
  Total_IkBeps := IkBeps + IkBeps_NFkB + IKK_IkBeps + IKK_IkBeps_NFkB;
  Total_IkBalpha := IkBalpha + IkBalpha_NFkB + IKK_IkBalpha + IKK_IkBalpha_NFkB;
  Total_NFkBn := IkBbeta_nuc_NFkB_nuc + NFkB_nuc;

  // Rate rules:
  fr_after_trigger' = trigger_value*(-0.5/(1 + (time - 2000))^2);

  // Reactions:
  v1: NFkB + IkBalpha -> IkBalpha_NFkB; cytoplasm*(a4*IkBalpha*NFkB - d4*IkBalpha_NFkB); v1 is "NFkB-IkBalpha complex formation";  // isVersionOf GO:0005515
  v2: NFkB + IkBbeta -> IkBbeta_NFkB; cytoplasm*(a5*IkBbeta*NFkB - d5*IkBbeta_NFkB); v2 is "NFkB-IkBbeta complex formation";  // isVersionOf GO:0005515
  v3: NFkB + IkBeps -> IkBeps_NFkB; cytoplasm*(a6*IkBeps*NFkB - d6*IkBeps_NFkB); v3 is "NFkB-IkBeps complex formation";  // isVersionOf GO:0005515
  v4: NFkB + IKK_IkBalpha -> IKK_IkBalpha_NFkB; cytoplasm*(a4*IKK_IkBalpha*NFkB - d4*IKK_IkBalpha_NFkB); v4 is "NFkB-binary IKK IkBalpha complex formation";  // isVersionOf GO:0043623 GO:0005515
  v5: IKK_IkBalpha_NFkB => NFkB + IKK; cytoplasm*r4*IKK_IkBalpha_NFkB; v5 is "IkBalpha degradation";  // isVersionOf GO:0044257; hasPart ec-code:2.7.11.10
  v6: NFkB + IKK_IkBbeta -> IKK_IkBbeta_NFkB; cytoplasm*(a5*IKK_IkBbeta*NFkB - d5*IKK_IkBbeta_NFkB); v6 is "NFkB binary IKK IkBbeta complex formation";  // isVersionOf GO:0043623 GO:0005515
  v7: IKK_IkBbeta_NFkB => NFkB + IKK; cytoplasm*r5*IKK_IkBbeta_NFkB; v7 is "IkBbeta degradation";  // isVersionOf GO:0044257; hasPart ec-code:2.7.11.10
  v8: NFkB + IKK_IkBeps -> IKK_IkBeps_NFkB; cytoplasm*(a6*IKK_IkBeps*NFkB - d6*IKK_IkBeps_NFkB); v8 is "NFkB binary IKK IkBeps complex formation";  // isVersionOf GO:0043623 GO:0005515
  v9: IKK_IkBeps_NFkB => NFkB + IKK; cytoplasm*r6*IKK_IkBeps_NFkB; v9 is "IkBeps degradation";  // isVersionOf GO:0044257; hasPart ec-code:2.7.11.10
  v10: IkBalpha_NFkB => NFkB; cytoplasm*deg4*IkBalpha_NFkB; v10 is "IkBalpha degradation";  // isVersionOf GO:0044257
  v11: IkBbeta_NFkB => NFkB; cytoplasm*deg4*IkBbeta_NFkB; v11 is "IkBbeta degradation";  // isVersionOf GO:0044257
  v12: IkBeps_NFkB => NFkB; cytoplasm*deg4*IkBeps_NFkB; v12 is "IkBeps degradation";  // isVersionOf GO:0044257
  NFkB_translocation: NFkB -> NFkB_nuc; cytoplasm*k1*NFkB - nucleus*k01*NFkB_nuc;  // isVersionOf GO:0000060
  v14: NFkB_nuc + IkBalpha_nuc -> IkBalpha_nuc_NFkB_nuc; nucleus*(a4*IkBalpha_nuc*NFkB_nuc - d4*IkBalpha_nuc_NFkB_nuc); v14 is "NFkB-IkBalpha complex formation";  // isVersionOf GO:0043623 GO:0005515
  v15: NFkB_nuc + IkBbeta_nuc -> IkBbeta_nuc_NFkB_nuc; nucleus*(a5*IkBbeta_nuc*NFkB_nuc - d5*IkBbeta_nuc_NFkB_nuc); v15 is "NFkB-IkBbeta complex formation";  // isVersionOf GO:0043623 GO:0005515
  v16: NFkB_nuc + IkBeps_nuc -> IkBeps_nuc_NFkB_nuc; nucleus*(a6*IkBeps_nuc*NFkB_nuc - d6*IkBeps_nuc_NFkB_nuc); v16 is "NFkB-IkBeps complex formation";  // isVersionOf GO:0043623 GO:0005515
  IkBalpha_transcription: => IkBalpha_transcript; nucleus*tr2a;  // isVersionOf GO:0006351
  IkBalpha_inducible_transcription: => IkBalpha_transcript; nucleus*tr2*NFkB_nuc^2;  // modifiers: NFkB_nuc; isVersionOf GO:0006351
  IkBalpha_transcript_degradation: IkBalpha_transcript => ; nucleus*tr3*IkBalpha_transcript;  // isVersionOf GO:0006402
  IkBbeta_transcription: => IkBbeta_transcript; nucleus*tr2b;  // isVersionOf GO:0006351
  IkBbeta_transcript_degradation: IkBbeta_transcript => ; nucleus*tr3*IkBbeta_transcript;  // isVersionOf GO:0006402
  IkBeps_transcription: => IkBeps_transcript; nucleus*tr2e;  // isVersionOf GO:0006351
  IkBeps_transcript_degradation: IkBeps_transcript => ; nucleus*tr3*IkBeps_transcript;  // isVersionOf GO:0006402
  IKK_IkBalpha_complex_formation: IKK + IkBalpha -> IKK_IkBalpha; cytoplasm*(a1*IkBalpha*IKK - d1*IKK_IkBalpha); IKK_IkBalpha_complex_formation is "IKK-IkBalpha complex formation";  // isVersionOf GO:0043623 GO:0005515
  IkBalpha_synthesis: => IkBalpha; nucleus*tr1*IkBalpha_transcript;  // modifiers: IkBalpha_transcript; isVersionOf GO:0006412
  v26: IkBalpha => ; cytoplasm*deg1*IkBalpha; v26 is "IkBalpha degradation";  // isVersionOf GO:0044257
  IkBalpha_translocation: IkBalpha -> IkBalpha_nuc; cytoplasm*tp1*IkBalpha - nucleus*tp2*IkBalpha_nuc;  // isVersionOf GO:0000060
  IKK_IkBbeta_complex_formation: IKK + IkBbeta -> IKK_IkBbeta; cytoplasm*(a2*IkBbeta*IKK - d2*IKK_IkBbeta); IKK_IkBbeta_complex_formation is "IKK-IkBbeta complex formation";  // isVersionOf GO:0043623 GO:0005515
  IkBbeta_synthesis: => IkBbeta; nucleus*tr1*IkBbeta_transcript;  // modifiers: IkBbeta_transcript; isVersionOf GO:0006412
  v30: IkBbeta => ; cytoplasm*deg1*IkBbeta; v30 is "IkBbeta degradation";  // isVersionOf GO:0044257
  IkBbeta_translocation: IkBbeta -> IkBbeta_nuc; cytoplasm*0.5*tp1*IkBbeta - nucleus*0.5*tp2*IkBbeta_nuc;  // isVersionOf GO:0000060
  IKK_IkBeps_complex_formation: IKK + IkBeps -> IKK_IkBeps; cytoplasm*(a3*IkBeps*IKK - d3*IKK_IkBeps); IKK_IkBeps_complex_formation is "IKK-IkBeps complex formation";  // isVersionOf GO:0043623 GO:0005515
  IkBeps_synthesis: => IkBeps; nucleus*tr1*IkBeps_transcript;  // modifiers: IkBeps_transcript; isVersionOf GO:0006412
  v34: IkBeps => ; cytoplasm*deg1*IkBeps; v34 is "IkBeps degradation";  // isVersionOf GO:0044257
  IkBeps_translocation: IkBeps -> IkBeps_nuc; cytoplasm*0.5*tp1*IkBeps - nucleus*0.5*tp2*IkBeps_nuc;  // isVersionOf GO:0000060
  v36: IKK + IkBalpha_NFkB -> IKK_IkBalpha_NFkB; cytoplasm*(a7*IKK*IkBalpha_NFkB - d1*IKK_IkBalpha_NFkB); v36 is "IKK-binary IkBalpha NFkB complex formation";  // isVersionOf GO:0005515 GO:0043623
  IkBalpha_NFkB_translocation: IkBalpha_nuc_NFkB_nuc => IkBalpha_NFkB; nucleus*k2*IkBalpha_nuc_NFkB_nuc;  // isVersionOf GO:0006611
  v38: IKK + IkBbeta_NFkB -> IKK_IkBbeta_NFkB; cytoplasm*(a8*IKK*IkBbeta_NFkB - d2*IKK_IkBbeta_NFkB); v38 is "IKK binary IkBbeta NFkB complex formation";  // isVersionOf GO:0005515 GO:0043623
  // The sum of "flag_for_after_signal" and "fr_after_trigger" insures that the value of the fraction of "IkBbeta_nuc_ NFkB_nuc" capable of nuclear export is equal to one before the signal is introduced and then follows the rate rule for "fr_after_trigger" after the signal is introduced.
  IkBbeta_NFkB_translocation: IkBbeta_nuc_NFkB_nuc => IkBbeta_NFkB; nucleus*k2_IkBbeta_nuc_NFkB_nuc*(fr_after_trigger + flag_for_after_trigger)*IkBbeta_nuc_NFkB_nuc;  // isVersionOf GO:0006611
    k2_IkBbeta_nuc_NFkB_nuc = 0.0069;
  v40: IKK + IkBeps_NFkB -> IKK_IkBeps_NFkB; cytoplasm*(a9*IKK*IkBeps_NFkB - d3*IKK_IkBeps_NFkB); v40 is "IKK binary IkBeps NFkB complex formation";  // isVersionOf GO:0005515 GO:0043623
  IkBeps_NFkB_translocation: IkBeps_nuc_NFkB_nuc => IkBeps_NFkB; nucleus*0.5*k2_eps*IkBeps_nuc_NFkB_nuc;  // isVersionOf GO:0006611
  v42: IKK_IkBalpha => IKK; cytoplasm*r1*IKK_IkBalpha; v42 is "IkBalpha degradation";  // hasPart ec-code:2.7.11.10; isVersionOf GO:0044257
  v43: IKK_IkBbeta => IKK; cytoplasm*r2*IKK_IkBbeta; v43 is "IkBbeta degradation";  // hasPart ec-code:2.7.11.10; isVersionOf GO:0044257
  v44: IKK_IkBeps => IKK; cytoplasm*r3*IKK_IkBeps; v44 is "IkBeps degradation";  // hasPart ec-code:2.7.11.10; isVersionOf GO:0044257
  IKK_consumption: IKK => ; cytoplasm*k02*IKK;

  // Events:
  // The events section is used to set the IKK signal, the system is allowed to equilibrate for 2000 minutes and IKK is increased to 0.1 uM. trigger value is a parameter that is zero until equilibration and then is set to 1, this in turn is used in the rate rule section for "fr_after_trigger". The latter term corresponds to fr in the paper.
  event_0000001: at ((time >= 2000) && (trigger_value == 0)): IKK = 0.1, trigger_value = 1, flag_for_after_trigger = 0;

  // Unit definitions:
  unit substance = 1e-6 mole; substance is "micro mole";
  unit time = 60 second; time is "minutes";
end
