// SBML level 2 version 3

function GK(A1, A2, A3, A4)
  2*A4*A1/(A2 - A1 + A3*A2 + A4*A1 + sqrt((A2 - A1 + A3*A2 + A4*A1)^2 - 4*(A2 - A1)*A4*A1));
end
GK is "Goldbeter Koshland Function";

model Tyson2001_Cell_Cycle_Regulation()
  // This model describes the budding yeast cell cycle model used in fig 8 a in
  // Regulation of the eukaryotic cell cycle: molecular antagonism, hysteresis, and irreversible transitions.
  // Tyson JJ and Novak B., J Theor Biol 2001 May;210(2):249-63.
  // It consitsts of the equations (2)-(8), with mu=0.005 min -1 . It was taken from Cell Cycle DB ( file ) and only slightly altered.
  // To the extent possible under law, all copyright and related or neighbouring rights to this encoded model have been dedicated to the public domain worldwide. Please refer to CC0 Public Domain Dedication for more information.
  // In summary, you are entitled to use this encoded model in absolutely any manner you deem suitable, verbatim, or with modification, alone or embedded it in a larger context, redistribute it, commercially or not, in a restricted way or not.
  // To cite BioModels Database, please use: Li C, Donizelli M, Rodriguez N, Dharuri H, Endler L, Chelliah V, Li L, He E, Henry A, Stefan MI, Snoep JL, Hucka M, Le Novère N, Laibe C (2010) BioModels Database: An enhanced, curated and annotated resource for published quantitative kinetic models. BMC Syst Biol., 4:92.
  // biomodels.db:MODEL3897475441
  // biomodels.db:BIOMD0000000195
  // isDescribedBy pubmed:11371178
  // isVersionOf kegg.pathway:map04111 reactome:REACT_152.2 GO:0051726
  // hasTaxon taxonomy:4932
  // hasProperty mamo:MAMO_0000046

  // Compartments:
  compartment cell = 1;  // GO:0005623

  // Species:
  substanceOnly species CycBt in cell = 0.001;  // hasPart uniprot:P00546 interpro:IPR015454; isVersionOf GO:0000307; hasVersion uniprot:P00546 uniprot:P32943 uniprot:P30283 uniprot:P24871
  substanceOnly species CycB in cell;  // hasPart uniprot:P00546 interpro:IPR015454
  substanceOnly species Cdc20a in cell = 0.001;  // isVersionOf uniprot:P26309
  substanceOnly species Trimer in cell;  // hasPart uniprot:P00546 uniprot:P38634 interpro:IPR015454
  substanceOnly species Cdh1 in cell = 0.001;  // isVersionOf uniprot:P53197
  substanceOnly species m in cell = 0.5;  // isVersionOf GO:0016049
  substanceOnly species Cdc20t in cell = 0.001;  // isVersionOf uniprot:P26309
  substanceOnly species IEP in cell = 0.001;
  substanceOnly species Mad in cell;  // isVersionOf uniprot:P40957
  substanceOnly species CKIt in cell = 0.001;  // isVersionOf uniprot:P38634
  substanceOnly species SK in cell = 0.001;  // isVersionOf uniprot:P20437 uniprot:P20438; isVersionOf interpro:IPR014399

  // Parameters:
  k1 = 0.04;
  k2p = 0.04;
  k2pp = 1;
  k2ppp = 1;
  k3p = 1;
  k3pp = 10;
  J3 = 0.04;
  k4 = 35;
  k5p = 0.005;
  k5pp = 0.2;
  J5 = 0.3;
  k6 = 0.1;
  n = 4;
  k7 = 1;
  J7 = 0.001;
  k8 = 0.5;
  J8 = 0.001;
  k9 = 0.1;
  k10 = 0.02;
  mu = 0.005;
  k11 = 1;
  k12p = 0.2;
  k12pp = 50;
  mmax = 10;
  k12ppp = 100;
  Keq = 1000;
  k13 = 1;
  k14 = 1;
  k15p = 1.5;
  k15pp = 0.05;
  k16p = 1;
  k16pp = 3;
  J15 = 0.01;
  J16 = 0.01;
  k4p = 2;
  J4 = 0.04;

  // Assignment rules:
  CycB := CycBt - 2*CycBt*CKIt/(CycBt + CKIt + 1/Keq + ((CycBt + CKIt + 1/Keq)^2 - 4*CycBt*CKIt)^(1/2));
  Trimer := 2*CycBt*CKIt/(CycBt + CKIt + 1/Keq + ((CycBt + CKIt + 1/Keq)^2 - 4*CycBt*CKIt)^(1/2));
  TF := GK(k15p*m + k15pp*SK, k16p + k16pp*m*CycB, J15, J16);
  Mad := 1;

  // Reactions:
  CycBt_synthesis: => CycBt; k1;  // isVersionOf GO:0010467
  CycBdegradation: CycBt => ; k2p*CycBt; CycBdegradation is "CycBt degradation";  // isVersionOf GO:0008054
  CycBdegradationviaCdh1: CycBt => ; k2pp*Cdh1*CycBt; CycBdegradationviaCdh1 is "CycBt degradation via Cdh1";  // modifiers: Cdh1; isVersionOf reactome:REACT_6761.1 GO:0008054
  CycBtdegradationviaCdc20a: CycBt => ; k2ppp*Cdc20a*CycBt; CycBtdegradationviaCdc20a is "CycBt degradation via Cdc20a";  // modifiers: Cdc20a; isVersionOf reactome:REACT_6820.1
  Cdh1synthesis: => Cdh1; (k3p + k3pp*Cdc20a)*(1 - Cdh1)/(J3 + 1 - Cdh1); Cdh1synthesis is "Cdh1 synthesis";  // modifiers: Cdc20a; isVersionOf GO:0010467
  Cdh1degradation: Cdh1 => ; (k4p*SK*Cdh1 + k4*m*CycB*Cdh1)/(J4 + Cdh1); Cdh1degradation is "Cdh1 degradation";  // modifiers: SK, m, CycB; isVersionOf GO:0030163
  Cdc20tsynthesis: => Cdc20t; k5p + k5pp*(CycB*m/J5)^n/(1 + (CycB*m/J5)^n); Cdc20tsynthesis is "Cdc20t synthesis";  // modifiers: CycB, m; isVersionOf GO:0010467
  Cdc20t_deg: Cdc20t => ; k6*Cdc20t; Cdc20t_deg is "Cdc20t degradation";  // isVersionOf GO:0030163
  Cdc20activation: => Cdc20a; k7*IEP*(Cdc20t - Cdc20a)/(J7 + Cdc20t - Cdc20a); Cdc20activation is "Cdc20 activation";  // modifiers: Cdc20t, IEP; isVersionOf reactome:REACT_6954.1
  Cdc20ainhibition: Cdc20a => ; k8*Mad*Cdc20a/(J8 + Cdc20a); Cdc20ainhibition is "Cdc20a inhibition";  // modifiers: Mad; isVersionOf reactome:REACT_1041.2
  Cdc20adegradation: Cdc20a => ; k6*Cdc20a; Cdc20adegradation is "Cdc20a degradation";  // isVersionOf GO:0030163
  IEPsynthesis: => IEP; k9*m*CycB*(1 - IEP); IEPsynthesis is "IEP synthesis";  // modifiers: m, CycB; isVersionOf GO:0010467
  IEPdegradation: IEP => ; k10*IEP; IEPdegradation is "IEP degradation";  // isVersionOf GO:0030163
  growth: => m; mu*m*(1 - m/mmax);  // isVersionOf GO:0016049
  CKItsynthesis: => CKIt; k11; CKItsynthesis is "CKIt synthesis";  // isVersionOf GO:0010467
  CKIdegradation: CKIt => ; k12p*CKIt; CKIdegradation is "CKIt degradation";  // isVersionOf GO:0030163
  CKItphosphorilationviaSK: CKIt => ; k12pp*SK*CKIt; CKItphosphorilationviaSK is "CKIt phosphorilation via SK";  // modifiers: SK; isVersionOf reactome:REACT_9003.1
  eq_7: CKIt => ; k12ppp*m*CycB*CKIt; eq_7 is "CKIt Trimer sequestred";  // modifiers: m, CycB; isVersionOf reactome:REACT_9005.1 GO:0045736
  SKsynthesis: => SK; k13*TF; SKsynthesis is "SK synthesis";  // isVersionOf GO:0010467
  SKdegradation: SK => ; k14*SK; SKdegradation is "SK degradation";  // isVersionOf GO:0030163 GO:0008054

  // Events:
  at (CycB < 0.1): m = m/2;  // Cell division; GO:0000910

  // Unit definitions:
  unit substance = dimensionless; substance is "normalized";
  unit time = 60 second; time is "minutes";
end
