// SBML level 2 version 4

model Rehm2006_Caspase()
  // This is the standard model described in the article:
  // Systems analysis of effector caspase activation and its control by X-linked inhibitor of apoptosis protein.
  // Rehm M, Huber HJ, Dussmann H, Prehn JH. EMBO J. 2006 Sep 20;25(18):4338-49. Epub 2006 Aug 24. PMID:16932741, doi:10.1038/sj.emboj.7601295;
  // Abstract:
  // Activation of effector caspases is a final step during apoptosis. Single-cell imaging studies have demonstrated that this process may occur as a rapid, all-or-none response, triggering a complete substrate cleavage within 15 min. Based on biochemical data from HeLa cells, we have developed a computational model of apoptosome-dependent caspase activation that was sufficient to remodel the rapid kinetics of effector caspase activation observed in vivo. Sensitivity analyses predicted a critical role for caspase-3-dependent feedback signalling and the X-linked-inhibitor-of-apoptosis-protein (XIAP), but a less prominent role for the XIAP antagonist Smac. Single-cell experiments employing a caspase fluorescence resonance energy transfer substrate verified these model predictions qualitatively and quantitatively. XIAP was predicted to control this all-or-none response, with concentrations as high as 0.15 microM enabling, but concentrations >0.30 microM significantly blocking substrate cleavage. Overexpression of XIAP within these threshold concentrations produced cells showing slow effector caspase activation and submaximal substrate cleavage. Our study supports the hypothesis that high levels of XIAP control caspase activation and substrate cleavage, and may promote apoptosis resistance and sublethal caspase activation in vivo.
  // This model is slightly altered from the description in the article. Cytochrome C and SMAC release from the mitochondrion is modelled as simple first order kinetics, giving the same form as the (integrated) equations in the supplement of the article. The apoptosome formation is modelled equally - and independent of the Cytochrome C release. The speed is either limited by the Apaf1 or ProCaspase9 concentration, whichever is higher, symbolised via the parameter with the ID apolim.
  // Also, once the substrate concentration falls below 1 percent, the event Production_Breakdown is triggered, leading to a breakdown of XIAP and procaspase3 production and turning off of the enhanced/proteosomal degradation (degradation rate for reactions 38,39,40,43,44,46,48,50,51 changes from 0.0347 to 0.0058).
  // Originally created by libAntimony v1.3 (using libSBML 3.4.1)
  // This model originates from BioModels Database: A Database of Annotated Published Models (http://www.ebi.ac.uk/biomodels/). It is copyright (c) 2005-2012 The BioModels.net Team.
  // For more information see the terms of use.
  // To cite BioModels Database, please use: Li C, Donizelli M, Rodriguez N, Dharuri H, Endler L, Chelliah V, Li L, He E, Henry A, Stefan MI, Snoep JL, Hucka M, Le Novère N, Laibe C (2010) BioModels Database: An enhanced, curated and annotated resource for published quantitative kinetic models. BMC Syst Biol., 4:92.
  // biomodels.db:MODEL5073396359
  // biomodels.db:BIOMD0000000256
  // isDescribedBy pubmed:16932741
  // hasTaxon taxonomy:9606 BTO:0000567
  // isVersionOf GO:0006919 GO:0006915
  // hasProperty mamo:MAMO_0000046

  // Compartments:
  compartment cell = 1;  // GO:0005623
  compartment mito = 1; mito is "mitochondrium";  // isVersionOf GO:0005739

  // Species:
  species PC3 in cell = 0.12; PC3 is "ProCasp3";  // isVersionOf uniprot:P42574
  species XIAP in cell = 0.063;  // isVersionOf uniprot:P98170
  species Casp9_p35_p12 in cell = 0; Casp9_p35_p12 is "Casp9(p35-p12)";  // isVersionOf uniprot:P55211
  species PC9 in cell = 0.03; PC9 is "ProCasp9";  // isVersionOf uniprot:P55211
  species C3 in cell = 0;  // isVersionOf uniprot:P42574
  species C9P in cell = 0; C9P is "Casp9(p35-p10)";  // hasPart uniprot:P55211
  species XIAP_C3 in cell = 0; XIAP_C3 is "XIAP-Casp3";  // hasPart uniprot:P42574 uniprot:P98170
  species XIAP_C9 in cell = 0; XIAP_C9 is "XIAP-Casp9";  // hasPart uniprot:P98170 uniprot:P55211
  species XIAP_C9_C3 in cell = 0; XIAP_C9_C3 is "XIAP-Casp9-Casp3";  // hasPart uniprot:P42574 uniprot:P98170 uniprot:P55211
  species XIAP_p2frag in cell = 0; XIAP_p2frag is "XIAP-p2 fragment";  // isPartOf uniprot:P55211; hasPart uniprot:P98170
  species XIAP_p2frag_C3 in cell = 0; XIAP_p2frag_C3 is "XIAP-p2frag-Casp3";  // isPartOf uniprot:P55211; hasPart uniprot:P42574 uniprot:P98170
  species BIR12 in cell = 0;  // isPartOf uniprot:P98170
  species BIR12_C3 in cell = 0; BIR12_C3 is "BIR12-Casp3";  // isPartOf uniprot:P98170; hasPart uniprot:P42574
  species BIR3R in cell = 0;  // isPartOf uniprot:P98170
  species BIR3R_C9 in cell = 0; BIR3R_C9 is "BIR3R-Casp9";  // isPartOf uniprot:P98170; hasPart uniprot:P55211
  species BIR3R_p2frag in cell = 0; BIR3R_p2frag is "BIR3R-p2frag";  // isPartOf uniprot:P98170 uniprot:P55211
  species XIAP_2SMAC in cell = 0; XIAP_2SMAC is "XIAP-2*SMAC";  // hasPart uniprot:P98170
  species BIR12_SMAC in cell = 0; BIR12_SMAC is "BIR12-SMAC";  // isPartOf uniprot:P98170; hasPart uniprot:Q9NR28
  species BIR3R_SMAC in cell = 0; BIR3R_SMAC is "BIR3R-SMAC";  // isPartOf uniprot:P98170; hasPart uniprot:Q9NR28
  species SMAC in cell = 0;  // isVersionOf uniprot:Q9NR28
  species APAF1 in cell = 3.372;  // isVersionOf uniprot:O14727
  species XIAP_p2frag_2SMAC in cell = 0; XIAP_p2frag_2SMAC is "XIAP-p2frag-2*SMAC";  // isPartOf uniprot:P55211; hasPart uniprot:P98170 uniprot:Q9NR28
  species Substrate in cell = 1; Substrate is "Casp3 Substrate";  // isPartOf uniprot:P42574
  species ClvgPrds in cell = 0; ClvgPrds is "Clevage Products";
  species SMAC_mito in mito = 0.126; SMAC_mito is "SMAC in mitochondrium";  // isVersionOf uniprot:Q9NR28
  species CytC_mit in mito = 10; CytC_mit is "Cytochrome C in mitochondrium";  // isVersionOf uniprot:P08574
  species CytC_cell in cell = 0; CytC_cell is "cytosolic Cytochrome C";  // isVersionOf uniprot:P08574

  // Parameters:
  k1 = 0.000468 uM_per_min;
  k1r = 0.0039 per_min;
  k2 = 0.0007308 uM_per_min;
  k2r = 0.0116 per_min;
  k3 = 6 per_uM_per_min;
  k4 = 12 per_uM_per_min;
  k5 = 48 per_uM_per_min;
  k6 = 2.4 per_uM_per_min;
  k7 = 156 per_uM_per_min;
  k7r = 0.144 per_min;
  k8 = 156 per_uM_per_min;
  k8r = 0.144 per_min;
  k9 = 156 per_uM_per_min;
  k9r = 0.144 per_min;
  k10 = 156 per_uM_per_min;
  k10r = 0.144 per_min;
  k11 = 12 per_uM_per_min;
  k12 = 12 per_uM_per_min;
  k13 = 12 per_uM_per_min;
  k14 = 12 per_uM_per_min;
  k15 = 12 per_uM_per_min;
  k16 = 12 per_uM_per_min;
  k17 = 12 per_uM_per_min;
  k18 = 12 per_uM_per_min;
  k19 = 12 per_uM_per_min;
  k20 = 12 per_uM_per_min;
  k21 = 156 per_uM_per_min;
  k21r = 0.144 per_min;
  k22 = 156 per_uM_per_min;
  k22r = 0.144 per_min;
  k23 = 156 per_uM_per_min;
  k23r = 0.144 per_min;
  k24 = 0;
  k25 = 0;
  k26 = 420 per_uM2_per_min;
  k26r = 0.133 per_min;
  k27 = 420 per_uM2_per_min;
  k27r = 156 per_uM_per_min;
  k28 = 420 per_uM2_per_min;
  k28r = 156 per_uM_per_min;
  k29 = 420 per_uM2_per_min;
  k29r = 156 per_uM2_per_min;
  k30 = 4.45 per_uM_per_min;
  k30r = 31.9 per_min;
  k31 = 0.33 per_uM_per_min;
  k31r = 14.2 per_min;
  k32 = 4.45 per_uM_per_min;
  k32r = 156 per_uM_per_min;
  k33 = 0.33 per_uM_per_min;
  k33r = 156 per_uM_per_min;
  k34 = 420 per_uM2_per_min;
  k34r = 156 per_min;
  k35 = 0.0058 per_min;
  k36 = 0.0058 per_min;
  k37 = 0.0058 per_min;
  k38 = 0.0347 per_min;
  k39 = 0.0347 per_min;
  k40 = 0.0347 per_min;
  k41 = 0.0058 per_min;
  k42 = 0.0347 per_min;
  k43 = 0.0347 per_min;
  k44 = 0.0347 per_min;
  k45 = 0.0058 per_min;
  k46 = 0.0347 per_min;
  k47 = 0.0058 per_min;
  k48 = 0.0347 per_min;
  k49 = 0.0058 per_min;
  k50 = 0.0058 per_min;
  k51 = 0.0347 per_min;
  k52 = 0.0058 per_min;
  k53 = 12 per_uM_per_min;
  th_SMAC = 7 time; th_SMAC is "t_SMAC_0.5";
  apo_lim has uM; apo_lim is "limiting factor for apoptosome formation";
  th_Apop = 2.3 time; th_Apop is "t_Apop_0.5";
  th_CytC = 1.5 time;
  SMAC_norm has dimensionless; SMAC_norm is "free SMAC per XIAP";
  XIAP_ini = XIAP; XIAP_ini has uM; XIAP_ini is "initial XIAP conc";
  XIAP_2SMAC_norm has dimensionless; XIAP_2SMAC_norm is "XIAP2*SMAC per XIAP";
  C9norm has dimensionless; C9norm is "normalised Casp-9";
  C9_tot = PC9; C9_tot has uM; C9_tot is "Caspase9 tot";
  C9Pnorm has dimensionless; C9Pnorm is "normalised Casp9-P";
  C3norm has dimensionless; C3norm is "normalised Casp-3";
  C3_tot = PC3; C3_tot has uM; C3_tot is "Caspase3 tot";
  PC3norm has dimensionless; PC3norm is "normalised Procasp-3";
  SMAC_rel has dimensionless; SMAC_rel is "percent SMAC release";
  SMAC_tot = SMAC_mito; SMAC_tot has uM; SMAC_tot is "total SMAC";
  Apoform has dimensionless; Apoform is "percent Apoptosome formation";
  XIAP_norm has dimensionless;
  XIAP_C3_norm has dimensionless;
  XIAP_C9_norm has dimensionless;
  XIAP_p2frag_norm has dimensionless;
  BIR12_norm has dimensionless;
  BIR3R_norm has dimensionless;
  BIR12_C3_norm has dimensionless;
  BIR3R_C9_norm has dimensionless;
  BIR3R_p2frag_norm has dimensionless;
  S_breakdown = 0.01 uM;
  CytC_tot = CytC_mit; CytC_tot has uM;
  APAF1_tot = APAF1; APAF1_tot has uM;

  // Assignment rules:
  apo_lim := piecewise(PC9, PC9 < APAF1, APAF1);
  SMAC_norm := SMAC/XIAP_ini;
  XIAP_2SMAC_norm := XIAP_2SMAC/XIAP_ini;
  C9norm := Casp9_p35_p12/C9_tot;
  C9Pnorm := C9P/C9_tot;
  C3norm := C3/C3_tot;
  PC3norm := PC3/C3_tot;
  SMAC_rel := 1 - SMAC_mito/SMAC_tot;
  Apoform := 1 - PC9/C9_tot;
  XIAP_norm := XIAP/XIAP_ini;
  XIAP_C3_norm := (XIAP_C3 + XIAP_C9_C3)/XIAP_ini;
  XIAP_C9_norm := (XIAP_C9 + XIAP_C9_C3)/XIAP_ini;
  XIAP_p2frag_norm := (XIAP_p2frag + XIAP_p2frag_C3)/XIAP_ini;
  BIR12_norm := BIR12/XIAP_ini;
  BIR3R_norm := BIR3R/XIAP_ini;
  BIR12_C3_norm := BIR12_C3/XIAP_ini;
  BIR3R_C9_norm := BIR3R_C9/XIAP_ini;
  BIR3R_p2frag_norm := BIR3R_p2frag/XIAP_ini;

  // Reactions:
  ProCaspase3_Production: -> PC3; cell*(k1 - k1r*PC3);
  XIAP_Production: -> XIAP; cell*(k2 - k2r*XIAP);
  reaction3: Casp9_p35_p12 + PC3 -> C3 + Casp9_p35_p12; cell*k3*Casp9_p35_p12*PC3;  // isVersionOf GO:0016485
  reaction4: Casp9_p35_p12 + C3 -> C9P + C3; cell*k4*Casp9_p35_p12*C3;  // isVersionOf GO:0016485
  reaction5: C9P + PC3 -> C9P + C3; cell*k5*C9P*PC3;  // isVersionOf GO:0006461
  reaction6: PC3 + C3 -> 2 C3; cell*k6*PC3*C3;  // isVersionOf GO:0016485
  reaction7: C3 + XIAP -> XIAP_C3; cell*(k7*C3*XIAP - k7r*XIAP_C3);  // isVersionOf GO:0006461
  reaction8: C3 + XIAP_C9 -> XIAP_C9_C3; cell*(k8*C3*XIAP_C9 - k8r*XIAP_C9_C3);  // isVersionOf GO:0006461
  reaction9: C3 + XIAP_p2frag -> XIAP_p2frag_C3; cell*(k9*C3*XIAP_p2frag - k9r*XIAP_p2frag_C3);  // isVersionOf GO:0006461
  reaction10: C3 + BIR12 -> BIR12_C3; cell*(k10*C3*BIR12 - k10r*BIR12_C3);  // isVersionOf GO:0006461
  reaction11: C3 + XIAP -> BIR12 + BIR3R + C3; cell*k11*C3*XIAP;  // isVersionOf GO:0032403
  reaction12: C3 + XIAP_C9 -> BIR12 + BIR3R_C9 + C3; cell*k12*C3*XIAP_C9;  // isVersionOf GO:0032403
  reaction13: C3 + XIAP_C3 -> C3 + BIR12_C3 + BIR3R; cell*k13*C3*XIAP_C3;  // isVersionOf GO:0032403
  reaction14: C3 + XIAP_p2frag -> C3 + BIR12 + BIR3R_p2frag; cell*k14*C3*XIAP_p2frag;  // isVersionOf GO:0032403
  reaction15: C3 + XIAP_p2frag_C3 -> C3 + BIR12_C3 + BIR3R_p2frag; cell*k15*C3*XIAP_p2frag_C3;  // isVersionOf GO:0032403
  reaction16: C3 + XIAP_C9_C3 -> C3 + BIR12_C3 + BIR3R_C9; cell*k16*C3*XIAP_C9_C3;  // isVersionOf GO:0032403
  reaction17: C3 + XIAP_2SMAC -> C3 + BIR12_SMAC + BIR3R_SMAC; cell*k17*C3*XIAP_2SMAC;  // isVersionOf GO:0032403
  reaction18: C3 + XIAP_C9_C3 -> C3 + C9P + XIAP_p2frag_C3; cell*k18*C3*XIAP_C9_C3;  // isVersionOf GO:0032403
  reaction19: C3 + XIAP_C9 -> C3 + C9P + XIAP_p2frag; cell*k19*C3*XIAP_C9;  // isVersionOf GO:0032403
  reaction20: C3 + BIR3R_C9 -> C3 + BIR3R_p2frag + C9P; cell*k20*C3*BIR3R_C9;  // isVersionOf GO:0032403
  reaction21: Casp9_p35_p12 + XIAP -> XIAP_C9; cell*(k21*Casp9_p35_p12*XIAP - k21r*XIAP_C9);  // isVersionOf GO:0006461
  reaction22: Casp9_p35_p12 + XIAP_C3 -> XIAP_C9_C3; cell*(k22*Casp9_p35_p12*XIAP_C3 - k22r*XIAP_C9_C3);  // isVersionOf GO:0006461
  reaction23: Casp9_p35_p12 + BIR3R -> BIR3R_C9; cell*(k23*Casp9_p35_p12*BIR3R - k23r*BIR3R_C9);  // isVersionOf GO:0006461
  reaction24: BIR3R_p2frag -> BIR3R; cell*k24*BIR3R_p2frag;  // isVersionOf GO:0043241
  reaction25: XIAP_p2frag -> XIAP; cell*k25*XIAP_p2frag;  // isVersionOf GO:0043241
  reaction26: XIAP + 2 SMAC -> XIAP_2SMAC; cell*(k26*XIAP*SMAC*SMAC - k26r*XIAP_2SMAC);  // isVersionOf GO:0006461
  reaction27: XIAP_C9 + 2 SMAC -> XIAP_2SMAC + Casp9_p35_p12; cell*(k27*XIAP_C9*SMAC*SMAC - k27r*XIAP_2SMAC*Casp9_p35_p12);  // isVersionOf reactome:REACT_1312; isVersionOf GO:0032403
  reaction28: XIAP_C3 + 2 SMAC -> XIAP_2SMAC + C3; cell*(k28*XIAP_C3*SMAC*SMAC - k28r*XIAP_2SMAC*C3);  // isVersionOf reactome:REACT_1090; isVersionOf GO:0032403
  reaction29: XIAP_C9_C3 + 2 SMAC -> XIAP_2SMAC + C3 + Casp9_p35_p12; cell*(k29*XIAP_C9_C3*SMAC*SMAC - k29r*XIAP_2SMAC*C3*Casp9_p35_p12);  // isVersionOf GO:0032403
  reaction30: BIR12 + SMAC -> BIR12_SMAC; cell*(k30*BIR12*SMAC - k30r*BIR12_SMAC);  // isVersionOf GO:0006461
  reaction31: BIR3R + SMAC -> BIR3R_SMAC; cell*(k31*BIR3R*SMAC - k31r*BIR3R_SMAC);  // isVersionOf GO:0006461
  reaction32: BIR12_C3 + SMAC -> BIR12_SMAC + C3; cell*(k32*BIR12_C3*SMAC - k32r*BIR12_SMAC*C3);  // hasVersion reactome:REACT_1090; isVersionOf GO:0032403
  reaction33: BIR3R_C9 + SMAC -> BIR3R_SMAC + Casp9_p35_p12; cell*(k33*BIR3R_C9*SMAC - k33r*BIR3R_SMAC*Casp9_p35_p12);  // hasVersion reactome:REACT_1312; isVersionOf GO:0032403
  reaction34: XIAP_p2frag + 2 SMAC -> XIAP_p2frag_2SMAC; cell*(k34*XIAP_p2frag*SMAC*SMAC - k34r*XIAP_p2frag_2SMAC);  // hasVersion reactome:REACT_1090; isVersionOf GO:0006461
  reaction35: C9P -> ; cell*k35*C9P;  // isVersionOf GO:0009056
  reaction36: Casp9_p35_p12 -> ; cell*k36*Casp9_p35_p12;  // isVersionOf GO:0009056
  reaction37: C3 -> ; cell*k37*C3;  // isVersionOf GO:0009056
  reaction38: XIAP_C3 -> ; cell*k38*XIAP_C3;  // isVersionOf GO:0009056
  reaction39: XIAP_C9_C3 -> ; cell*k39*XIAP_C9_C3;  // isVersionOf GO:0009056
  reaction40: XIAP_C9 -> ; cell*k40*XIAP_C9;  // isVersionOf GO:0009056
  reaction41: XIAP_p2frag -> ; cell*k41*XIAP_p2frag;  // isVersionOf GO:0009056
  reaction42: XIAP_p2frag_C3 -> ; cell*k42*XIAP_p2frag_C3;  // isVersionOf GO:0009056
  reaction43: XIAP_p2frag_2SMAC -> ; cell*k43*XIAP_p2frag_2SMAC;  // isPartOf GO:0009056
  reaction44: XIAP_2SMAC -> ; cell*k44*XIAP_2SMAC;  // isVersionOf GO:0009056
  reaction45: BIR12 -> ; cell*k45*BIR12;  // isVersionOf GO:0009056
  reaction46: BIR3R -> ; cell*k46*BIR3R;  // isVersionOf GO:0009056
  reaction47: BIR12_SMAC -> ; cell*k47*BIR12_SMAC;  // isVersionOf GO:0009056
  reaction48: BIR3R_SMAC -> ; cell*k48*BIR3R_SMAC;  // isVersionOf GO:0009056
  reaction49: BIR12_C3 -> ; cell*k49*BIR12_C3;  // isVersionOf GO:0009056
  reaction50: BIR3R_C9 -> ; cell*k50*BIR3R_C9;  // isVersionOf GO:0009056
  reaction51: BIR3R_p2frag -> ; cell*k51*BIR3R_p2frag;  // isVersionOf GO:0009056
  reaction52: SMAC -> ; cell*k52*SMAC;  // isVersionOf GO:0009056
  reaction53: C3 + Substrate -> C3 + ClvgPrds; cell*k53*C3*Substrate;  // isVersionOf GO:0032403
  SMAC_release: SMAC_mito -> SMAC; cell*SMAC_mito*ln(2)/th_SMAC;  // isVersionOf reactome:REACT_1101
  Apo_formation: PC9 + APAF1 -> Casp9_p35_p12; cell*apo_lim*ln(2)/th_Apop;  // isVersionOf GO:0006461; hasVersion reactome:REACT_89
  CytC_release: CytC_mit -> CytC_cell; cell*CytC_mit*ln(2)/th_CytC;  // isVersionOf reactome:REACT_535

  // Events:
  Production_Breakdown: at (Substrate < S_breakdown): k51 = 0.0058, k50 = 0.0058, k48 = 0.0058, k46 = 0.0058, k44 = 0.0058, k43 = 0.0058, k40 = 0.0058, k39 = 0.0058, k38 = 0.0058, k2r = 0, k2 = 0, k1r = 0, k1 = 0;

  // Unit definitions:
  unit time = 60 second; time is "min";
  unit substance = 1e-6 mole; substance is "micromole";
  unit uM = 1e-6 mole / litre; uM is "microM";
  unit uM_per_min = 1e-6 mole / (litre * 60 second); uM_per_min is "uM/min";
  unit per_uM_per_min = litre / (1e-6 mole * 60 second); per_uM_per_min is "1/(uM*min)";
  unit per_uM2_per_min = litre^2 / ((1e-6 mole)^2 * 60 second); per_uM2_per_min is "1/(uM^2*min)";
  unit per_min = 1 / (60 second); per_min is "1/min";
end
