// SBML level 2 version 4

model Friedland2009_Ara_Counter_RC3_events()
  // Friedland2009_Ara_RTC3_counter
  // This is the model of the RTC3 counter described in the article:
  // Synthetic gene networks that count.
  // Friedland AE, Lu TK, Wang X, Shi D, Church G, Collins JJ. Science. 2009 May 29;324(5931):1199-202. PMID:19478183, DOI:10.1126/science.1172005
  // Abstract:
  // Synthetic gene networks can be constructed to emulate digital circuits and devices, giving one the ability to program and design cells with some of the principles of modern computing, such as counting. A cellular counter would enable complex synthetic programming and a variety of biotechnology applications. Here, we report two complementary synthetic genetic counters in Escherichia coli that can count up to three induction events: the first, a riboregulated transcriptional cascade, and the second, a recombinase-based cascade of memory units. These modular devices permit counting of varied user-defined inputs over a range of frequencies and can be expanded to count higher numbers.
  // The 3 arabinose pulses are implemented using events, one for the start of pulses and one for the end. The variable pulse_flag changes arabinose consumption to fit behaviour during pulses and in between. To simulate two pulses only, set the pulse length of the third pulse to a negative value (though with an absolute value smaller than the pulse intervall length).
  // Originally created by libAntimony v1.4 (using libSBML 3.4.1)
  // This model originates from BioModels Database: A Database of Annotated Published Models (http://www.ebi.ac.uk/biomodels/). It is copyright (c) 2005-2011 The BioModels.net Team.
  // For more information see the terms of use.
  // To cite BioModels Database, please use: Li C, Donizelli M, Rodriguez N, Dharuri H, Endler L, Chelliah V, Li L, He E, Henry A, Stefan MI, Snoep JL, Hucka M, Le Novère N, Laibe C (2010) BioModels Database: An enhanced, curated and annotated resource for published quantitative kinetic models. BMC Syst Biol., 4:92.
  // biomodels.db:MODEL1012220006
  // biomodels.db:BIOMD0000000301
  // isDescribedBy pubmed:19478183
  // hasTaxon taxonomy:83333
  // hasVersion GO:0045975 GO:0006446
  // hasProperty mamo:MAMO_0000046

  // Compartments:
  compartment cell = 1;  // GO:0005623

  // Species:
  species taRNA in cell = 0.006796941;  // hasProperty GO:0045975; isVersionOf CHEBI:33697
  species mT7cr in cell = 0.3569405;  // encodes uniprot:P00573; isVersionOf CHEBI:33699
  species mGFPcr in cell = 0.176991329;  // encodes interpro:IPR000786; isVersionOf CHEBI:33699
  species pT7 in cell = 0.05230745;  // isVersionOf uniprot:P00573; isPartOf GO:0000428
  species pGFP in cell = 6.338921;  // isHomologTo uniprot:P42212; isVersionOf interpro:IPR000786
  species ara in cell = 0;  // kegg.compound:C00259; CHEBI:17535
  species pT3 in cell = 6.41674e-5;  // isVersionOf uniprot:P07659; isPartOf GO:0000428
  species mT3cr in cell = 0.00566438;  // encodes uniprot:P07659; isVersionOf CHEBI:33699

  // Parameters:
  cAra = 0.0003;
  pulse_flag = 0;
  dAra = 0.1201;
  sT = 0.8467;
  k_ara = 0.0571;
  s0_taRNA = 0.0008;
  d_taRNA = 0.1177;
  s0_mT7cr = 0.0252;
  d_mT7 = 0.0706;
  s0_mGFPcr = 0.0123;
  k_pT3 = 3.006;
  n3 = 0.8892;
  km3 = 7.9075;
  d_mGFP = 0.07;
  s0_pT7 = 0.0003;
  s_pT7k = 0.0766;
  s0_pGFP = 0.1007;
  s_pGFPk = 0.9923;
  d_pT7 = 0.0056;
  d_pGFP = 0.003;
  s0_mT3cr = 0.0003;
  k_pT7 = 3.8009;
  n7 = 2.602;
  km7 = 3.0455;
  d_mT3 = 0.0701;
  s0_pT3 = 0;
  s_pT3k = 0.0115;
  d_pT3 = 0.0069;
  pulse_interval = 20;
  pulse1_start = 0.01;
  pulse1_length = 11;
  pulse_conc = 0.01;
  pulse2_length = 11;
  pulse3_length = 22;

  // Assignment rules:
  pulse2_start := pulse1_start + pulse1_length + pulse_interval;
  pulse3_start := pulse2_start + pulse2_length + pulse_interval;

  // Reactions:
  r0: ara => ; cell*piecewise(cAra, (pulse_flag == 1) && (ara > 0), dAra*ara);  // isVersionOf GO:0019572
  r1a: => taRNA; cell*(sT*ara/(ara + k_ara) + s0_taRNA);  // modifiers: ara; hasVersion GO:0051091; isVersionOf GO:0001121
  r1b: taRNA => ; cell*d_taRNA*taRNA;  // isVersionOf GO:0034661
  r2a: => mT7cr; cell*s0_mT7cr;  // isVersionOf GO:0001121
  r2b: mT7cr => ; cell*d_mT7*mT7cr;  // isVersionOf GO:0006402
  r3a: => mGFPcr; cell*(s0_mGFPcr + k_pT3*pT3^n3/(km3^n3 + pT3^n3));  // modifiers: pT3; isVersionOf GO:0006351
  r3b: mGFPcr => ; cell*d_mGFP*mGFPcr;  // isVersionOf GO:0006402
  r6: => pT7; cell*(s0_pT7*mT7cr + s_pT7k*mT7cr*taRNA);  // modifiers: taRNA, mT7cr; hasVersion GO:0045974; isVersionOf GO:0006412
  r7: => pGFP; cell*(s0_pGFP*mGFPcr + s_pGFPk*mGFPcr*taRNA);  // modifiers: taRNA, mGFPcr; hasVersion GO:0045974; isVersionOf GO:0006412
  r8: pT7 => ; cell*d_pT7*pT7;  // isVersionOf GO:0030163
  r9: pGFP => ; cell*d_pGFP*pGFP;  // isVersionOf GO:0030163
  r10a: => mT3cr; cell*(s0_mT3cr + k_pT7*pT7^n7/(km7^n7 + pT7^n7));  // modifiers: pT7; isVersionOf GO:0006351
  r10b: mT3cr => ; cell*d_mT3*mT3cr;  // isVersionOf GO:0006402
  r11: => pT3; cell*(s0_pT3*mT3cr + s_pT3k*taRNA*mT3cr);  // modifiers: taRNA, mT3cr; isVersionOf GO:0006412; hasVersion GO:0045974
  r12: pT3 => ; cell*d_pT3*pT3;  // hasVersion GO:0030163

  // Events:
  pulse_start1: at ((time >= pulse1_start) && (time <= pulse1_start + pulse1_length)): pulse_flag = 1, ara = pulse_conc;
  pulse_start2: at ((time >= pulse2_start) && (time <= pulse2_start + pulse2_length)): pulse_flag = 1, ara = pulse_conc;
  pulse_start3: at ((time >= pulse3_start) && (time <= pulse3_start + pulse3_length)): pulse_flag = 1, ara = pulse_conc;
  pulse_end1: at ((time < pulse2_start) && (time > pulse1_start + pulse1_length)): pulse_flag = 0;
  pulse_end2: at ((time < pulse3_start) && (time > pulse2_start + pulse2_length)): pulse_flag = 0;
  pulse_end3: at (time > pulse3_start + pulse3_length): pulse_flag = 0;
end
