// SBML level 2 version 4

model Pfeiffer2001_ATPProducingPathways_CooperationCompetition()
  // Pfeiffer2001_ATP-ProducingPathways_CooperationCompetition
  // This model is from the article:
  // Cooperation and Competition in the Evolution of ATP-Producing Pathways
  // Thomas Pfeiffer, Stefan Schuster, Sebastian Bonhoeffer Science 2001 Apr; Volume:292 (Issue:5516); Page info:504-7 11283355 ,
  // Abstract:
  // Heterotrophic organisms generally face a trade-off between rate and yield of adenosine triphosphate (ATP) production. This trade-off may result in an evolutionary dilemma, because cells with a higher rate but lower yield of ATP production may gain a selective advantage when competing for shared energy resources. Using an analysis of model simulations and biochemical observations, we show that ATP production with a low rate and high yield can be viewed as a form of cooperative resource use and may evolve in spatially structured environments. Furthermore, we argue that the high ATP yield of respiration may have facilitated the evolutionary transition from unicellular to undifferentiated multicellular organisms.
  // This model reproduces the competition and invasion described in Supplemental Figure 2.
  // biomodels.db:MODEL1105120000
  // biomodels.db:BIOMD0000000337
  // isDescribedBy pubmed:11283355
  // isVersionOf GO:0006754 GO:0071318
  // hasTaxon taxonomy:131567
  // hasProperty mamo:MAMO_0000046

  // Compartments:
  compartment compartment = 1;

  // Species:
  species S in compartment = 0.1111111;  // isVersionOf PATO:0001021
  species N1 in compartment = 100;  // isVersionOf GO:0005623
  species N2 in compartment = 0;  // isVersionOf GO:0005623

  // Parameters:
  v = 10 dimensionless;
  d = 1 dimensionless;

  // Reactions:
  resource_production: -> S; v;  // isVersionOf GO:0006754
  r2: S -> 10 N1; N1*S/(1 + S); r2 is "resource consumption and cell growth 1";  // isVersionOf GO:0016049
  r3: S -> N2; N2*20*S/(1 + S); r3 is "resource consumption and cell growth 2";  // isVersionOf GO:0016049
  cell_death_1: N1 -> ; d*N1;  // isVersionOf GO:0008219
  cell_death_2: N2 -> ; d*N2;  // isVersionOf GO:0008219

  // Events:
  at (time >= 15): N2 = 0.01;

  // Unit definitions:
  unit substance = dimensionless;
  unit time = dimensionless;
  unit volume = dimensionless;
end
