// SBML level 2 version 4

function function_4_motor_r1(M, MYp, Yp, cell, ka, kappa)
  ka*(M*Yp - kappa/4*MYp)/cell;
end

function function_4_motor_r2(MYp, MYpYp, Yp, alpha, cell, ka, kappa)
  ka*(MYp*Yp - 2*alpha*kappa/3*MYpYp)/cell;
end

function function_4_motor_r3(MYpYp, MYpYpYp, Yp, alpha, cell, ka, kappa)
  ka*(MYpYp*Yp - 3*alpha*alpha*kappa/2*MYpYpYp)/cell;
end

function function_4_motor_r4(MYpYpYp, MYpYpYpYp, Yp, alpha, cell, ka, kappa)
  ka*(MYpYpYp*Yp - 4*alpha*alpha*alpha*kappa*MYpYpYpYp)/cell;
end

function Autophosphorylation(kcat, correction, E)
  kcat*correction*E;
end

function ModAutophosphorylation(M, S, kcat, correction)
  M*S*kcat*correction;
end

model Bray1993_chemotaxis()
  // This version of the model is very close to the version described in the paper with one exception: the binding of aspartate to the various receptor complexes, as well as the formation of the different complexes are modeled using chemical kinetics (mass action law), rather than instant equilibrium. The qualitative behaviour of the model is unchanged. Note that in order to quantitatively replicate the figure 8b, and in particular to have a basal bias of 0.7, we have to change the rate constant of the aspartate-triggered dephosphorylation of CheY from 59000 to 70000. The peaks have then slightly different values.
  // This model originates from BioModels Database: A Database of Annotated Published Models (http://www.ebi.ac.uk/biomodels/). It is copyright (c) 2005-2012 The BioModels.net Team.
  // For more information see the terms of use .
  // To cite BioModels Database, please use: Li C, Donizelli M, Rodriguez N, Dharuri H, Endler L, Chelliah V, Li L, He E, Henry A, Stefan MI, Snoep JL, Hucka M, Le Novère N, Laibe C (2010) BioModels Database: An enhanced, curated and annotated resource for published quantitative kinetic models. BMC Syst Biol., 4:92.
  // biomodels.db:MODEL6929313478
  // biomodels.db:BIOMD0000000404
  // isDescribedBy pubmed:8334303
  // hasTaxon taxonomy:562
  // isVersionOf kegg.pathway:map02030 GO:0006935
  // hasProperty mamo:MAMO_0000046

  // Compartments:
  compartment cell = 1.41e-15;  // isVersionOf GO:0005623

  // Species:
  species $asp in cell = 0;  // CHEBI:35391
  species $ni in cell = 0;  // CHEBI:49786
  species T in cell = 3.12e-6;  // uniprot:P07017
  species Tasp in cell = 0;  // hasPart CHEBI:35391 uniprot:P07017
  species Tni in cell = 0;  // hasPart CHEBI:49786 uniprot:P07017
  species W in cell = 2.89e-6;  // uniprot:P0A964
  species TW in cell = 5.91e-7;  // hasPart uniprot:P0A964 uniprot:P07017
  species Tasp_W in cell = 0;  // hasPart CHEBI:35391 uniprot:P07017 uniprot:P0A964
  species Tni_W in cell = 0;  // hasPart CHEBI:49786 uniprot:P07017 uniprot:P0A964
  species TA in cell = 4.44e-7;  // hasPart uniprot:P07017 uniprot:P07363
  species Tasp_A in cell = 0;  // hasPart CHEBI:35391 uniprot:P07017 uniprot:P07363
  species Tni_A in cell = 0;  // hasPart CHEBI:49786 uniprot:P07017 uniprot:P07363
  species WA in cell = 6.78e-7;  // hasPart uniprot:P07363 uniprot:P0A964
  species TWA in cell = 8.47e-7;  // hasPart uniprot:P07017 uniprot:P07363 uniprot:P0A964
  species Tasp_WA in cell = 0;  // hasPart CHEBI:35391 uniprot:P07017 uniprot:P07363 uniprot:P0A964
  species Tni_WA in cell = 0;  // hasPart CHEBI:49786 uniprot:P07017 uniprot:P07363 uniprot:P0A964
  species A in cell = 3e-6;  // isVersionOf uniprot:P07363
  species Ap in cell = 3.48e-8;  // hasProperty MOD:00696; isVersionOf uniprot:P07363
  species B in cell = 1.93e-6;  // isVersionOf uniprot:P07330
  species Bp in cell = 6.87e-8;  // hasProperty MOD:00696; isVersionOf uniprot:P07330
  species Z in cell = 2e-5;  // uniprot:P0A9H9
  species Y in cell = 9.9e-6;  // isVersionOf uniprot:P0AE67
  species Yp in cell = 7e-9;  // hasProperty MOD:00696; isVersionOf uniprot:P0AE67
  species M in cell = 6.24e-9;  // uniprot:P06974
  species MYp in cell = 7.77e-10;  // hasPart uniprot:P06974 uniprot:P0AE67
  species MYpYp in cell = 2.99e-10;  // hasPart uniprot:P0AE67 uniprot:P06974
  species MYpYpYp in cell = 3.78e-10;  // hasPart uniprot:P0AE67 uniprot:P06974
  species MYpYpYpYp in cell = 2.31e-9;  // hasPart uniprot:P06974 uniprot:P0AE67
  species $ATP in cell = 0.1;  // CHEBI:15422

  // Parameters:
  alpha = 0.14;
  kappa = 2.25e-7;
  ka = 0.1;
  asp_pulse = 1e-7;
  var autoPhospho;
  KmATP = 0.0003;

  // Assignment rules:
  Bias := (M + MYp)/(M + MYp + MYpYp + MYpYpYp + MYpYpYpYp);
  autoPhospho := ATP/(ATP + KmATP);

  // Reactions:
  phosphorylation_r1: A => Ap; cell*Autophosphorylation(phosphorylation_r1_kcat, autoPhospho, A); phosphorylation_r1 is "A->Ap";  // isVersionOf ec-code:2.7.11.1 GO:0006468
    phosphorylation_r1_kcat = 0.001;
  phosphorylation_r2: A => Ap; cell*ModAutophosphorylation(TWA, A, phosphorylation_r2_kcat, autoPhospho); phosphorylation_r2 is "TWA+A->TWA+Ap";  // modifiers: TWA; isVersionOf ec-code:2.7.11.1 GO:0006468
    phosphorylation_r2_kcat = 75000;
  phosphorylation_r3: A => Ap; cell*ModAutophosphorylation(Tni_WA, A, phosphorylation_r3_kcat, autoPhospho); phosphorylation_r3 is "Tni_WA+A->Tni_WA+Ap";  // modifiers: Tni_WA; isVersionOf ec-code:2.7.11.1 GO:0006468
    phosphorylation_r3_kcat = 200000;
  phosphorylation_r4: Tasp_WA + Yp => Tasp_WA + Y; cell*phosphorylation_r4_k1*Tasp_WA*Yp; phosphorylation_r4 is "Tasp_WA+Yp->Tasp_WA+Y";  // isVersionOf ec-code:3.1.3.16 GO:0006470
    phosphorylation_r4_k1 = 100000000;
  phosphorylation_r5: Ap + Y => A + Yp; cell*phosphorylation_r5_k1*Ap*Y; phosphorylation_r5 is "Ap+Y->A+Yp";  // isVersionOf ec-code:2.7.11.1 GO:0006468
    phosphorylation_r5_k1 = 200000;
  phosphorylation_r6: Y => Yp; cell*Autophosphorylation(phosphorylation_r6_kcat, autoPhospho, Y); phosphorylation_r6 is "Y ->Yp";  // isVersionOf ec-code:2.7.11.1 GO:0006468
    phosphorylation_r6_kcat = 0;
  phosphorylation_r7: Yp => Y; cell*phosphorylation_r7_k1*Yp; phosphorylation_r7 is "Yp->Y";  // isVersionOf ec-code:3.1.3.16 GO:0006470
    phosphorylation_r7_k1 = 0.037;
  phosphorylation_r8: Yp + Z => Y + Z; cell*phosphorylation_r8_k1*Yp*Z; phosphorylation_r8 is "Yp+Z->Y+Z";  // isVersionOf ec-code:3.1.3.16 GO:0006470
    phosphorylation_r8_k1 = 500000;
  phosphorylation_r9: Ap + B => A + Bp; cell*phosphorylation_r9_k1*Ap*B; phosphorylation_r9 is "Ap+B->A+Bp";  // hasPart GO:0006470 GO:0006468; hasPart ec-code:3.1.3.16 ec-code:2.7.11.1
    phosphorylation_r9_k1 = 1000000;
  phosphorylation_r10: Bp => B; cell*phosphorylation_r10_k1*Bp; phosphorylation_r10 is "Bp->B";  // isVersionOf ec-code:3.1.3.16 GO:0006470
    phosphorylation_r10_k1 = 1;
  regulatory_r1: T + $asp -> Tasp; cell*(regulatory_r1_k1*T*asp - regulatory_r1_k2*Tasp); regulatory_r1 is "T+asp<->Tasp";  // isVersionOf GO:0070335
    regulatory_r1_k1 = 1000000; regulatory_r1_k2 = 1;
  regulatory_r2: T + $ni -> Tni; cell*(regulatory_r2_k1*T*ni - regulatory_r2_k2*Tni); regulatory_r2 is "T+ni<->Tni";  // isVersionOf GO:0016151
    regulatory_r2_k1 = 1000; regulatory_r2_k2 = 1;
  regulatory_r3: T + W -> TW; cell*(regulatory_r3_k1*T*W - regulatory_r3_k2*TW); regulatory_r3 is "T+W<->TW";  // isVersionOf GO:0006461
    regulatory_r3_k1 = 100000; regulatory_r3_k2 = 1;
  regulatory_r4: T + A -> TA; cell*(regulatory_r4_k1*T*A - regulatory_r4_k2*TA); regulatory_r4 is "T+A<->TA";  // isVersionOf GO:0006461
    regulatory_r4_k1 = 10000; regulatory_r4_k2 = 1;
  regulatory_r5: W + A -> WA; cell*(regulatory_r5_k1*W*A - regulatory_r5_k2*WA); regulatory_r5 is "W+A<->WA";  // isVersionOf GO:0006461
    regulatory_r5_k1 = 100000; regulatory_r5_k2 = 1;
  regulatory_r6: TW + A -> TWA; cell*(regulatory_r6_k1*TW*A - regulatory_r6_k2*TWA); regulatory_r6 is "TW+A<->TWA";  // isVersionOf GO:0006461
    regulatory_r6_k1 = 400000; regulatory_r6_k2 = 1;
  regulatory_r7: TA + W -> TWA; cell*(regulatory_r7_k1*TA*W - regulatory_r7_k2*TWA); regulatory_r7 is "TA+W<->TWA";  // isVersionOf GO:0006461
    regulatory_r7_k1 = 400000; regulatory_r7_k2 = 1;
  regulatory_r8: T + WA -> TWA; cell*(regulatory_r8_k1*T*WA - regulatory_r8_k2*TWA); regulatory_r8 is "T+WA<->TWA";  // isVersionOf GO:0006461
    regulatory_r8_k1 = 400000; regulatory_r8_k2 = 1;
  regulatory_r9: Tasp + W -> Tasp_W; cell*(regulatory_r9_k1*Tasp*W - regulatory_r9_k2*Tasp_W); regulatory_r9 is "Tasp+W<->Tasp_W";  // isVersionOf GO:0006461
    regulatory_r9_k1 = 100000; regulatory_r9_k2 = 1;
  regulatory_r10: Tasp + A -> Tasp_A; cell*(regulatory_r10_k1*Tasp*A - regulatory_r10_k2*Tasp_A); regulatory_r10 is "Tasp+A<->Tasp_A";  // isVersionOf GO:0006461
    regulatory_r10_k1 = 10000; regulatory_r10_k2 = 1;
  regulatory_r11: Tasp_W + A -> Tasp_WA; cell*(regulatory_r11_k1*Tasp_W*A - regulatory_r11_k2*Tasp_WA); regulatory_r11 is "Tasp_W+A<->Tasp_WA";  // isVersionOf GO:0006461
    regulatory_r11_k1 = 400000; regulatory_r11_k2 = 1;
  regulatory_r12: Tasp_A + W -> Tasp_WA; cell*(regulatory_r12_k1*Tasp_A*W - regulatory_r12_k2*Tasp_WA); regulatory_r12 is "Tasp_A+W<->Tasp_WA";  // isVersionOf GO:0006461
    regulatory_r12_k1 = 400000; regulatory_r12_k2 = 1;
  regulatory_r13: Tasp + WA -> Tasp_WA; cell*(regulatory_r13_k1*Tasp*WA - regulatory_r13_k2*Tasp_WA); regulatory_r13 is "Tasp+WA<->Tasp_WA";  // isVersionOf GO:0006461
    regulatory_r13_k1 = 400000; regulatory_r13_k2 = 1;
  regulatory_r14: Tni + W -> Tni_W; cell*(regulatory_r14_k1*Tni*W - regulatory_r14_k2*Tni_W); regulatory_r14 is "Tni+W<->Tni_W";  // isVersionOf GO:0006461
    regulatory_r14_k1 = 0.1; regulatory_r14_k2 = 1;
  regulatory_r15: Tni + A -> Tni_A; cell*(regulatory_r15_k1*Tni*A - regulatory_r15_k2*Tni_A); regulatory_r15 is "Tni+A<->Tni_A";  // isVersionOf GO:0006461
    regulatory_r15_k1 = 0.01; regulatory_r15_k2 = 1;
  regulatory_r16: Tni_W + A -> Tni_WA; cell*(regulatory_r16_k1*Tni_W*A - regulatory_r16_k2*Tni_WA); regulatory_r16 is "Tni_W+A<->Tni_WA";  // isVersionOf GO:0006461
    regulatory_r16_k1 = 0.4; regulatory_r16_k2 = 1;
  regulatory_r17: Tni_A + W -> Tni_WA; cell*(regulatory_r17_k1*Tni_A*W - regulatory_r17_k2*Tni_WA); regulatory_r17 is "Tni_A+W<->Tni_WA";  // isVersionOf GO:0006461
    regulatory_r17_k1 = 0.4; regulatory_r17_k2 = 1;
  regulatory_r18: Tni + WA -> Tni_WA; cell*(regulatory_r18_k1*Tni*WA - regulatory_r18_k2*Tni_WA); regulatory_r18 is "Tni+WA<->Tni_WA";  // isVersionOf GO:0006461
    regulatory_r18_k1 = 0.4; regulatory_r18_k2 = 1;
  motor_r1: M + Yp -> MYp; cell*function_4_motor_r1(M, MYp, Yp, cell, ka, kappa); motor_r1 is "M+Yp<->MYp";  // isVersionOf GO:0006461
  motor_r2: MYp + Yp -> MYpYp; cell*function_4_motor_r2(MYp, MYpYp, Yp, alpha, cell, ka, kappa); motor_r2 is "MYp+Yp<->MYpYp";  // isVersionOf GO:0006461
  motor_r3: MYpYp + Yp -> MYpYpYp; cell*function_4_motor_r3(MYpYp, MYpYpYp, Yp, alpha, cell, ka, kappa); motor_r3 is "MYpYp+Yp<->MYpYpYp";  // isVersionOf GO:0006461
  motor_r4: MYpYpYp + Yp -> MYpYpYpYp; cell*function_4_motor_r4(MYpYpYp, MYpYpYpYp, Yp, alpha, cell, ka, kappa); motor_r4 is "MYpYpYp+Yp<->MYpYpYpYp";  // isVersionOf GO:0006461
  TA_asp_Tasp_A: TA + $asp -> Tasp_A; cell*(TA_asp_Tasp_A_k1*TA*asp - TA_asp_Tasp_A_k2*Tasp_A); TA_asp_Tasp_A is "TA + asp <-> Tasp_A";  // isVersionOf GO:0070335
    TA_asp_Tasp_A_k1 = 1000000; TA_asp_Tasp_A_k2 = 1;
  TW_asp_Tasp_W: TW + $asp -> Tasp_W; cell*(TW_asp_Tasp_W_k1*TW*asp - TW_asp_Tasp_W_k2*Tasp_W); TW_asp_Tasp_W is "TW+asp <-> Tasp_W";  // isVersionOf GO:0070335
    TW_asp_Tasp_W_k1 = 1000000; TW_asp_Tasp_W_k2 = 1;
  TWA_asp_Tasp_WA: TWA + $asp -> Tasp_WA; cell*(TWA_asp_Tasp_WA_k1*TWA*asp - TWA_asp_Tasp_WA_k2*Tasp_WA); TWA_asp_Tasp_WA is "TWA+asp <-> Tasp_WA";  // isVersionOf GO:0070335
    TWA_asp_Tasp_WA_k1 = 1000000; TWA_asp_Tasp_WA_k2 = 1;

  // Events:
  Add_ASP: at (time >= 5): asp = asp_pulse;
  Remove_ASP: at (time >= 10): asp = 0;
end
