// SBML level 2 version 4

function activitycalc(x, slopea, yintercepta)
  yintercepta + x*slopea;
end

model BIOMD0000000436()
  // Gupta2009 - Eicosanoid Metabolism
  // Integrated model of eicosanoid metabolism and signaling based on lipidomics flux analysis.
  // This model is described in the article:
  // An integrated model of eicosanoid metabolism and signaling based on lipidomics flux analysis.
  // Gupta S, Maurya MR, Stephens DL, Dennis EA, Subramaniam S.
  // Biophys. J. 2009 Jun; 96(11):4542-51.
  // Abstract:
  // There is increasing evidence for a major and critical involvement of lipids in signal transduction and cellular trafficking, and this has motivated large-scale studies on lipid pathways. The Lipid Metabolites and Pathways Strategy consortium is actively investigating lipid metabolism in mammalian cells and has made available time-course data on various lipids in response to treatment with KDO(2)-lipid A (a lipopolysaccharide analog) of macrophage RAW 264.7 cells. The lipids known as eicosanoids play an important role in inflammation. We have reconstructed an integrated network of eicosanoid metabolism and signaling based on the KEGG pathway database and the literature and have developed a kinetic model. A matrix-based approach was used to estimate the rate constants from experimental data and these were further refined using generalized constrained nonlinear optimization. The resulting model fits the experimental data well for all species, and simulated enzyme activities were similar to their literature values. The quantitative model for eicosanoid metabolism that we have developed can be used to design experimental studies utilizing genetic and pharmacological perturbations to probe fluxes in lipid pathways.
  // This model is hosted on BioModels Database and identified by: BIOMD0000000436 .
  // To cite BioModels Database, please use: BioModels Database: An enhanced, curated and annotated resource for published quantitative kinetic models .
  // To the extent possible under law, all copyright and related or neighbouring rights to this encoded model have been dedicated to the public domain worldwide. Please refer to CC0 Public Domain Dedication for more information.
  // biomodels.db:MODEL1204240001
  // biomodels.db:BIOMD0000000436
  // isDescribedBy pubmed:19486676
  // isVersionOf GO:0006690 PW:0000565
  // hasTaxon taxonomy:40674
  // hasProperty mamo:MAMO_0000046

  // Compartments:
  compartment c1 = 1 litre;  // isVersionOf GO:0005623

  // Species:
  // Fatty acyls
  substanceOnly species $FA in c1 = 1;  // substance in pmol; isVersionOf CHEBI:35366
  substanceOnly species HETE in c1 = 0;  // substance in pmol; lipidmaps:LMFA03060085
  substanceOnly species PGH2 in c1 = 0;  // substance in pmol; isVersionOf CHEBI:15554
  substanceOnly species PGE2 in c1 = 0;  // substance in pmol; lipidmaps:LMFA03010003
  substanceOnly species PGF2a in c1 = 0;  // substance in pmol; kegg.compound:C00639 lipidmaps:LMFA03010002 CHEBI:15553
  substanceOnly species PGD2 in c1 = 0;  // kegg.compound:C00696 lipidmaps:LMFA03010004 CHEBI:15555
  substanceOnly species PGJ2 in c1 = 0;  // substance in pmol; kegg.compound:C05957 lipidmaps:LMFA03010019 CHEBI:27485
  substanceOnly species dPGJ2 in c1 = 0;  // substance in pmol; kegg.compound:C14717 lipidmaps:LMFA03010021 CHEBI:34159
  substanceOnly species AA in c1 = 25; AA is "Arachidonic acid";  // substance in pmol; kegg.compound:C00219 lipidmaps:LMFA01030001 CHEBI:15843
  species LPS in c1 = 0.5/c1;  // substance in dimensionless; isVersionOf CHEBI:16412
  // Arachidonic acid-containing glycerophospholipids
  species DG in c1 = 0;  // substance in dimensionless; isVersionOf CHEBI:49172
  // Glycerophosphocholines
  substanceOnly species GPCho in c1 = 1;  // substance in pmol; isVersionOf CHEBI:49183
  substanceOnly species dPGD2 in c1 = 0;  // substance in pmol; lipidmaps:LMFA03010051

  // Parameters:
  k1 = 355.637 perh;
  k2 = 1e-15 perh;
  k3 = 1e-15 perh;
  k4 = 1e-15 perh;
  k5 = 1e-15 ugDNAperh;
  k6 = 0.33 perh;
  k7 = 1e-15 perh;
  k8 = 0.007 perh;
  k9 = 0.187 perh;
  k10 = 0.024 ugDNAperh;
  k11 = 0.111 perh;
  k12 = 0.098 perh;
  k13 = 0.204 perh;
  k14 = 1e-15 perh;
  k15 = 0.061 perh;
  k16 = 1e-15 perh;
  k17 = 3.116 perh;
  k18 = 0.054 perh;
  k19 = 0.029 perh;
  k20 = 0.014 perh;
  k21 = 0.034 perh;
  k22 = 0.116 perh;
  DNA = 1 ug;
  DGperDNA = 1 pmolperugDNA;
  onepmol = 1 pmol;
  t0 = 0 time;
  t1 = 0.5 time;
  t2 = 1 time;
  t3 = 2 time;
  t4 = 4 time;
  t5 = 8 time;
  t6 = 12 time;
  timevalue has time;
  zero = 0 dimensionless;
  LPSactivity has dimensionless;
  LPSslope = 0 perh;
  LPSint = 0 dimensionless;
  LPSslopezero = 2 perh;
  LPSslope1 = -0.6667 perh;
  LPSslope3 = 0 perh;
  LPSintzero = 0 dimensionless;
  LPSint1 = 1.3335 dimensionless;
  LPSint3 = 0 dimensionless;
  DGactivity has dimensionless;
  DGint = 1 dimensionless;
  DGslope = 1 perh;
  DGslopezero = 0.3014 perh;
  DGslope1 = -0.1572 perh;
  DGslope2 = 0.0439 perh;
  DGslope3 = -0.0913 perh;
  DGslope4 = 0.0976 perh;
  DGslope5 = 0.0711 perh;
  DGslope6 = 0.0846 perh;
  DGintzero = 1 dimensionless;
  DGint1 = 1.2292 dimensionless;
  DGint2 = 1.0282 dimensionless;
  DGint3 = 1.2987 dimensionless;
  DGint4 = 0.543 dimensionless;
  DGint5 = 0.7549 dimensionless;
  DGint6 = 0.5927 dimensionless;
  GPChoratio has dimensionless;
  GPChoint = 315.3137 pmol;
  GPChoslope = -158.43 pmolperh;
  GPChoslopezero = -158.43 pmolperh;
  GPChoslope1 = 112.28 pmolperh;
  GPChoslope2 = 24.31 pmolperh;
  GPChoslope3 = -39.93 pmolperh;
  GPChoslope4 = 5.48 pmolperh;
  GPChoslope5 = 27.08 pmolperh;
  GPChoslope6 = -4.874 pmolperh;
  GPChointzero = 315.3137 pmol;
  GPChoint1 = 179.96 pmol;
  GPChoint2 = 267.93 pmol;
  GPChoint3 = 396.41 pmol;
  GPChoint4 = 214.77 pmol;
  GPChoint5 = 41.93 pmol;
  GPChoint6 = 425.43 pmol;

  // Assignment rules:
  timevalue := time + t0;
  LPSactivity := activitycalc(timevalue, LPSslope, LPSint);
  DGactivity := activitycalc(timevalue, DGslope, DGint);
  GPChoratio := activitycalc(timevalue, GPChoslope, GPChoint)/GPChointzero;

  // Reactions:
  r2: $FA => AA; k2*FA;
  r3: DG => AA; k3*DGactivity*DGperDNA*DNA;
  r7: GPCho => AA; k7*GPChoratio*GPCho;
  r5: GPCho => AA; k5*DGactivity*GPChoratio*GPCho/DNA;  // modifiers: DG
  r11: AA => PGH2; k11*AA;  // modifiers: LPS
  r10: AA => PGH2; k10*DGactivity*AA/DNA;  // modifiers: DG
  r8: AA => HETE; k8*AA;
  r4: AA => ; k4*AA;
  r9: HETE => ; k9*HETE;
  r13: PGH2 => PGE2; k13*PGH2;
  r14: PGE2 => ; k14*PGE2;
  r15: PGH2 => PGF2a; k15*PGH2;
  r16: PGF2a => ; k16*PGF2a;
  r17: PGH2 => PGD2; k17*PGH2;
  r18: PGD2 => PGJ2; k18*PGD2;
  r19: PGD2 => dPGD2; k19*PGD2;
  r20: dPGD2 => ; k20*dPGD2;
  r21: PGJ2 => dPGJ2; k21*PGJ2;
  r22: dPGJ2 => ; k22*dPGJ2;
  r1: $FA => AA; k1*onepmol*LPSactivity;  // modifiers: LPS
  r6: GPCho => AA; k6*GPCho*GPChoratio*LPSactivity;  // modifiers: LPS
  r12: AA => PGH2; k12*AA*LPSactivity;

  // Events:
  at (timevalue > t0): LPSint = LPSintzero, LPSslope = LPSslopezero, DGint = DGintzero, DGslope = DGslopezero, GPChoint = GPChointzero, GPChoslope = GPChoslopezero;
  at (timevalue >= t1): LPSint = LPSint1, LPSslope = LPSslope1, DGint = DGint1, DGslope = DGslope1, GPChoint = GPChoint1, GPChoslope = GPChoslope1;
  at (timevalue >= t2): DGint = DGint2, DGslope = DGslope2, GPChoint = GPChoint2, GPChoslope = GPChoslope2;
  at (timevalue >= t3): LPSint = LPSint3, LPSslope = LPSslope3, DGint = DGint3, DGslope = DGslope3, GPChoint = GPChoint3, GPChoslope = GPChoslope3;
  at (timevalue >= t4): DGint = DGint4, DGslope = DGslope4, GPChoint = GPChoint4, GPChoslope = GPChoslope4;
  at (timevalue >= t5): DGint = DGint5, DGslope = DGslope5, GPChoint = GPChoint5, GPChoslope = GPChoslope5;
  at (timevalue >= t6): DGint = DGint6, DGslope = DGslope6, GPChoint = GPChoint6, GPChoslope = GPChoslope6;

  // Unit definitions:
  unit time = 3600 second;
  unit perh = 1 / (2.778e-4 second);
  unit pmolperugDNA = 1e-12 mole / (1e-6 gram);
  unit ug = 1e-6 gram;
  unit pmol = 1e-12 mole;
  unit pmolperh = 1e-12 mole / (2.778e-4 second);
  unit ugDNAperh = 1e-6 gram / (3600 second);
end
