// SBML level 2 version 4

function Function_for_re2(GnRH_R_a, default, k_inact_GR)
  k_inact_GR*GnRH_R_a*default/default;
end

function Function_for_re3(GnRH_R_i, default, k_act_GR)
  k_act_GR*GnRH_R_i*default/default;
end

function Function_for_re4(R_GnRH_i, default, k_recy_RG)
  k_recy_RG*R_GnRH_i*default/default;
end

function Function_for_re5(R_GnRH_a, default, k_inter_RG)
  k_inter_RG*R_GnRH_a*default/default;
end

function Function_for_re6(GnRH_R_i, default, k_diss_GRi)
  k_diss_GRi*GnRH_R_i*default/default;
end

function Function_for_re8(GnRH, R_GnRH_a, default, k_on_G)
  k_on_G*GnRH*default*R_GnRH_a*default/default;
end

function Function_for_re11(R_GnRH_i, default, k_degr_RG)
  k_degr_RG*R_GnRH_i*default/default;
end

function Function_for_re15(GnRH_R_a, default, k_off_G)
  k_off_G*GnRH_R_a*default/default;
end

function Function_for_re24(GnRH, default, k_degr_G)
  k_degr_G*GnRH*default/default;
end

function Function_for_re25(E2, P4, default, facE2, facP4, b_syn_LH, k_E2_LH, T_E2_LH, T_P4_LH, n_E2_LH, n_P4_LH)
  (b_syn_LH + k_E2_LH*(E2*default/(T_E2_LH*facE2))^n_E2_LH/(1 + (E2*default/(T_E2_LH*facE2))^n_E2_LH))/(1 + (P4*default/(T_P4_LH*facP4))^n_P4_LH)/default;
end

function Function_for_re26(InhA_delay, InhB, default, freq, T_freq_FSH, n_freq_FSH, k_Ih_FSH, T_IhA, T_IhB, n_IhA, n_IhB)
  k_Ih_FSH/(1 + (InhA_delay*default/T_IhA)^n_IhA + (InhB*default/T_IhB)^n_IhB)*1/(1 + (freq/T_freq_FSH)^n_freq_FSH)/default;
end

function Function_for_re28(Ago_R_a, GnRH_R_a, LH_Pit, default, b_rel_LH, k_GR_LH, T_GR_LH, n_GR_LH)
  (b_rel_LH + k_GR_LH*((GnRH_R_a*default + Ago_R_a*default)/T_GR_LH)^n_GR_LH/(1 + ((GnRH_R_a*default + Ago_R_a*default)/T_GR_LH)^n_GR_LH))*LH_Pit*default/default;
end

function Function_for_re29(Ago_R_a, FSH_pit, GnRH_R_a, default, b_rel_FSH, T_GR_FSH, n_GR_FSH, k_GR_FSH)
  (b_rel_FSH + k_GR_FSH*((GnRH_R_a*default + Ago_R_a*default)/T_GR_FSH)^n_GR_FSH/(1 + ((GnRH_R_a*default + Ago_R_a*default)/T_GR_FSH)^n_GR_FSH))*FSH_pit*default/default;
end

function Function_for_re35(LH_bld, R_LH, default, facLH, k_on_LH)
  k_on_LH/facLH*LH_bld*default*R_LH*default/default;
end

function Function_for_re36(LH_R, default, k_des_LH)
  k_des_LH*LH_R*default/default;
end

function Function_for_re37(R_LH_des, default, k_recy_LH)
  k_recy_LH*R_LH_des*default/default;
end

function Function_for_re38(LH_bld, default, k_cl_LH)
  k_cl_LH*LH_bld*default/default;
end

function Function_for_re39(FSH_R, default, k_des_FSH)
  k_des_FSH*FSH_R*default/default;
end

function Function_for_re40(R_FSH_des, default, k_recy_FSH)
  k_recy_FSH*R_FSH_des*default/default;
end

function Function_for_re42(AF1, FSH_R, default, k_AF1_AF2)
  k_AF1_AF2*FSH_R*default*AF1*default/default;
end

function Function_for_re43(FSH_R, default, n_FSHR_AF1, T_FSHR_AF1, k_AF1)
  k_AF1*(FSH_R*default/T_FSHR_AF1)^n_FSHR_AF1/(1 + (FSH_R*default/T_FSHR_AF1)^n_FSHR_AF1)/default;
end

function Function_for_re44(AF2, LH_R, R_Foll, default, n_AF2_AF3, k_AF2_AF3, SF_LHR)
  k_AF2_AF3*(LH_R*default/SF_LHR)^n_AF2_AF3*R_Foll*default*AF2*default/default;
end

function Function_for_re45(AF3, LH_R, R_Foll, default, k_AF3_AF4, n_AF3_AF4, SF_LHR)
  k_AF3_AF4*(LH_R*default/SF_LHR)^n_AF3_AF4*R_Foll*default*AF3*default/default;
end

function Function_for_re46(AF4, LH_R, R_Foll, default, k_AF4_PrF, SF_LHR)
  k_AF4_PrF*LH_R*default/SF_LHR*R_Foll*default*AF4*default/default;
end

function Function_for_re49(Sc1, default, k_Sc1_Sc2)
  k_Sc1_Sc2*Sc1*default/default;
end

function Function_for_re50(Sc2, default, k_Sc2_Lut1)
  k_Sc2_Lut1*Sc2*default/default;
end

function Function_for_re51(Ago_R_a, GnRH_R_a, Lut1, default, k_Lut1_Lut2, m_GR_Lut, T_GR_Lut, n_GR_Lut)
  k_Lut1_Lut2*(1 + m_GR_Lut*((GnRH_R_a*default + Ago_R_a*default)/T_GR_Lut)^n_GR_Lut/(1 + ((GnRH_R_a*default + Ago_R_a*default)/T_GR_Lut)^n_GR_Lut))*Lut1*default/default;
end

function Function_for_re52(Ago_R_a, GnRH_R_a, Lut2, default, k_Lut2_Lut3, m_GR_Lut, T_GR_Lut, n_GR_Lut)
  k_Lut2_Lut3*(1 + m_GR_Lut*((GnRH_R_a*default + Ago_R_a*default)/T_GR_Lut)^n_GR_Lut/(1 + ((GnRH_R_a*default + Ago_R_a*default)/T_GR_Lut)^n_GR_Lut))*Lut2*default/default;
end

function Function_for_re53(Ago_R_a, GnRH_R_a, Lut3, default, k_Lut3_Lut4, m_GR_Lut, T_GR_Lut, n_GR_Lut)
  k_Lut3_Lut4*(1 + m_GR_Lut*((GnRH_R_a*default + Ago_R_a*default)/T_GR_Lut)^n_GR_Lut/(1 + ((GnRH_R_a*default + Ago_R_a*default)/T_GR_Lut)^n_GR_Lut))*Lut3*default/default;
end

function Function_for_re54(FSH_bld, default, T_FSH_s, n_FSH_s, k_s)
  k_s*(FSH_bld*default/T_FSH_s)^n_FSH_s/(1 + (FSH_bld*default/T_FSH_s)^n_FSH_s)/default;
end

function Function_for_re56(P4, R_Foll, default, facP4, T_P4_s, n_P4_s, k_cl_s)
  k_cl_s*(P4*default/(T_P4_s*facP4))^n_P4_s/(1 + (P4*default/(T_P4_s*facP4))^n_P4_s)*R_Foll*default/default;
end

function Function_for_re57(AF3, FSH_R, default, k_AF3_AF3, SeF_max)
  k_AF3_AF3*FSH_R*default*AF3*default*(1 - AF3*default/SeF_max)/default;
end

function Function_for_re58(AF4, LH_R, default, k_A42_AF4, n_AF4, SF_LHR, SeF_max)
  k_A42_AF4*(LH_R*default/SF_LHR)^n_AF4*AF4*default*(1 - AF4*default/SeF_max)/default;
end

function Function_for_re59(LH_R, PrF, R_Foll, default, k_cl_PrF, n_OvF, SF_LHR)
  k_cl_PrF*(LH_R*default/SF_LHR)^n_OvF*R_Foll*default*PrF*default/default;
end

function Function_for_re60(LH_R, PrF, R_Foll, default, k_OvF, n_OvF, SF_LHR, T_PrF_OvF, n_PrF_OvF)
  k_OvF*R_Foll*default*(LH_R*default/SF_LHR)^n_OvF*(PrF*default/T_PrF_OvF)^n_PrF_OvF/(1 + (PrF*default/T_PrF_OvF)^n_PrF_OvF)/default;
end

function Function_for_re61(OvF, default, k_cl_OvF)
  k_cl_OvF*OvF*default/default;
end

function Function_for_re62(OvF, default, k_Sc1, T_OvF_Sc1, n_OvF_Sc1)
  k_Sc1*(OvF*default/T_OvF_Sc1)^n_OvF_Sc1/(1 + (OvF*default/T_OvF_Sc1)^n_OvF_Sc1)/default;
end

function Function_for_re65(AF2, AF3, AF4, LH_bld, Lut1, Lut4, PrF, default, facE2, k_AF2_E2, b_E2, k_AF3_E2, k_AF4_E2, k_PrF_E2, k_Lut1_E2, k_Lut4_E2)
  facE2*(b_E2 + k_AF2_E2*AF2*default + k_AF3_E2*AF3*default*LH_bld*default + k_AF4_E2*AF4*default + k_PrF_E2*PrF*default*LH_bld*default + k_Lut1_E2*Lut1*default + k_Lut4_E2*Lut4*default)/default;
end

function Function_for_re64(Ago_R_a, GnRH_R_a, Lut4, default, k_cl_Lut4, m_GR_Lut, T_GR_Lut, n_GR_Lut)
  k_cl_Lut4*(1 + m_GR_Lut*((GnRH_R_a*default + Ago_R_a*default)/T_GR_Lut)^n_GR_Lut/(1 + ((GnRH_R_a*default + Ago_R_a*default)/T_GR_Lut)^n_GR_Lut))*Lut4*default/default;
end

function Function_for_re66(E2, default, k_cl_E2)
  k_cl_E2*E2*default/default;
end

function Function_for_re67(Lut4, default, facP4, b_P4, k_Lut4_P4)
  facP4*(b_P4 + k_Lut4_P4*Lut4*default)/default;
end

function Function_for_re69(Lut1, Lut2, Lut3, Lut4, PrF, Sc1, default, b_IhA, k_PrF_IhA, k_Lut2_IhA, k_Lut3_IhA, k_Lut4_IhA, k_Sc1_IhA, k_Lut1_IhA)
  (b_IhA + k_PrF_IhA*PrF*default + k_Sc1_IhA*Sc1*default + k_Lut1_IhA*Lut1*default + k_Lut2_IhA*Lut2*default + k_Lut3_IhA*Lut3*default + k_Lut4_IhA*Lut4*default)/default;
end

function Function_for_re71(P4, default, k_cl_P4)
  k_cl_P4*P4*default/default;
end

function Function_for_re72(AF2, Sc2, default, b_IhB, k_AF2_IhB, k_Sc2_IhB)
  (b_IhB + k_AF2_IhB*AF2*default + k_Sc2_IhB*Sc2*default)/default;
end

function Function_for_re73(InhB, default, k_cl_IhB)
  k_cl_IhB*InhB*default/default;
end

function Function_for_re74(InhA_delay, default, k_cl_IhAe)
  k_cl_IhAe*InhA_delay*default/default;
end

function Function_for_re75(default, k_syn_RG)
  k_syn_RG/default;
end

function Function_for_re76(GnRH_R_i, default, k_degr_GRi)
  k_degr_GRi*GnRH_R_i*default/default;
end

function Function_for_re78(default, freq, mass)
  freq*mass/default;
end

function Function_for_re82(FSH_bld, default, k_cl_FSH)
  k_cl_FSH*FSH_bld*default/default;
end

function Function_for_re83(Ago_R_a, GnRH_R_a, LH_Pit, default, facLH, V_blood, b_rel_LH, k_GR_LH, T_GR_LH, n_GR_LH)
  facLH/V_blood*(b_rel_LH + k_GR_LH*((GnRH_R_a*default + Ago_R_a*default)/T_GR_LH)^n_GR_LH/(1 + ((GnRH_R_a*default + Ago_R_a*default)/T_GR_LH)^n_GR_LH))*LH_Pit*default/default;
end

function Function_for_re84(Ago_R_a, FSH_pit, GnRH_R_a, default, facFSH, V_blood, b_rel_FSH, T_GR_FSH, n_GR_FSH, k_GR_FSH)
  facFSH/V_blood*(b_rel_FSH + k_GR_FSH*((GnRH_R_a*default + Ago_R_a*default)/T_GR_FSH)^n_GR_FSH/(1 + ((GnRH_R_a*default + Ago_R_a*default)/T_GR_FSH)^n_GR_FSH))*FSH_pit*default/default;
end

function Function_for_re85(FSH_bld, R_FSH, default, facFSH, k_on_FSH)
  k_on_FSH/facFSH*FSH_bld*default*R_FSH*default/default;
end

function Function_for_re87(InhA, default, k_IhA)
  k_IhA*InhA*default/default;
end

function Function_for_re90(Ago_c, default, cl_Ago)
  cl_Ago*Ago_c*default/default;
end

function Function_for_re93(Ago_R_a, default, k_inact_AgoR)
  k_inact_AgoR*Ago_R_a*default/default;
end

function Function_for_re94(Ago_R_i, default, k_act_AgoR)
  k_act_AgoR*Ago_R_i*default/default;
end

function Function_for_re95(Ago_R_i, default, k_degr_AgoR)
  k_degr_AgoR*Ago_R_i*default/default;
end

function Function_for_re97(Ago_c, R_GnRH_a, default, k_on_Ago)
  k_on_Ago*R_GnRH_a*default*Ago_c*default/default;
end

function Function_for_re98(Ago_R_a, default, k_off_Ago)
  k_off_Ago*Ago_R_a*default/default;
end

function Function_for_re99(Ago_R_i, default, k_diss_AgoR)
  k_diss_AgoR*Ago_R_i*default/default;
end

function Function_for_re100(Ago_d, default, k_A_Ago)
  k_A_Ago*Ago_d*default/default;
end

function Function_for_re101(Ago_d, default, V_c_F_Ago, k_A_Ago)
  k_A_Ago/V_c_F_Ago*Ago_d*default/default;
end

function Function_for_re102(Ant_d, default, k_A_Ant)
  k_A_Ant*Ant_d/default;
end

function Function_for_re103(Ant_d, default, V_c_F_Ant, k_A_Ant)
  k_A_Ant/V_c_F_Ant*Ant_d/default;
end

function Function_for_re104(Ant_c, default, cl_Ant)
  cl_Ant*Ant_c/default;
end

function Function_for_re105(Ant_R, default, k_off_Ant)
  k_off_Ant*Ant_R/default;
end

function Function_for_re106(Ant_c, R_GnRH_a, default, k_on_ant)
  k_on_ant*R_GnRH_a*default*Ant_c/default;
end

function Function_for_re107(Ant_R, default, k_degr_Ant)
  k_degr_Ant*Ant_R/default;
end

function Function_for_re108(Ant_c, default, k_cp_Ant)
  k_cp_Ant*Ant_c/default;
end

function Function_for_re109(Ant_p, default, k_pc_Ant)
  k_pc_Ant*Ant_p/default;
end

model MODEL1311220000()
  // Roblitz2013 - Menstrual Cycle following GnRH analogue administration
  // The model describes the menstrual cycle feedback mechanisms. GnRH, FSH, LH, E2, P4, inbibins A and B, and follicular development are modelled. The model predicts hormonal changes following GnRH analogue administration. Simulation results agree with measurements of hormone blood concentrations. The model gives insight into mechanisms underlying gonadotropin supression.
  // This model is described in the article:
  // A mathematical model of the human menstrual cycle for the administration of GnRH analogues.
  // Röblitz S, Stötzel C, Deuflhard P, Jones HM, Azulay DO, van der Graaf PH, Martin SW.
  // J. Theor. Biol. 2013 Mar; 321: 8-27
  // Abstract:
  // The paper presents a differential equation model for the feedback mechanisms between gonadotropin-releasing hormone (GnRH), follicle-stimulating hormone (FSH), luteinizing hormone (LH), development of follicles and corpus luteum, and the production of estradiol (E2), progesterone (P4), inhibin A (IhA), and inhibin B (IhB) during the female menstrual cycle. Compared to earlier human cycle models, there are three important differences: The model presented here (a) does not involve any delay equations, (b) is based on a deterministic modeling of the GnRH pulse pattern, and (c) contains less differential equations and less parameters. These differences allow for a faster simulation and parameter identification. The focus is on modeling GnRH-receptor binding, in particular, by inclusion of a pharmacokinetic/pharmacodynamic (PK/PD) model for a GnRH agonist, Nafarelin, and a GnRH antagonist, Cetrorelix, into the menstrual cycle model. The final mathematical model describes the hormone profiles (LH, FSH, P4, E2) throughout the menstrual cycle of 12 healthy women. It correctly predicts hormonal changes following single and multiple dose administration of Nafarelin or Cetrorelix at different stages in the cycle.
  // This model is hosted on BioModels Database and identified by: BIOMD0000000494 .
  // To cite BioModels Database, please use: BioModels Database: An enhanced, curated and annotated resource for published quantitative kinetic models .
  // To the extent possible under law, all copyright and related or neighbouring rights to this encoded model have been dedicated to the public domain worldwide. Please refer to CC0 Public Domain Dedication for more information.
  // biomodels.db:MODEL1311220000
  // biomodels.db:BIOMD0000000494
  // isDescribedBy pubmed:23206386
  // hasProperty mamo:MAMO_0000046
  // isVersionOf GO:0042698 GO:0097210
  // hasTaxon taxonomy:40674 efo:0001265

  // Compartments:
  compartment default = 1;  // isVersionOf BTO:0000083

  // Species:
  species AF1 in default = 2.26;  // isVersionOf BTO:0000389
  species AF2 in default = 19.92;  // isVersionOf BTO:0000389
  species E2 in default = 45;  // isVersionOf CHEBI:16469; occursIn BTO:0000089
  species FSH_R in default = 0.662;  // hasPart uniprot:P23945 uniprot:P01215
  species FSH_bld in default = 4.1;  // isVersionOf uniprot:P01215; occursIn BTO:0000089
  species FSH_pit in default = 4.86272e4;  // occursIn BTO:0001073; isVersionOf uniprot:P01215
  species GnRH in default = 0.00326;  // isVersionOf uniprot:P01148
  species GnRH_R_a in default = 1.447e-5; GnRH_R_a is "GnRH_R-a";  // isVersionOf uniprot:P30968
  species GnRH_R_i in default = 1.294e-5; GnRH_R_i is "GnRH_R-i";  // isVersionOf uniprot:P30968
  species InhA in default = 1.07;  // isVersionOf uniprot:P08476; occursIn BTO:0000089
  species InhA_delay in default = 86.84;  // isVersionOf uniprot:P08476
  species InhB in default = 52.18;  // isVersionOf uniprot:P09529; occursIn BTO:0000089
  species LH_Pit in default = 261119;  // isVersionOf uniprot:P01229; occursIn BTO:0001073
  species LH_R in default = 0.263;  // hasPart uniprot:P22888 uniprot:P01229
  species LH_bld in default = 2.667;  // occursIn BTO:0000089; isVersionOf uniprot:P01229
  species Lut1 in default = 2.762e-5;  // isVersionOf BTO:0000292
  species Lut2 in default = 0.0003772;  // isVersionOf BTO:0000292
  species Lut3 in default = 0.00334;  // isVersionOf BTO:0000292
  species Lut4 in default = 0.01385;  // isVersionOf BTO:0000292
  species OvF in default = 7.652e-19;  // hasProperty GO:0003003
  species P4 in default = 2.41;  // isVersionOf CHEBI:17026; occursIn BTO:0000089
  species PrF in default = 0.244;  // hasProperty GO:0003003
  species R_FSH in default = 6.341;  // isVersionOf uniprot:P23945
  species R_FSH_des in default = 1.497;  // hasProperty GO:0031623; isVersionOf uniprot:P23945
  species R_Foll in default = 0.119;
  species R_GnRH_a in default = 0.00928; R_GnRH_a is "R_GnRH-a";  // isVersionOf uniprot:P30968
  species R_GnRH_i in default = 0.0009409; R_GnRH_i is "R_GnRH-i";  // isVersionOf uniprot:P30968
  species R_LH in default = 8.41;  // isVersionOf uniprot:P22888
  species R_LH_des in default = 0.699;  // isVersionOf uniprot:P22888; hasProperty GO:0031623
  species $csa1_degraded in default = 1;
  species $s33 in default = 1;
  species $s38 in default = 1;
  species $s62 in default = 1;
  species $s64 in default = 1;
  species $s66 in default = 1;
  species $s67 in default = 1;
  species $s69 in default = 1;
  species $s71 in default = 1;
  species $s72 in default = 1;
  species $s74 in default = 1;
  species $s76 in default = 1;
  species $s78 in default = 1;
  species $s82 in default = 1;
  species $s85 in default = 1;
  species $s87 in default = 1;
  species $s92 in default = 1;
  species $s93 in default = 1;
  species $s94 in default = 1;
  species $s95 in default = 1;
  species $sa1_degraded in default = 1;
  species $sa28_degraded in default = 1;
  species $sa31_degraded in default = 1;
  species $sa35_degraded in default = 1;
  species $sa3_degraded in default = 1;
  species $sa52_degraded in default = 1;
  species $sa53_degraded in default = 1;
  species $sa61_degraded in default = 1;
  species $sa75_degraded in default = 1;
  species $sa78_degraded in default = 1;
  species $sa86_degraded in default = 1;
  species Sc1 in default = 1.098e-8;
  species Sc2 in default = 2.171e-6;
  species AF3 in default = 0.504;  // isVersionOf BTO:0000389
  species AF4 in default = 1.604e-5;  // isVersionOf BTO:0000389
  // GnRH agonist in central compartment
  species Ago_c in default = 0;  // isVersionOf CHEBI:63533
  // GnRH agonist in dosing compartment
  species Ago_d in default = 0;  // isVersionOf CHEBI:63533
  species $s102 in default = 1;
  species $s106 in default = 1;
  species $s108 in default = 1;
  species $s107 in default = 1;
  species Ago_R_i in default = 0; Ago_R_i is "Ago_R-i";  // hasPart CHEBI:63533 uniprot:P30968
  species Ago_R_a in default = 0; Ago_R_a is "Ago_R-a";  // hasPart CHEBI:63533 uniprot:P30968
  // GnRH antagonist in dosing compartment
  species Ant_d in default = 0;  // isVersionOf CHEBI:59229
  // GnRH antagonist in central compartment
  species Ant_c in default = 0;  // isVersionOf CHEBI:59229
  // GnRH antagonist in peripheral compartment
  species Ant_p in default = 0;  // isVersionOf CHEBI:59229
  species Ant_R in default = 0;  // hasPart CHEBI:59229 uniprot:P30968
  species s113 in default = 0;
  species s114 in default = 0;
  species s115 in default = 0;
  species s116 in default = 0;

  // Parameters:
  b_syn_LH = 7309.916;
  k_E2_LH = 7309.916;
  k_AF2_IhB = 447.4673;
  b_IhB = 89.49347;
  T_E2_LH = 192.2041;
  T_P4_LH = 2.3708;
  n_E2_LH = 10;
  n_P4_LH = 1;
  k_Sc2_IhB = 134240.2;
  k_AF2_E2 = 2.094505;
  b_E2 = 51.55808;
  k_AF3_E2 = 9.28;
  k_AF4_E2 = 3480.27;
  k_PrF_E2 = 0.972;
  k_Lut1_E2 = 1713.71;
  k_Lut4_E2 = 8675.139;
  k_cl_E2 = 5.23501;
  b_IhA = 1.44523;
  k_PrF_IhA = 2.284947;
  k_Lut2_IhA = 28.21103;
  k_Lut3_IhA = 216.85;
  k_Lut4_IhA = 114.2474;
  k_Sc1_IhA = 60;
  k_Lut1_IhA = 180;
  b_P4 = 0.9426347;
  k_Lut4_P4 = 761.6431;
  k_cl_P4 = 5.129587;
  a_0 = 0.005593;
  T_P4_freq = 1.2;
  n_P4_freq = 2;
  T_E2_freq = 220;
  n_E2_freq = 10;
  T_E2_mass_1 = 220;
  n_E2_mass_1 = 2;
  T_E2_mass_2 = 9.6;
  n_E2_mass_2 = 1;
  V_blood = 5;
  k_degr_G = 0.4474673;
  k_cl_IhAe = 0.1989;
  k_Ih_FSH = 22129.05;
  T_IhA = 95.81;
  T_IhB = 70;
  n_IhA = 5;
  n_IhB = 2;
  T_freq_FSH = 10;
  n_freq_FSH = 3;
  T_GR_LH = 0.0003;
  n_GR_LH = 5;
  b_rel_LH = 0.004760247;
  k_GR_LH = 0.1904152;
  k_on_G = 322.1765;
  k_recy_RG = 32.21765;
  k_inter_RG = 3.221765;
  k_degr_RG = 0.08949347;
  k_syn_RG = 8.949347e-5;
  k_off_G = 644.353;
  k_inact_GR = 32.21765;
  k_act_GR = 3.222;
  k_diss_GRi = 32.21765;
  k_cl_LH = 74.85055;
  k_on_LH = 2.143011;
  k_des_LH = 183.3632;
  k_recy_LH = 68.94935;
  b_rel_FSH = 0.05698944;
  k_GR_FSH = 0.2720154;
  T_GR_FSH = 0.0003;
  n_GR_FSH = 2;
  k_on_FSH = 3.528906;
  k_recy_FSH = 61.02917;
  k_des_FSH = 138.3032;
  k_s = 0.2186057;
  T_FSH_s = 3;
  n_FSH_s = 5;
  k_cl_s = 1.34267;
  T_P4_s = 1.2348;
  n_P4_s = 5;
  k_AF1 = 3.661804;
  T_FSHR_AF1 = 0.608121;
  n_FSHR_AF1 = 3;
  k_AF1_AF2 = 1.220601;
  k_AF2_AF3 = 4.882316;
  SF_LHR = 2.7262;
  n_AF2_AF3 = 3.68896;
  k_AF3_AF4 = 122.0601;
  n_AF3_AF4 = 5;
  k_AF3_AF3 = 0.1220601;
  SeF_max = 10;
  k_A42_AF4 = 12.20601;
  n_AF4 = 2;
  k_AF4_PrF = 332.7546;
  k_cl_PrF = 122.0601;
  n_OvF = 6;
  k_OvF = 7.984339;
  T_PrF_OvF = 3;
  n_PrF_OvF = 10;
  k_cl_OvF = 12.20601;
  k_Sc1 = 1.208341;
  T_OvF_Sc1 = 0.02;
  n_OvF_Sc1 = 10;
  k_Sc1_Sc2 = 1.220601;
  k_Sc2_Lut1 = 0.9581171;
  k_Lut1_Lut2 = 0.924736;
  T_GR_Lut = 0.0008;
  n_GR_Lut = 5;
  k_Lut2_Lut3 = 0.7567657;
  k_Lut3_Lut4 = 0.6102917;
  k_cl_Lut4 = 0.5428405;
  k_IhA = 4.287185;
  k_cl_IhB = 172.4539;
  k_degr_GRi = 0.008949347;
  k_cl_FSH = 114.2474;
  m_GR_Lut = 20;
  facE2 = 1;
  facP4 = 1;
  facLH = 1;
  facFSH = 1;
  f_0 = 16;
  m_E2_freq = 1;
  k_A_Ago = 54.2;
  cl_Ago = 2.65;
  V_c_F_Ago = 38.12;
  k_off_Ago = 644.35;
  k_on_Ago = 322.18;
  k_degr_AgoR = 0.009;
  k_diss_AgoR = 32.22;
  k_inact_AgoR = 32.22;
  k_act_AgoR = 3.22;
  t_0_Ago = 91;
  dose_Ago = 100;
  k_on_ant = 322.18;
  k_off_Ant = 644.35;
  k_degr_Ant = 0.009;
  k_A_Ant = 45.56;
  cl_Ant = 5;
  V_c_F_Ant = 34.9;
  k_cp_Ant = 3.216;
  k_pc_Ant = 4.76;
  t_0_Ant = 34;
  dose_Ant = 500;

  // Assignment rules:
  freq := f_0/(1 + (P4*m_E2_freq*default/n_P4_LH/(T_P4_freq*facP4))^n_P4_freq)*(1 + m_E2_freq*(E2*m_E2_freq*default/n_P4_LH/(T_E2_freq*facE2))^n_E2_freq/(1 + (E2*m_E2_freq*default/n_P4_LH/(T_E2_freq*facE2))^n_E2_freq));
  mass := a_0*((E2*m_E2_freq*default/n_P4_LH/(T_E2_mass_1*facE2))^n_E2_mass_1/(1 + (E2*m_E2_freq*default/n_P4_LH/(T_E2_mass_1*facE2))^n_E2_mass_1) + 1/(1 + (E2*m_E2_freq*default/n_P4_LH/(T_E2_mass_2*facE2))^n_E2_mass_2));

  // Reactions:
  re2: GnRH_R_a => GnRH_R_i; default*Function_for_re2(GnRH_R_a, default, k_inact_GR);
  re3: GnRH_R_i => GnRH_R_a; default*Function_for_re3(GnRH_R_i, default, k_act_GR);
  re4: R_GnRH_i => R_GnRH_a; default*Function_for_re4(R_GnRH_i, default, k_recy_RG);
  re5: R_GnRH_a => R_GnRH_i; default*Function_for_re5(R_GnRH_a, default, k_inter_RG);
  re6: GnRH_R_i => R_GnRH_i; default*Function_for_re6(GnRH_R_i, default, k_diss_GRi);
  re8: GnRH + R_GnRH_a => GnRH_R_a; default*Function_for_re8(GnRH, R_GnRH_a, default, k_on_G);
  re11: R_GnRH_i => $sa1_degraded; default*Function_for_re11(R_GnRH_i, default, k_degr_RG);
  re15: GnRH_R_a => GnRH + R_GnRH_a; default*Function_for_re15(GnRH_R_a, default, k_off_G);
  re24: GnRH => $sa3_degraded; default*Function_for_re24(GnRH, default, k_degr_G);
  re25: $s33 => LH_Pit; default*Function_for_re25(E2, P4, default, facE2, facP4, b_syn_LH, k_E2_LH, T_E2_LH, T_P4_LH, n_E2_LH, n_P4_LH);  // modifiers: E2, P4
  re26: $s38 => FSH_pit; default*Function_for_re26(InhA_delay, InhB, default, freq, T_freq_FSH, n_freq_FSH, k_Ih_FSH, T_IhA, T_IhB, n_IhA, n_IhB);  // modifiers: InhA_delay, InhB
  re28: LH_Pit => $s92; default*Function_for_re28(Ago_R_a, GnRH_R_a, LH_Pit, default, b_rel_LH, k_GR_LH, T_GR_LH, n_GR_LH);  // modifiers: GnRH_R_a, Ago_R_a
  re29: FSH_pit => $s94; default*Function_for_re29(Ago_R_a, FSH_pit, GnRH_R_a, default, b_rel_FSH, T_GR_FSH, n_GR_FSH, k_GR_FSH);  // modifiers: GnRH_R_a, Ago_R_a
  re35: LH_bld + R_LH => LH_R; default*Function_for_re35(LH_bld, R_LH, default, facLH, k_on_LH);
  re36: LH_R => R_LH_des; default*Function_for_re36(LH_R, default, k_des_LH);
  re37: R_LH_des => R_LH; default*Function_for_re37(R_LH_des, default, k_recy_LH);
  re38: LH_bld => $sa28_degraded; default*Function_for_re38(LH_bld, default, k_cl_LH);
  re39: FSH_R => R_FSH_des; default*Function_for_re39(FSH_R, default, k_des_FSH);
  re40: R_FSH_des => R_FSH; default*Function_for_re40(R_FSH_des, default, k_recy_FSH);
  re42: AF1 => AF2; default*Function_for_re42(AF1, FSH_R, default, k_AF1_AF2);  // modifiers: FSH_R
  re43: $s62 => AF1; default*Function_for_re43(FSH_R, default, n_FSHR_AF1, T_FSHR_AF1, k_AF1);  // modifiers: FSH_R
  re44: AF2 => AF3; default*Function_for_re44(AF2, LH_R, R_Foll, default, n_AF2_AF3, k_AF2_AF3, SF_LHR);  // modifiers: LH_R, R_Foll
  re45: AF3 => AF4; default*Function_for_re45(AF3, LH_R, R_Foll, default, k_AF3_AF4, n_AF3_AF4, SF_LHR);  // modifiers: R_Foll, LH_R
  re46: AF4 => PrF; default*Function_for_re46(AF4, LH_R, R_Foll, default, k_AF4_PrF, SF_LHR);  // modifiers: LH_R, R_Foll
  re49: Sc1 => Sc2; default*Function_for_re49(Sc1, default, k_Sc1_Sc2);
  re50: Sc2 => Lut1; default*Function_for_re50(Sc2, default, k_Sc2_Lut1);
  re51: Lut1 => Lut2; default*Function_for_re51(Ago_R_a, GnRH_R_a, Lut1, default, k_Lut1_Lut2, m_GR_Lut, T_GR_Lut, n_GR_Lut);  // modifiers: GnRH_R_a, Ago_R_a
  re52: Lut2 => Lut3; default*Function_for_re52(Ago_R_a, GnRH_R_a, Lut2, default, k_Lut2_Lut3, m_GR_Lut, T_GR_Lut, n_GR_Lut);  // modifiers: GnRH_R_a, Ago_R_a
  re53: Lut3 => Lut4; default*Function_for_re53(Ago_R_a, GnRH_R_a, Lut3, default, k_Lut3_Lut4, m_GR_Lut, T_GR_Lut, n_GR_Lut);  // modifiers: GnRH_R_a, Ago_R_a
  re54: $s64 => R_Foll; default*Function_for_re54(FSH_bld, default, T_FSH_s, n_FSH_s, k_s);  // modifiers: FSH_bld
  re56: R_Foll => $sa61_degraded; default*Function_for_re56(P4, R_Foll, default, facP4, T_P4_s, n_P4_s, k_cl_s);  // modifiers: P4
  re57: $s66 => AF3; default*Function_for_re57(AF3, FSH_R, default, k_AF3_AF3, SeF_max);  // modifiers: FSH_R
  re58: $s67 => AF4; default*Function_for_re58(AF4, LH_R, default, k_A42_AF4, n_AF4, SF_LHR, SeF_max);  // modifiers: LH_R
  re59: PrF => $sa52_degraded; default*Function_for_re59(LH_R, PrF, R_Foll, default, k_cl_PrF, n_OvF, SF_LHR);  // modifiers: R_Foll, LH_R
  re60: $s69 => OvF; default*Function_for_re60(LH_R, PrF, R_Foll, default, k_OvF, n_OvF, SF_LHR, T_PrF_OvF, n_PrF_OvF);  // modifiers: R_Foll, LH_R, PrF
  re61: OvF => $sa53_degraded; default*Function_for_re61(OvF, default, k_cl_OvF);
  re62: $s71 => Sc1; default*Function_for_re62(OvF, default, k_Sc1, T_OvF_Sc1, n_OvF_Sc1);  // modifiers: OvF
  re64: Lut4 => $s72; default*Function_for_re64(Ago_R_a, GnRH_R_a, Lut4, default, k_cl_Lut4, m_GR_Lut, T_GR_Lut, n_GR_Lut);  // modifiers: GnRH_R_a, Ago_R_a
  re65: $s74 => E2; default*Function_for_re65(AF2, AF3, AF4, LH_bld, Lut1, Lut4, PrF, default, facE2, k_AF2_E2, b_E2, k_AF3_E2, k_AF4_E2, k_PrF_E2, k_Lut1_E2, k_Lut4_E2);  // modifiers: AF3, AF4, Lut1, Lut4, AF2, PrF, LH_bld
  re66: E2 => $sa75_degraded; default*Function_for_re66(E2, default, k_cl_E2);
  re67: $s76 => P4; default*Function_for_re67(Lut4, default, facP4, b_P4, k_Lut4_P4);  // modifiers: Lut4
  re69: $s78 => InhA; default*Function_for_re69(Lut1, Lut2, Lut3, Lut4, PrF, Sc1, default, b_IhA, k_PrF_IhA, k_Lut2_IhA, k_Lut3_IhA, k_Lut4_IhA, k_Sc1_IhA, k_Lut1_IhA);  // modifiers: PrF, Sc1, Lut1, Lut2, Lut3, Lut4
  re71: P4 => $sa78_degraded; default*Function_for_re71(P4, default, k_cl_P4);
  re72: $s82 => InhB; default*Function_for_re72(AF2, Sc2, default, b_IhB, k_AF2_IhB, k_Sc2_IhB);  // modifiers: AF2, Sc2
  re73: InhB => $sa86_degraded; default*Function_for_re73(InhB, default, k_cl_IhB);
  re74: InhA_delay => $sa35_degraded; default*Function_for_re74(InhA_delay, default, k_cl_IhAe);
  re75: $s85 => R_GnRH_i; default*Function_for_re75(default, k_syn_RG);
  re76: GnRH_R_i => $csa1_degraded; default*Function_for_re76(GnRH_R_i, default, k_degr_GRi);
  re78: $s87 => GnRH; default*Function_for_re78(default, freq, mass);  // modifiers: E2, P4
  re82: FSH_bld => $sa31_degraded; default*Function_for_re82(FSH_bld, default, k_cl_FSH);
  re83: $s93 => LH_bld; default*Function_for_re83(Ago_R_a, GnRH_R_a, LH_Pit, default, facLH, V_blood, b_rel_LH, k_GR_LH, T_GR_LH, n_GR_LH);  // modifiers: GnRH_R_a, LH_Pit, Ago_R_a
  re84: $s95 => FSH_bld; default*Function_for_re84(Ago_R_a, FSH_pit, GnRH_R_a, default, facFSH, V_blood, b_rel_FSH, T_GR_FSH, n_GR_FSH, k_GR_FSH);  // modifiers: GnRH_R_a, FSH_pit, Ago_R_a
  re85: FSH_bld + R_FSH => FSH_R; default*Function_for_re85(FSH_bld, R_FSH, default, facFSH, k_on_FSH);
  re87: InhA => InhA_delay; default*Function_for_re87(InhA, default, k_IhA);
  re90: Ago_c => $s102; default*Function_for_re90(Ago_c, default, cl_Ago);
  re93: Ago_R_a => Ago_R_i; default*Function_for_re93(Ago_R_a, default, k_inact_AgoR);
  re94: Ago_R_i => Ago_R_a; default*Function_for_re94(Ago_R_i, default, k_act_AgoR);
  re95: Ago_R_i => $s106; default*Function_for_re95(Ago_R_i, default, k_degr_AgoR);
  re97: R_GnRH_a + Ago_c => Ago_R_a; default*Function_for_re97(Ago_c, R_GnRH_a, default, k_on_Ago);
  re98: Ago_R_a => Ago_c + R_GnRH_a; default*Function_for_re98(Ago_R_a, default, k_off_Ago);
  re99: Ago_R_i => R_GnRH_i; default*Function_for_re99(Ago_R_i, default, k_diss_AgoR);
  re100: Ago_d => $s107; default*Function_for_re100(Ago_d, default, k_A_Ago);
  re101: $s108 => Ago_c; default*Function_for_re101(Ago_d, default, V_c_F_Ago, k_A_Ago);  // modifiers: Ago_d
  re102: Ant_d => s113; default*Function_for_re102(Ant_d, default, k_A_Ant);
  re103: s114 => Ant_c; default*Function_for_re103(Ant_d, default, V_c_F_Ant, k_A_Ant);  // modifiers: Ant_d
  re104: Ant_c => s115; default*Function_for_re104(Ant_c, default, cl_Ant);
  re105: Ant_R => R_GnRH_a + Ant_c; default*Function_for_re105(Ant_R, default, k_off_Ant);
  re106: R_GnRH_a + Ant_c => Ant_R; default*Function_for_re106(Ant_c, R_GnRH_a, default, k_on_ant);
  re107: Ant_R => s116; default*Function_for_re107(Ant_R, default, k_degr_Ant);
  re108: Ant_c => Ant_p; default*Function_for_re108(Ant_c, default, k_cp_Ant);
  re109: Ant_p => Ant_c; default*Function_for_re109(Ant_p, default, k_pc_Ant);

  // Events:
  ago_admin: at (time >= t_0_Ago): Ago_d = dose_Ago/default;
  ant_admin: at (time >= t_0_Ant): Ant_d = Ant_d + dose_Ant;

  // Unit definitions:
  unit time = 86400 second;
  unit substance = dimensionless;
end
