// SBML level 2 version 4

model MODEL1406130000()
  // Yugi2014 - Insulin induced signalling (PFKL phosphorylation) - model 1
  // Insulin induces phosphorylation and activation of liver-type phosphofructokinase 1, which thereby controls a key reaction in glycolysis. This mechanism is revealed using the mathematical model. In this model, the PFKL phosphorylation time courses are obtained from experimental data.
  // Author's Note: Katsuyuki Yugi thank Akira Funahashi (Keio University, Japan) for his kind advice in converting the model from MATLAB to SBML.
  // This model is described in the article:
  // Reconstruction of insulin signal flow from phosphoproteome and metabolome data.
  // Yugi K, Kubota H, Toyoshima Y, Noguchi R, Kawata K, Komori Y, Uda S, Kunida K, Tomizawa Y, Funato Y, Miki H, Matsumoto M, Nakayama KI, Kashikura K, Endo K, Ikeda K, Soga T, Kuroda S.
  // Cell Rep 2014 Aug; 8(4): 1171-1183
  // Abstract:
  // Cellular homeostasis is regulated by signals through multiple molecular networks that include protein phosphorylation and metabolites. However, where and when the signal flows through a network and regulates homeostasis has not been explored. We have developed a reconstruction method for the signal flow based on time-course phosphoproteome and metabolome data, using multiple databases, and have applied it to acute action of insulin, an important hormone for metabolic homeostasis. An insulin signal flows through a network, through signaling pathways that involve 13 protein kinases, 26 phosphorylated metabolic enzymes, and 35 allosteric effectors, resulting in quantitative changes in 44 metabolites. Analysis of the network reveals that insulin induces phosphorylation and activation of liver-type phosphofructokinase 1, thereby controlling a key reaction in glycolysis. We thus provide a versatile method of reconstruction of signal flow through the network using phosphoproteome and metabolome data.
  // This model is hosted on BioModels Database and identified by: BIOMD0000000540.
  // To cite BioModels Database, please use: BioModels Database: An enhanced, curated and annotated resource for published quantitative kinetic models.
  // To the extent possible under law, all copyright and related or neighbouring rights to this encoded model have been dedicated to the public domain worldwide. Please refer to CC0 Public Domain Dedication for more information.
  // biomodels.db:MODEL1406130000
  // biomodels.db:BIOMD0000000540
  // isDescribedBy pubmed:25131207
  // isVersionOf GO:0006110 GO:0032868
  // hasTaxon taxonomy:131567
  // hasProperty mamo:MAMO_0000046

  // Compartments:
  compartment default = 1 volume;  // isVersionOf GO:0005623

  // Species:
  substanceOnly species PFKL in default = 1;  // uniprot:P17858
  substanceOnly species FBPase in default = 1;  // uniprot:P09467
  substanceOnly species F6P in default = 14.07743;  // CHEBI:15946
  substanceOnly species F1_6BP in default = 104.0724; F1_6BP is "F1,6BP";  // CHEBI:16905
  substanceOnly species PEP in default = 108.0945;  // CHEBI:18021
  substanceOnly species Isocitrate in default = 1.794872;  // CHEBI:30887
  substanceOnly species _2_oxoglutarate in default = 25.18854; _2_oxoglutarate is "2-oxoglutarate";  // CHEBI:30915
  substanceOnly species Malate in default = 68.87883;  // CHEBI:6650
  substanceOnly species F2_6BP in default = 1; F2_6BP is "F2,6BP";  // CHEBI:28602
  substanceOnly species Citrate in default = 17.74761;  // CHEBI:30769
  species sa4_degraded in default = 0;
  substanceOnly species ALDO in default = 1;  // uniprot:P04075
  substanceOnly species pPFKL in default = 0.768939345;  // isVersionOf uniprot:P17858; hasProperty PATO:0002220
  species sa8_degraded in default = 0;
  species sa7_degraded in default = 0;
  species sa5_degraded in default = 0;
  species sa6_degraded in default = 0;
  species sa9_degraded in default = 0;
  species sa13_degraded in default = 0;
  species sa3_degraded in default = 0;
  species sa10_degraded in default = 0;
  substanceOnly species $F6P_proxy in default;  // isVersionOf CHEBI:57579

  // Parameters:
  K_FBPase_cit = 0.0211646 dimensionless;
  K_FBPase_f16bp = 0.104089638 dimensionless;
  K_FBPase_f26bp = 17.51744 dimensionless;
  K_PFKL_PHOS_S775 = 6.283706 dimensionless;
  K_PFKL_akg = 24661.01 dimensionless;
  K_PFKL_cit = 41.30426 dimensionless;
  K_PFKL_f26bp = 1.282443 dimensionless;
  K_PFKL_f6p = 0.014114844 dimensionless;
  K_PFKL_icit = 1784.508 dimensionless;
  K_PFKL_mal = 9.544729 dimensionless;
  K_PFKL_pep = 0.633518366 dimensionless;
  Vf_FBPase = 9.932861 dimensionless;
  Vf_PFKL = 695063.7 dimensionless;
  k_ALDO = 0.008187906 dimensionless;
  k_mal = 1.00553 substance;
  k_akg = -3.544495 substance;
  k_pep = 43.99196 substance;
  k_icit = -0.038210156 substance;
  k_f26bp = -0.083430336 substance;
  k_cit = -0.351935646 substance;
  k_pfkl_s775 = -0.011384308 substance;
  k_f6p = -0.930115636 dimensionless;

  // Assignment rules:
  F6P_proxy := F6P;

  // Reactions:
  re1: $F6P_proxy => F1_6BP; F2_6BP/(K_PFKL_f26bp + F2_6BP)*(K_PFKL_akg/(K_PFKL_akg + _2_oxoglutarate))*(K_PFKL_pep/(K_PFKL_pep + PEP))*(K_PFKL_cit/(K_PFKL_cit + Citrate))*(K_PFKL_icit/(K_PFKL_icit + Isocitrate))*(K_PFKL_mal/(K_PFKL_mal + Malate))*(pPFKL/(K_PFKL_PHOS_S775 + pPFKL))*(Vf_PFKL*F6P_proxy/(K_PFKL_f6p + F6P_proxy));  // modifiers: PFKL, PEP, Isocitrate, _2_oxoglutarate, Malate, F2_6BP, Citrate, pPFKL
  re2: F1_6BP => $F6P_proxy; K_FBPase_f26bp/(K_FBPase_f26bp + F2_6BP)*(Citrate/(K_FBPase_cit + Citrate))*(Vf_FBPase*F1_6BP/(K_FBPase_f16bp + F1_6BP));  // modifiers: FBPase, F2_6BP, Citrate
  re3: F1_6BP => sa4_degraded; k_ALDO*F1_6BP;  // modifiers: ALDO
  re4: Malate => sa8_degraded; -k_mal;
  re5: _2_oxoglutarate => sa7_degraded; -k_akg;
  re6: PEP => sa5_degraded; -k_pep;
  re7: Isocitrate => sa6_degraded; -k_icit;
  re8: F2_6BP => sa9_degraded; -k_f26bp;
  re9: Citrate => sa10_degraded; -k_cit;
  re10: pPFKL => sa13_degraded; -k_pfkl_s775;
  re11: F6P => sa3_degraded; -k_f6p;

  // Events:
  ev2min: at (time > 2): k_akg = -1.357466, k_cit = 0.351935646, k_f6p = 1.357466, k_icit = -0.038210156, k_f26bp = 0.028924455, k_mal = -1.508296, k_pep = 7.54147813, k_pfkl_s775 = -0.011384308;
  ev5min: at (time > 5): k_akg = 0, k_cit = -0.211161388, k_f6p = 0.271493213, k_icit = -0.038210156, k_f26bp = 0.119075279, k_mal = -0.904977376, k_pep = -6.334842, k_pfkl_s775 = 0.057596439;
  ev10min: at (time > 10): k_akg = 0.36199095, k_cit = 1.085973, k_f6p = -1.055807, k_icit = -0.038210156, k_f26bp = -0.050207413, k_mal = 3.921569, k_pep = 9.049774, k_pfkl_s775 = 0.006730598;
  ev15min: at (time > 15): k_akg = 1.085973, k_cit = 0.452488688, k_f6p = -0.12066365, k_icit = -0.018099548, k_f26bp = 0.100115778, k_mal = 1.809955, k_pep = -4.826546, k_pfkl_s775 = 0.006730598;
  ev20min: at (time > 20): k_akg = 0.226244344, k_cit = 0.377073906, k_f6p = -0.165912519, k_icit = 0.031674208, k_f26bp = -0.032601514, k_mal = 1.206637, k_pep = -3.61991, k_pfkl_s775 = 0.006730598;
  ev30min: at (time > 30): k_akg = 0.369532428, k_cit = 0.306686777, k_f6p = 0.070387129, k_icit = 0.031674208, k_f26bp = -0.003055632, k_mal = 0.502765209, k_pep = -0.301659125, k_pfkl_s775 = 0.006730598;
  ev45min: at (time > 45): k_akg = 0.369532428, k_cit = 0.306686777, k_f6p = 0.070387129, k_icit = 0.031674208, k_f26bp = -0.003055632, k_mal = 0.502765209, k_pep = -0.301659125, k_pfkl_s775 = 0.006730598;

  // Unit definitions:
  unit substance = mole;
  unit volume = litre;
  unit area = metre^2;
  unit length = metre;
  unit time = second;
end
