// SBML level 2 version 4
// dcterms:bibliographicCitation: A Model of the Coupling between Brain Electrical Activity, Metabolism, and Hemodynamics: Application to the Interpretation of Functional Neuroimaging http://identifiers.org/doi/10.1006/nimg.2002.1224
// dcterms:bibliographicCitation: A Model of the Coupling between Brain Electrical Activity, Metabolism, and Hemodynamics: Application to the Interpretation of Functional Neuroimaging http://identifiers.org/pubmed/12414257

function Constant_flux__irreversible(v)
  v;
end
Constant_flux__irreversible is "Constant flux (irreversible)";

function v_pump(S_V, k_pump, ATP, NA, Km_pump)
  S_V*k_pump*ATP*NA/(1 + ATP/Km_pump);
end

function v_Leak_Na(S_V, gNA, F, RT_F, Na_e, Na, Vm)
  S_V*(gNA/F)*(RT_F*ln(Na_e/Na) - Vm);
end
v_Leak_Na is "v_Leak-Na";

function v_GLC_m(Tmax, GLC_c, Kt_GLC, GLC_i)
  Tmax*(GLC_c/(GLC_c + Kt_GLC) - GLC_i/(GLC_i + Kt_GLC));
end

function v_HK_PFK(ATP, GLC_i, Kg, KI_ATP, nH, kHK_PFK)
  kHK_PFK*ATP*(GLC_i/(GLC_i + Kg))/(1 + (ATP/KI_ATP)^nH);
end
v_HK_PFK is "v_HK-PFK";

function v_PGK(kPGK, GAP, ADP, NAD, NADH)
  kPGK*GAP*ADP*(NAD/NADH);
end

function v_LAC_m(Tmax, LAC_i, Kt_LAC, LAC_c)
  Tmax*(LAC_i/(LAC_i + Kt_LAC) - LAC_c/(LAC_c + Kt_LAC));
end

function v_O2_m(PS_V, KO2, HbOP, O2_c, nh, O2_i)
  PS_V*(KO2*(HbOP/O2_c - 1)^(-1/nh) - O2_i);
end

function v_O2_c(F_in, V_cap, O2_a, O2_c)
  2*F_in/V_cap*(O2_a - O2_c);
end

function v_GLC_c(F_in, V_cap, GLC_a, GLC_c)
  2*F_in/V_cap*(GLC_a - GLC_c);
end

function v_LAC_c(F_in, V_cap, LAC_a, LAC_c)
  2*F_in/V_cap*(LAC_a - LAC_c);
end

function v_dHb_in(F_in, O2_a, O2_c)
  F_in*2*(O2_a - O2_c);
end

function v_dHb_out(F_out, dHb, V_v)
  F_out*dHb/V_v;
end

model Aubert2002()
  // Aubert2002 - Coupling between Brain electrical activity, Metabolism and Hemodynamics
  // Felix Winter encoded this model in SBML as part of his work at ASD GmbH
  // This model is described in the article:
  // A model of the coupling between brain electrical activity, metabolism, and hemodynamics: application to the interpretation of functional neuroimaging.
  // Aubert A, Costalat R.
  // Neuroimage 2002 Nov; 17(3): 1162-1181
  // Abstract:
  // In order to improve the interpretation of functional neuroimaging data, we implemented a mathematical model of the coupling between membrane ionic currents, energy metabolism (i.e., ATP regeneration via phosphocreatine buffer effect, glycolysis, and mitochondrial respiration), blood-brain barrier exchanges, and hemodynamics. Various hypotheses were tested for the variation of the cerebral metabolic rate of oxygen (CMRO(2)): (H1) the CMRO(2) remains at its baseline level; (H2) the CMRO(2) is enhanced as soon as the cerebral blood flow (CBF) increases; (H3) the CMRO(2) increase depends on intracellular oxygen and pyruvate concentrations, and intracellular ATP/ADP ratio; (H4) in addition to hypothesis H3, the CMRO(2) progressively increases, due to the action of a second messenger. A good agreement with experimental data from magnetic resonance imaging and spectroscopy (MRI and MRS) was obtained when we simulated sustained and repetitive activation protocols using hypotheses (H3) or (H4), rather than hypotheses (H1) or (H2). Furthermore, by studying the effect of the variation of some physiologically important parameters on the time course of the modeled blood-oxygenation-level-dependent (BOLD) signal, we were able to formulate hypotheses about the physiological or biochemical significance of functional magnetic resonance data, especially the poststimulus undershoot and the baseline drift.
  // This model is hosted on BioModels Database and identified by: BIOMD0000000570.
  // To cite BioModels Database, please use: BioModels Database: An enhanced, curated and annotated resource for published quantitative kinetic models.
  // To the extent possible under law, all copyright and related or neighbouring rights to this encoded model have been dedicated to the public domain worldwide. Please refer to CC0 Public Domain Dedication for more information.
  // biomodels.db:MODEL1503020000
  // biomodels.db:BIOMD0000000570
  // isDescribedBy pubmed:12414257
  // isVersionOf GO:0006091
  // hasTaxon taxonomy:9606
  // hasProperty mamo:MAMO_0000046

  // Compartments:
  compartment Tissue = 1;  // FMA:9637
  compartment Arteries = 1;  // FMA:63812
  compartment Capillaries = 1;  // FMA:63194
  compartment Venous_balloon = 0.0237;  // FMA:67319

  // Species:
  substanceOnly species Na in Tissue = 15; Na is "Na+";  // CHEBI:29101
  substanceOnly species $ATP_Tissue in Tissue;  // CHEBI:15422
  substanceOnly species $ADP_Tissue in Tissue;  // CHEBI:16761
  substanceOnly species GLC_Tissue in Tissue = 1.2;  // CHEBI:4167
  substanceOnly species GAP in Tissue = 0.0057;  // CHEBI:29052
  substanceOnly species $NAD_Tissue in Tissue; NAD_Tissue is "NAD+";  // CHEBI:15846
  substanceOnly species NADH in Tissue = 0.026;  // CHEBI:16908
  substanceOnly species PYR in Tissue = 0.16;  // CHEBI:15361
  substanceOnly species PEP in Tissue = 0.02;  // CHEBI:18021
  substanceOnly species LAC_Tissue in Tissue = 1;  // CHEBI:422
  substanceOnly species PCr in Tissue = 5;  // CHEBI:17287
  substanceOnly species $Cr in Tissue;  // CHEBI:16919
  substanceOnly species O2_Tissue in Tissue = 0.0262;  // CHEBI:15379
  substanceOnly species $O2_Arteries in Arteries = 8.34;  // CHEBI:15379
  substanceOnly species $GLC_Arteries in Arteries = 4.8;  // CHEBI:4167
  substanceOnly species $LAC_Arteries in Arteries = 0.313;  // CHEBI:422
  substanceOnly species GLC_Capillaries in Capillaries = 4.56;  // CHEBI:4167
  substanceOnly species LAC_Capillaries in Capillaries = 0.35;  // CHEBI:422
  substanceOnly species O2_Capillaries in Capillaries = 7.01;  // CHEBI:15379
  substanceOnly species dHb in Capillaries = 0.063;  // CHEBI:5656

  // Parameters:
  S_V = 90000; S_V is "S/V";
  gNa = 0.0039;
  F = 96500;
  RT_F = 26.73; RT_F is "RT/F";
  Vm = -70;
  Na_extracellular = 150;
  ATP = 2.2;
  k_pump = 2.9e-7;
  Km_pump = 0.5;
  var ADP;
  qAK = 0.92;
  A = 2.212;
  var AMP;
  Tmax_GLC = 0.0476; Tmax_GLC is "Tmax,GLC";
  Kt_GLC = 9; Kt_GLC is "Kt,GLC";
  kHK_PFK = 0.12; kHK_PFK is "kHK-PFK";
  KI_ATP = 1; KI_ATP is "KI,ATP";
  nH = 4;
  Kg = 0.05;
  kPGK = 42.6;
  N = 0.212;
  var NAD; NAD is "NAD+";
  kPK = 86.7;
  parameter_24 = 2000; parameter_24 is "k+LDH";
  parameter_25 = 44.8; parameter_25 is "k-LDH";
  Tmax_LAC = 0.00628; Tmax_LAC is "Tmax,LAC";
  Kt_LAC = 0.5; Kt_LAC is "Kt,LAC";
  vATPase = 0.149;
  parameter_29 = 3666; parameter_29 is "k+CK";
  parameter_30 = 20; parameter_30 is "k-CK";
  C = 10;
  PS_V = 1.6; PS_V is "PS/V";
  KO2 = 0.0361;
  Hb_OP = 8.6; Hb_OP is "Hb*OP";
  nh = 2.73;
  F0 = 0.012;
  var F_in;
  V_cap = 0.0055;
  v_Mito = 0.0192;
  var dAMP_dATP; dAMP_dATP is "dAMP/dATP";
  V_max_Mito = 0.05233;
  Km_Mito = 0.05; Km_Mito is "Km,Mito";
  KI_Mito = 183.3; KI_Mito is "KI,Mito";
  n_Mito = 0.1;
  K_O2_Mito = 0.001;
  is_maximum = 0;
  is_rising = 1;
  is_falling = 0;
  alpha_F_in = 0.5;
  t_on = 5;
  t_end = 360;
  v_stim_constant = 0.23;
  Initial_for_Venous_balloon = Venous_balloon;
  Initial_for_F0 = F0;
  Initial_for_O2c_bar = O2c_bar;
  Initial_for_alpha_F_in = alpha_F_in;
  Initial_for_maximum = maximum;
  Initial_for_t_end = t_end;
  Initial_for_t_on = t_on;

  // Assignment rules:
  ATP_Tissue := ATP*Tissue;
  Cr := (C - PCr/Tissue)*Tissue;
  ADP := ATP/2*(-qAK + (qAK^2 + 4*qAK*(A/ATP - 1))^0.5);
  ADP_Tissue := ADP*Tissue;
  AMP := A - ATP - ADP;
  NAD := N - NADH/Tissue;
  NAD_Tissue := NAD*Tissue;
  dAMP_dATP := -1 + qAK/2 - 1/2*(qAK^2 + 4*qAK*(A/ATP - 1))^(1/2) + qAK*A/(ATP*(qAK^2 + 4*qAK*(A/ATP - 1))^(1/2));
  v_Mito_H3 := V_max_Mito*(PYR/Tissue/(Km_Mito + PYR/Tissue))*(1/(1 + (ATP/(ADP*KI_Mito))^n_Mito))*(O2_Tissue/Tissue/(K_O2_Mito + O2_Tissue/Tissue));
  maximum := Initial_for_F0*Initial_for_alpha_F_in;
  slope_up := Initial_for_maximum/Initial_for_t_on*time;
  slope_down := maximum*(t_on + t_end - time)/t_on;
  F_in := F0 + is_rising*slope_up + is_maximum*maximum + is_falling*slope_down;
  F_out := F0*((Venous_balloon/Initial_for_Venous_balloon)^2 + (Venous_balloon/Initial_for_Venous_balloon)^(-0.5)*35*(1/Initial_for_Venous_balloon)*F_in)/(1 + F0*(Venous_balloon/Initial_for_Venous_balloon)^(-0.5)*35*(1/Initial_for_Venous_balloon));
  rCBF := F_in/Initial_for_F0;
  rCMRO2 := mitochondrial_respiration/0.0192;
  rVv := Venous_balloon/Initial_for_Venous_balloon;
  O2c_bar := 2*(O2_Capillaries/Capillaries) - O2_Arteries/Arteries;
  ratioO2c_bar := O2c_bar/Initial_for_O2c_bar;

  // Rate rules:
  Venous_balloon' = F_in - F_out;
  ATP' = (-2*reaction_4 + Phosphoglycerate_kinase + Pyruvate_kinase - Na_K_pump + 15*mitochondrial_respiration + Creatine_Kinase - ATPases)*(1 - dAMP_dATP)^(-1);

  // Reactions:
  Sodium_leak: => Na; Tissue*v_Leak_Na(S_V, gNa, F, RT_F, Na_extracellular, Na/Tissue, Vm);
  Na_K_pump: 3 Na + $ATP_Tissue => $ADP_Tissue; Tissue*v_pump(S_V, k_pump, ATP_Tissue/Tissue, Na/Tissue, Km_pump); Na_K_pump is "Na/K - pump";
  Blood_brain_transport_of_glucose: 100 GLC_Capillaries => GLC_Tissue; v_GLC_m(Tmax_GLC, GLC_Capillaries/Capillaries, Kt_GLC, GLC_Tissue/Tissue); Blood_brain_transport_of_glucose is "Blood-brain transport of glucose";
  reaction_4: GLC_Tissue + $ATP_Tissue => 2 GAP + $ADP_Tissue; Tissue*v_HK_PFK(ATP_Tissue/Tissue, GLC_Tissue/Tissue, Kg, KI_ATP, nH, kHK_PFK); reaction_4 is "Hexokinase-phosphofructokinase system";
  Phosphoglycerate_kinase: GAP + $NAD_Tissue => NADH + PEP; Tissue*v_PGK(kPGK, GAP/Tissue, ADP_Tissue/Tissue, NAD_Tissue/Tissue, NADH/Tissue);  // modifiers: ADP_Tissue
  Pyruvate_kinase: $ADP_Tissue + PEP => $ATP_Tissue + PYR; kPK*ADP_Tissue*(PEP/Tissue);
  Lactate_dehydrogenase: PYR + NADH -> LAC_Tissue + $NAD_Tissue; Tissue*(parameter_24*(PYR/Tissue)*(NADH/Tissue) - parameter_25*(LAC_Tissue/Tissue)*(NAD_Tissue/Tissue));
  Blood_brain_transport_of_lactate: LAC_Tissue => 100 LAC_Capillaries; v_LAC_m(Tmax_LAC, LAC_Tissue/Tissue, Kt_LAC, LAC_Capillaries/Capillaries); Blood_brain_transport_of_lactate is "Blood-brain transport of lactate";
  Creatine_Kinase: PCr + $ADP_Tissue -> $Cr + $ATP_Tissue; Tissue*(parameter_29*(PCr/Tissue)*(ADP_Tissue/Tissue) - parameter_30*(Cr/Tissue)*(ATP_Tissue/Tissue));
  Blood_brain_transport_of_oxygen: 100 O2_Capillaries => O2_Tissue; v_O2_m(PS_V, KO2, Hb_OP, O2_Capillaries/Capillaries, nh, O2_Tissue/Tissue); Blood_brain_transport_of_oxygen is "Blood-brain transport of oxygen";
  reaction_11: $O2_Arteries => O2_Capillaries; v_O2_c(F_in, V_cap, O2_Arteries/Arteries, O2_Capillaries/Capillaries); reaction_11 is "Blood flow contribution to O2 variation";
  reaction_12: $GLC_Arteries => GLC_Capillaries; v_GLC_c(F_in, V_cap, GLC_Arteries/Arteries, GLC_Capillaries/Capillaries); reaction_12 is "Blood flow contribution to GLC_c variation";
  reaction_13: $LAC_Arteries => LAC_Capillaries; v_LAC_c(F_in, V_cap, LAC_Arteries/Arteries, LAC_Capillaries/Capillaries); reaction_13 is "Blood flow contribution to LAC_c variation";
  mitochondrial_respiration: PYR + NADH + 3 O2_Tissue => $ATP_Tissue; Tissue*Constant_flux__irreversible(v_Mito_H3);
  ATPases: $ATP_Tissue => ; Tissue*Constant_flux__irreversible(v);
    v = 0.149;
  Na__inflow_after_stimulation: => Na; Tissue*Constant_flux__irreversible(v_stim_constant); Na__inflow_after_stimulation is "Na+ inflow after stimulation";
  inflow_of_dHb: => dHb; Capillaries*v_dHb_in(F_in, O2_Arteries/Arteries, O2_Capillaries/Capillaries);  // modifiers: O2_Arteries, O2_Capillaries
  outflow_of_dHb: dHb => ; Capillaries*v_dHb_out(F_out, dHb/Capillaries, Venous_balloon);

  // Events:
  from_increase_to_stable: at (time == Initial_for_t_on): is_maximum = 1, is_rising = 0;
  from_stable_to_decrease__end_of_stimulation: at (time == Initial_for_t_end): is_maximum = 0, is_falling = 1, v_stim_constant = 0; from_stable_to_decrease__end_of_stimulation is "from stable to decrease (end of stimulation)";
  from_decrease_to_at_rest: at (time == Initial_for_t_end + Initial_for_t_on): is_falling = 0;

  // Unit definitions:
  unit volume = 1e-3 litre;
  unit substance = 1e-3 mole;
end
