// SBML level 2 version 4

model MODEL1602290000()
  // Proctor2016 - Circadian rhythm of PTH and the dynamics of signaling molecules on bone remodeling
  // This model is described in the article:
  // Simulated Interventions to Ameliorate Age-Related Bone Loss Indicate the Importance of Timing.
  // Proctor CJ, Gartland A.
  // Front Endocrinol (Lausanne) 2016; 7: 61
  // Abstract:
  // Bone remodeling is the continuous process of bone resorption by osteoclasts and bone formation by osteoblasts, in order to maintain homeostasis. The activity of osteoclasts and osteoblasts is regulated by a network of signaling pathways, including Wnt, parathyroid hormone (PTH), RANK ligand/osteoprotegrin, and TGF-?, in response to stimuli, such as mechanical loading. During aging there is a gradual loss of bone mass due to dysregulation of signaling pathways. This may be due to a decline in physical activity with age and/or changes in hormones and other signaling molecules. In particular, hormones, such as PTH, have a circadian rhythm, which may be disrupted in aging. Due to the complexity of the molecular and cellular networks involved in bone remodeling, several mathematical models have been proposed to aid understanding of the processes involved. However, to date, there are no models, which explicitly consider the effects of mechanical loading, the circadian rhythm of PTH, and the dynamics of signaling molecules on bone remodeling. Therefore, we have constructed a network model of the system using a modular approach, which will allow further modifications as required in future research. The model was used to simulate the effects of mechanical loading and also the effects of different interventions, such as continuous or intermittent administration of PTH. Our model predicts that the absence of regular mechanical loading and/or an impaired PTH circadian rhythm leads to a gradual decrease in bone mass over time, which can be restored by simulated interventions and that the effectiveness of some interventions may depend on their timing.
  // This model is hosted on BioModels Database and identified by: BIOMD0000000612.
  // To cite BioModels Database, please use: BioModels Database: An enhanced, curated and annotated resource for published quantitative kinetic models.
  // To the extent possible under law, all copyright and related or neighbouring rights to this encoded model have been dedicated to the public domain worldwide. Please refer to CC0 Public Domain Dedication for more information.
  // biomodels.db:MODEL1602290000
  // biomodels.db:BIOMD0000000612
  // isDescribedBy pubmed:27379013
  // isVersionOf GO:0046849
  // hasTaxon taxonomy:9606
  // hasProperty mamo:MAMO_0000046

  // Compartments:
  compartment bone = 1;  // BTO:0000140
  compartment ecm = 1;
  compartment osteoblast = 1;

  // Species:
  substanceOnly species Bone in bone = 2000;
  substanceOnly species HSC in bone = 100;  // CL:1001610
  substanceOnly species Ob_m in bone = 0;  // CL:0001039
  substanceOnly species Ob_p in bone = 0;  // CL:0007010
  substanceOnly species Ob_p_Tgfb_A in bone = 0;  // hasPart uniprot:P01137 CL:0007010
  substanceOnly species Ob_pro in bone = 0;  // CL:0001040
  substanceOnly species Ocl_m in bone = 0;  // CL:0000779
  substanceOnly species Ocl_p in bone = 0;  // CL:0000778
  substanceOnly species Ocl_p_RANKL in bone = 0;  // hasPart uniprot:O14788 CL:0000778
  substanceOnly species Ocy_A in bone = 0;  // CL:0000137
  substanceOnly species Ocy_I in bone = 1800;  // CL:0000137
  substanceOnly species Ocy_I_PTH in bone = 0;  // hasPart uniprot:P01270 CL:0000137
  substanceOnly species MSC in bone = 100;  // CL:0000134
  substanceOnly species LOAD in ecm = 0;
  substanceOnly species MCSF in ecm = 5;  // isVersionOf uniprot:P09603
  substanceOnly species Ob_m_PTH in ecm = 0;  // hasPart uniprot:P01270 CL:0001039
  substanceOnly species Ob_p_PTH in ecm = 0;  // hasPart uniprot:P01270 CL:0007010
  substanceOnly species OPG in ecm = 0;  // isVersionOf uniprot:O00300
  substanceOnly species OPG_RANKL in ecm = 0;  // hasPart uniprot:O14788 uniprot:O00300
  substanceOnly species PTH in ecm = 170;  // isVersionOf uniprot:P01270
  substanceOnly species RANKL in ecm = 0;  // isVersionOf uniprot:O14788
  substanceOnly species Sost in ecm = 0;  // isVersionOf uniprot:Q9BQB4
  substanceOnly species Tgfb_A in ecm = 5;  // isVersionOf uniprot:P01137
  substanceOnly species Tgfb_I in ecm = 500;  // isVersionOf uniprot:P01137
  substanceOnly species Wnt_A in ecm = 0;  // isVersionOf uniprot:P04628 PR:000000616
  substanceOnly species Wnt_I in ecm = 200;  // isVersionOf uniprot:P04628
  substanceOnly species $Source in ecm = 1;
  substanceOnly species $Sink in ecm = 1;
  substanceOnly species X in ecm = 0;
  substanceOnly species newbone in ecm = 0;
  substanceOnly species Bax in osteoblast = 100;  // isVersionOf uniprot:Q07812
  substanceOnly species Bax_Bcl2 in osteoblast = 0;  // hasPart uniprot:P10415 uniprot:Q07812
  substanceOnly species Bcl2 in osteoblast = 0;  // isVersionOf uniprot:P10415
  substanceOnly species CREB in osteoblast = 100;  // isVersionOf uniprot:P16220
  substanceOnly species CREB_P in osteoblast = 0;  // isVersionOf uniprot:P16220 PR:000037070
  substanceOnly species CREB_Runx2 in osteoblast = 0;  // hasPart uniprot:P16220 uniprot:Q13950
  substanceOnly species Runx2 in osteoblast = 10;  // isVersionOf uniprot:Q13950

  // Parameters:
  kactCreb = 0.009;
  kactOcy = 0.004;
  kactOcyPth = 0.08;
  kactTgfb = 2e-7;
  kactWnt = 0.03;
  kactWntPth = 0.001;
  kbinBaxBcl2 = 0.01;
  kbinCrebRunx2 = 0.01;
  kbinObmPTH = 0.02;
  kbinObpPTH = 0.0003;
  kbinObpTgfb = 0.0002;
  kbinOclpRANKL = 0.001;
  kbinOcyPTH = 0.008;
  kdeathOb = 0.00024;
  kdeathOcl = 6.5e-5;
  kdeathOclp = 1e-5;
  kdeathOcy = 1e-8;
  kdegBcl2 = 0.0025;
  kdegBone = 6.5e-9;
  kdegMCSF = 0.0001;
  kdegOPG = 4e-6;
  kdegOPGRANKL = 1e-5;
  kdegPTH = 0.002;
  kdegRANKL = 3e-5;
  kdegRunx2 = 0.0001;
  kdegRunx2PTH = 0.003;
  kdegSost = 0.004;
  kdegTgfb = 5e-5;
  kdegTgfbPTH = 1.7e-5;
  kdiffHSC = 5.5e-5;
  kdiffMSC = 0.00065;
  kdiffObP = 0.0001;
  kdiffObproTgfb = 0.05;
  kdiffOclP = 8e-5;
  kformBone = 3.07e-6;
  kinactCreb = 0.0001;
  kinactOcy = 2e-5;
  kinactWnt = 0.8;
  kinhibRANKL = 0.001;
  kmatOb = 2e-9;
  kmatObTgfb = 1e-8;
  krelBaxBcl2 = 0.5;
  krelCrebRunx2 = 0.01;
  krelObmPTH = 0.005;
  krelObpPTH = 0.005;
  krelObpTgfb = 0.01;
  krelOclpRANKL = 0.001;
  krelOcyPTH = 0.005;
  krelRANKL = 0.001;
  ksecMCSFbyMSC = 1e-5;
  ksecMCSFbyObm = 1e-5;
  ksecMCSFbyObp = 1e-5;
  ksecMCSFbyObpro = 1e-5;
  ksecOPGbyObm = 1e-5;
  ksecOPGbyObp = 2e-6;
  ksecOPGbyObpPTH = 1e-6;
  ksecRANKLbyMSC = 1e-6;
  ksecRANKLbyObm = 1e-7;
  ksecRANKLbyObmPTH = 1e-6;
  ksecRANKLbyObp = 3e-6;
  ksecRANKLbyObpPTH = 2e-5;
  ksecRANKLbyObpro = 7e-6;
  ksecRANKLbyObpTgfb = 4e-6;
  ksecRANKLbyOcy = 1e-6;
  ksecRANKLbyOcyI = 1e-7;
  ksecSost = 0.00075;
  ksecTgfb = 5e-5;
  ksynBcl2 = 0.005;
  ksynPTH = 0.02;
  ksynRunx2 = 0.005;
  ksynX = 0.01157;
  kunload = 0.00035;

  // Reactions:
  Unloading: LOAD => $Sink; kunload*LOAD;
  Osteocyte_activation: Ocy_I + LOAD => Ocy_A + LOAD; kactOcy*Ocy_I*LOAD;
  Osteocyte_activation_by_PTH: Ocy_I_PTH => Ocy_A + PTH; kactOcyPth*Ocy_I_PTH;
  Osteocyte_inactivation: Ocy_A => Ocy_I; kinactOcy*Ocy_A;
  Ocy_I_bound_by_PTH: Ocy_I + PTH => Ocy_I_PTH; kbinOcyPTH*Ocy_I*(PTH^2/(100^2 + PTH^2));
  Ocy_I_PTH_release: Ocy_I_PTH => Ocy_I + PTH; krelOcyPTH*Ocy_I_PTH;
  Ocy_apoptosis: Ocy_I => $Sink; kdeathOcy*Ocy_I;
  Sost_secretion: Ocy_I => Ocy_I + Sost; ksecSost*Ocy_I;
  Sost_degradation: Sost => $Sink; kdegSost*Sost;
  Wnt_activation: Wnt_I => Wnt_A; kactWnt*Wnt_I;
  Wnt_activation_by_PTH: Wnt_I + Ob_m_PTH => Wnt_A + Ob_m_PTH; kactWntPth*Wnt_I*Ob_m_PTH;
  Inactivation_of_Wnt_by_Sost: Wnt_A + Sost => Wnt_I + Sost; kinactWnt*Wnt_A*Sost^2/(50^2 + Sost^2);
  MSC_differentiation_to_Ob_pro: MSC + Wnt_A => MSC + Wnt_A + Ob_pro; kdiffMSC*MSC*Wnt_A^2/(50^2 + Wnt_A^2);
  Osteoblast_progenitor_differentiation_by_Tgfb: Ob_pro + Tgfb_A => Ob_p + Tgfb_A; kdiffObproTgfb*Ob_pro*Tgfb_A^2/(50^2 + Tgfb_A^2);
  Ob_precursor_differentiation: Ob_p => Ob_m; kdiffObP*Ob_p;
  Ob_p_binding_by_PTH: Ob_p + PTH => Ob_p_PTH; kbinObpPTH*Ob_p*(PTH^2/(100^2 + PTH^2));
  Ob_p_PTH_release: Ob_p_PTH => Ob_p + PTH; krelObpPTH*Ob_p_PTH;
  Ob_p_Tgfb_binding: Ob_p + Tgfb_A => Ob_p_Tgfb_A; kbinObpTgfb*Ob_p*Tgfb_A;
  Ob_p_Tgfb_release: Ob_p_Tgfb_A => Ob_p + Tgfb_A; krelObpTgfb*Ob_p_Tgfb_A;
  Ob_maturation_to_Ocy: Ob_m => Ocy_I; kmatOb*Ob_m;
  Ob_maturation_to_Ocy_by_Tgfb: Ob_m + Tgfb_A => Ocy_I + Tgfb_A; kmatObTgfb*Ob_m*Tgfb_A^2/(50^2 + Tgfb_A^2);
  Ob_m_bound_by_PTH: Ob_m + PTH => Ob_m_PTH; kbinObmPTH*Ob_m*(PTH^2/(100^2 + PTH^2));
  Ob_m_PTH_release: Ob_m_PTH => Ob_m + PTH; krelObmPTH*Ob_m_PTH;
  Ob_m_apoptosis: Ob_m + Bax => Bax; kdeathOb*Ob_m*Bax^2/(50^2 + Bax^2);
  Ob_m_PTH_apoptosis: Ob_m_PTH + Bax => Bax + PTH; kdeathOb*Ob_m_PTH*Bax^2/(50^2 + Bax^2);
  HSC_differentiation_to_Ocl_p: HSC + MCSF => HSC + MCSF + Ocl_p; kdiffHSC*HSC*MCSF^2/(50^2 + MCSF^2);
  Ocl_p_apoptosis: Ocl_p => $Sink; kdeathOclp*Ocl_p;
  Ocl_p_RANKL_binding: RANKL + Ocl_p => Ocl_p_RANKL; kbinOclpRANKL*Ocl_p*RANKL;
  Ocl_p_RANKL_release: Ocl_p_RANKL => Ocl_p + RANKL; krelOclpRANKL*Ocl_p_RANKL;
  Osteoclast_precursor_differentiation: Ocl_p_RANKL => Ocl_m; kdiffOclP*Ocl_p_RANKL;
  RANKL_inhibition: OPG + RANKL => OPG_RANKL; kinhibRANKL*OPG*RANKL;
  OPG_RANKL_dissociation: OPG_RANKL => OPG + RANKL; krelRANKL*OPG_RANKL;
  OPG_RANKL_degradation: OPG_RANKL => $Sink; kdegOPGRANKL*OPG_RANKL;
  Osteoclast_apoptosis: Ocl_m => $Sink; kdeathOcl*Ocl_m;
  RANKL_degradation: RANKL => $Sink; kdegRANKL*RANKL;
  OPG_degradation: OPG => $Sink; kdegOPG*OPG;
  MCSF_secretion_by_MSC: MSC => MSC + MCSF; ksecMCSFbyMSC*MSC;
  MCSF_secretion_by_Ob_pro: Ob_pro => Ob_pro + MCSF; ksecMCSFbyObpro*Ob_pro;
  MCSF_secretion_by_Ob_p: Ob_p => Ob_p + MCSF; ksecMCSFbyObp*Ob_p;
  MCSF_secretion_by_Ob_p_PTH: Ob_p_PTH => Ob_p_PTH + MCSF; ksecMCSFbyObp*Ob_p_PTH;
  MCSF_secretion_by_Ob_m: Ob_m => Ob_m + MCSF; ksecMCSFbyObm*Ob_m;
  MCSF_secretion_by_Ob_m_PTH: Ob_m_PTH => Ob_m_PTH + MCSF; ksecMCSFbyObm*Ob_m_PTH;
  MCSF_degradation: MCSF => $Sink; kdegMCSF*MCSF;
  OPG_secretion_by_Ob_p: Ob_p => Ob_p + OPG; ksecOPGbyObp*Ob_p;
  OPG_secretion_by_Ob_p_PTH: Ob_p_PTH => Ob_p_PTH + OPG; ksecOPGbyObpPTH*Ob_p_PTH;
  OPG_secretion_by_Ob_m: Ob_m => Ob_m + OPG; ksecOPGbyObm*Ob_m;
  RANKL_secretion_by_Ocy_A: Ocy_A => Ocy_A + RANKL; ksecRANKLbyOcy*Ocy_A;
  RANKL_secretion_by_Ocy_I: Ocy_I => Ocy_I + RANKL; ksecRANKLbyOcyI*Ocy_I;
  RANKL_secretion_by_MSCs: MSC => MSC + RANKL; ksecRANKLbyMSC*MSC;
  RANKL_secretion_by_Ob_p: Ob_p => Ob_p + RANKL; ksecRANKLbyObp*Ob_p;
  RANKL_secretion_by_Ob_p_Tgfb_A: Ob_p_Tgfb_A => Ob_p_Tgfb_A + RANKL; ksecRANKLbyObpTgfb*Ob_p_Tgfb_A;
  RANKL_secretion_by_Ob_p_PTH: Ob_p_PTH => Ob_p_PTH + RANKL; ksecRANKLbyObpPTH*Ob_p_PTH;
  RANKL_secretion_by_Ob_pro: Ob_pro => Ob_pro + RANKL; ksecRANKLbyObpro*Ob_pro;
  RANKL_secretion_by_Ob_m: Ob_m => Ob_m + RANKL; ksecRANKLbyObm*Ob_m;
  RANKL_secretion_by_Ob_m_PTH_enhanced: Ob_m_PTH => Ob_m_PTH + RANKL; ksecRANKLbyObmPTH*Ob_m_PTH;
  Tgfb_secretion_by_Obm: Ob_m => Ob_m + Tgfb_I; ksecTgfb*Ob_m;
  Tgfb_activation: Tgfb_I + Ocl_m => Tgfb_A + Ocl_m; kactTgfb*Tgfb_I*Ocl_m;
  Tgfb_degradation: Tgfb_A => $Sink; kdegTgfb*Tgfb_A;
  Tgfb_degradation_by_PTH: Tgfb_A + Ob_m_PTH => Ob_m_PTH; kdegTgfbPTH*Tgfb_A*Ob_m_PTH;
  PTH_production: $Source => PTH; ksynPTH*Source;
  PTH_degradation: PTH => $Sink; kdegPTH*PTH;
  CREB_activation: Ob_m_PTH + CREB => Ob_m_PTH + CREB_P; kactCreb*CREB*Ob_m_PTH^2/(100^2 + Ob_m_PTH^2);
  CREB_inactivation: CREB_P => CREB; kinactCreb*CREB_P;
  CREB_Runx2_binding: CREB_P + Runx2 => CREB_Runx2; kbinCrebRunx2*CREB_P*Runx2;
  CREB_Runx2_release: CREB_Runx2 => CREB_P + Runx2; krelCrebRunx2*CREB_Runx2;
  Bcl2_synthesis: CREB_Runx2 => CREB_Runx2 + Bcl2; ksynBcl2*CREB_Runx2;
  Bcl2_degradation: Bcl2 => $Sink; kdegBcl2*Bcl2;
  Bax_Bcl2_binding: Bax + Bcl2 => Bax_Bcl2; kbinBaxBcl2*Bax*Bcl2;
  Bax_Bcl2_release: Bax_Bcl2 => Bax + Bcl2; krelBaxBcl2*Bax_Bcl2;
  Runx2_synthesis: $Source => Runx2; ksynRunx2*Source;
  Runx2_degradation_via_PTH: Ob_m_PTH + Runx2 => Ob_m_PTH; kdegRunx2PTH*Runx2*Ob_m_PTH;
  Runx2_degradation: Runx2 => $Sink; kdegRunx2*Runx2;
  Bone_formation: Ob_m => Ob_m + Bone + newbone; kformBone*Ob_m;
  Bone_formation_Obm_PTH: Ob_m_PTH => Ob_m_PTH + Bone + newbone; kformBone*Ob_m_PTH;
  Bone_degradation: Ocl_m + Bone => Ocl_m; kdegBone*Ocl_m*Bone;
  Xsynthesis: $Source => X; ksynX*Source;

  // Events:
  AddLOAD1: at (X > 300): LOAD = 1;
  AddLOAD2: at (X > 600): LOAD = 1;
  AddPTH1: at (X > 625): PTH = 150;
  AddPTH2: at (X > 1000): PTH = 170, X = 0;

  // Unit definitions:
  unit substance = item;
end
