// SBML level 2 version 4
// dcterms:bibliographicCitation: urn:miriam:pubmed:18225942
// dcterms:bibliographicCitation: urn:miriam:doi:10.1371/journal.pcbi.0040009

function function_2(k, J, S, M1, M2)
  k*(J^2/(J^2 + S^2))*M1*M2;
end

function function_1(k, S, J, M1)
  k*(S^2/(J^2 + S^2))*M1;
end

function function_4(k, J, S, M1)
  k*(J^2/(J^2 + S^2))*M1;
end

function function_5(k, J1, M1, M2, J2, M3)
  k*(J1^2/(J1^2 + M1^2))*(M2^2/(J2^2 + M2^2))*(2 - M3);
end

function function_6(k, M1, M2)
  k*M1*M2;
end

function function_7(k, P, J)
  k*((1 - P)/(J + 1 - P));
end

function function_8(k, P, J)
  k*P/(J + P);
end

function function_9(k, M, J2, P, J1)
  k*(M/J2)^4*(P/(J1 + P));
end

function function_10(k, M)
  k*M;
end

function function_11(k, S, M)
  k*S*(1 - M);
end

function function_12(k, M, J, S)
  k*(M^4/(J^4 + M^4))*S;
end

function function_13(k, m1, Theta1, M2, Theta2, M3, Theta3, M4, Theta4)
  k*((m1/Theta1)^4*(M2/Theta2)^4/(1 + (m1/Theta1)^4 + (M2/Theta2)^4 + (M3/Theta3)^4 + M4/Theta4));
end

function function_14(k, M, P, C)
  k*(M^4/(M^4 + P^4))*C;
end

model Li2008___Caulobacter_Cell_Cycle()
  // Li2008 - Caulobacter Cell Cycle
  // This a model from the article:
  // A Quantitative Study of the Division Cycle of Caulobacter crescentus Stalked Cells.
  // Shenghua Li, Paul Brazhnik, Bruno Sobral, John J. Tyson PLoS Comput Biol 2008 Jan 25:4(1): e9 18225942 ,
  // Abstract:
  // Progression of a cell through the division cycle is tightly controlled at different steps to ensure the integrity of genome replication and partitioning to daughter cells. From published experimental evidence, we propose a molecular mechanism for control of the cell division cycle in Caulobacter crescentus. The mechanism, which is based on the synthesis and degradation of three ‘‘master regulator’’ proteins (CtrA, GcrA, and DnaA), is converted into a quantitative model, in order to study the temporal dynamics of these and other cell cycle proteins. The model accounts for important details of the physiology, biochemistry, and genetics of cell cycle control in stalked C. crescentus cell. It reproduces protein time courses in wild-type cells, mimics correctly the phenotypes of many mutant strains, and predicts the phenotypes of currently uncharacterized mutants. Since many of the proteins involved in regulating the cell cycle of C. crescentus are conserved among many genera of a-proteobacteria, the proposed mechanism may be applicable to other species of importance in agriculture and medicine.
  // In summary, you are entitled to use this encoded model in absolutely any manner you deem suitable, verbatim, or with modification, alone or embedded it in a larger context, redistribute it, commercially or not, in a restricted way or not..
  // To cite BioModels Database, please use: Li C, Donizelli M, Rodriguez N, Dharuri H, Endler L, Chelliah V, Li L, He E, Henry A, Stefan MI, Snoep JL, Hucka M, Le Novère N, Laibe C (2010) BioModels Database: An enhanced, curated and annotated resource for published quantitative kinetic models. BMC Syst Biol., 4:92.
  // biomodels.db:MODEL1811070001 biomodels.db:BIOMD0000000718
  // hasTaxon taxonomy:155892
  // isDescribedBy pubmed:18225942
  // isDescribedBy doi:10.1371/journal.pcbi.0040009
  // hasProperty mamo:MAMO_0000046
  // isDescribedBy pubmed:18225942

  // Compartments:
  compartment Caulobacter = 1;  // hasTaxon taxonomy:155892

  // Species:
  species CtrA in Caulobacter = 0.11;  // isVersionOf uniprot:P0CAW8
  species GcrA in Caulobacter = 0.78;  // isVersionOf uniprot:A0A0H3C9J4
  species DnaA in Caulobacter = 0.6;  // isVersionOf uniprot:P0CAU4
  species Fts in Caulobacter = 0.29;  // hasPart uniprot:A0A0V2FFD6; hasPart uniprot:A0A0V2FFH3
  species Zring in Caulobacter = 1;  // isVersionOf GO:0043226
  species DivK in Caulobacter = 0.66;  // isVersionOf uniprot:Q45976
  species DivK_P in Caulobacter = 0.34;  // isVersionOf uniprot:Q45976
  species I in Caulobacter = 0.11;
  species CcrM in Caulobacter = 0.5;  // isVersionOf uniprot:P0CAW2
  species hcori in Caulobacter = 1;
  species hctrA in Caulobacter = 0;
  species hccrM in Caulobacter = 0;
  species hfts in Caulobacter = 0;
  species Ini in Caulobacter = 0;  // hasProperty GO:0006270
  species Elong in Caulobacter = 0.05;  // hasProperty GO:0022616
  species DNA in Caulobacter = 1.05;  // ncit:C449

  // Parameters:
  ks_CtrA_P1 = 0.0083 unit_0; ks_CtrA_P1 is "ks,CtrA-P1";  // hasProperty ncit:C94967
  ks_CtrA_P2 = 0.073 unit_0; ks_CtrA_P2 is "ks,CtrA-P2";  // hasProperty ncit:C94967
  kd_CtrA1 = 0.002 unit_0; kd_CtrA1 is "kd,CtrA1";  // hasProperty ncit:C94967
  kd_CtrA2 = 0.15 unit_0; kd_CtrA2 is "kd,CtrA2";  // hasProperty ncit:C94967
  ks_GcrA = 0.045 unit_0; ks_GcrA is "ks,GcrA";  // hasProperty ncit:C94967
  kd_GcrA = 0.022 unit_0; kd_GcrA is "kd,GcrA";  // hasProperty ncit:C94967
  ks_DnaA = 0.0165 unit_0; ks_DnaA is "ks,DnaA";  // hasProperty ncit:C94967
  kd_DnaA = 0.007 unit_0; kd_DnaA is "kd,DnaA";  // hasProperty ncit:C94967
  ks_Fts = 0.063 unit_0; ks_Fts is "ks,Fts";  // hasProperty ncit:C94967
  kd_Fts = 0.035 unit_0; kd_Fts is "kd,Fts";  // hasProperty ncit:C94967
  kzring_open = 0.8 unit_0; kzring_open is "kzring,open";  // hasProperty ncit:C94967
  kzring_closed1 = 0.0001 unit_0; kzring_closed1 is "kzring,closed1";  // hasProperty ncit:C94967
  kzring_closed2 = 0.6 unit_0; kzring_closed2 is "kzring,closed2";  // hasProperty ncit:C94967
  ks_DivK = 0.0054 unit_0; ks_DivK is "ks,DivK";  // hasProperty ncit:C94967
  kd_DivK = 0.002 unit_0; kd_DivK is "kd,DivK";  // hasProperty ncit:C94967
  kd_Divk_P = 0.002 unit_0; kd_Divk_P is "kd,Divk_P";  // hasProperty ncit:C94967
  ks_I = 0.08 unit_0; ks_I is "ks,I";  // hasProperty ncit:C94967
  kd_I = 0.04 unit_0; kd_I is "kd,I";  // hasProperty ncit:C94967
  ks_CcrM = 0.072 unit_0; ks_CcrM is "ks,CcrM";  // hasProperty ncit:C94967
  kd_CcrM = 0.07 unit_0; kd_CcrM is "kd,CcrM";  // hasProperty ncit:C94967
  km_cori = 0.4 unit_0; km_cori is "km,cori";  // hasProperty ncit:C94967
  km_ctrA = 0.4 unit_0; km_ctrA is "km,ctrA";  // hasProperty ncit:C94967
  km_ccrM = 0.4 unit_0; km_ccrM is "km,ccrM";  // hasProperty ncit:C94967
  km_fts = 0.4 unit_0; km_fts is "km,fts";  // hasProperty ncit:C94967
  ka_Ini = 0.01 unit_0; ka_Ini is "ka,Ini";  // hasProperty ncit:C94967
  kelong = 0.006 unit_0;  // hasProperty ncit:C94967
  ktrans_DivK = 0.5 unit_0; ktrans_DivK is "ktrans,DivK";  // hasProperty ncit:C94967
  ktrans_DivK_P = 0.0295 unit_0; ktrans_DivK_P is "ktrans,DivK_P";  // hasProperty ncit:C94967
  Ji_CtrA_CtrA = 0.4 unit_1; Ji_CtrA_CtrA is "Ji,CtrA-CtrA";  // hasProperty OBI:0001144
  JZring_Fts = 0.78 unit_1; JZring_Fts is "JZring-Fts";  // hasProperty OBI:0001144
  Jm_fts = 0.95 unit_1; Jm_fts is "Jm,fts";  // hasProperty OBI:0001144
  thetacori = 0.0002 unit_1;  // ncit:C48228
  Ja_CtrA_CtrA = 0.45 unit_1; Ja_CtrA_CtrA is "Ja,CtrA-CtrA";  // hasProperty OBI:0001144
  Ja_DnaA_CtrA = 0.3 unit_1; Ja_DnaA_CtrA is "Ja,DnaA-CtrA";  // hasProperty OBI:0001144
  Jm_cori = 0.95 unit_1; Jm_cori is "Jm,cori";  // hasProperty OBI:0001144
  thetaCtrA = 0.2 unit_1;  // ncit:C48228
  Jd_CtrA_Divk_P = 0.55 unit_1; Jd_CtrA_Divk_P is "Jd,CtrA-Divk_P";  // hasProperty OBI:0001144
  Ja_open = 0.01 unit_1; Ja_open is "Ja,open";  // hasProperty OBI:0001144
  Jm_ctrA = 0.95 unit_1; Jm_ctrA is "Jm,ctrA";  // hasProperty OBI:0001144
  thetaGcrA = 0.45 unit_1;  // ncit:C48228
  Ji_GcrA_CtrA = 0.2 unit_1; Ji_GcrA_CtrA is "Ji,GcrA-CtrA";  // hasProperty OBI:0001144
  Ja_closed = 0.1 unit_1; Ja_closed is "Ja,closed";  // hasProperty OBI:0001144
  Jm_ccrM = 0.95 unit_1; Jm_ccrM is "Jm,ccrM";  // hasProperty OBI:0001144
  thetaDnaA = 0.6 unit_1;  // ncit:C48228
  Pelong = 0.05 unit_1;  // hasProperty ncit:C104788
  PccrM = 0.2 unit_1;  // hasProperty ncit:C104788
  PctrA = 0.375 unit_1;  // hasProperty ncit:C104788
  Pfts = 0.625 unit_1;  // hasProperty ncit:C104788
  Ji_DnaA_GcrA = 0.5 unit_1; Ji_DnaA_GcrA is "Ji,DnaA-GcrA";  // hasProperty OBI:0001144
  Count = 2 unit_1;  // hasProperty ncit:C13202

  // Reactions:
  reaction: => CtrA; Caulobacter*function_1(ks_CtrA_P2, CtrA, Ja_CtrA_CtrA, hctrA);  // modifiers: hctrA
  reaction_1: => CtrA; Caulobacter*function_2(ks_CtrA_P1, Ji_CtrA_CtrA, CtrA, hctrA, GcrA);  // modifiers: hctrA, GcrA
  reaction_2: CtrA => ; Caulobacter*kd_CtrA1*CtrA;
  reaction_3: CtrA => ; Caulobacter*function_1(kd_CtrA2, DivK_P, Jd_CtrA_Divk_P, CtrA);  // modifiers: DivK_P
  reaction_4: => GcrA; Caulobacter*function_4(ks_GcrA, Ji_GcrA_CtrA, CtrA, DnaA);  // modifiers: CtrA, DnaA
  reaction_5: GcrA => ; Caulobacter*kd_GcrA*GcrA;  // modifiers: CtrA, DnaA
  reaction_6: => DnaA; Caulobacter*function_5(ks_DnaA, Ji_DnaA_GcrA, GcrA, CtrA, Ja_DnaA_CtrA, hcori);  // modifiers: GcrA, CtrA, hcori
  reaction_7: DnaA => ; Caulobacter*kd_DnaA*DnaA;
  reaction_8: => Fts; Caulobacter*function_6(ks_Fts, CtrA, hfts);  // modifiers: CtrA, hfts
  reaction_9: Fts => ; Caulobacter*kd_Fts*Fts;
  reaction_10: => Zring; Caulobacter*function_7(kzring_open, Zring, Ja_open);
  reaction_11: Zring => ; Caulobacter*function_8(kzring_closed1, Zring, Ja_closed);
  reaction_12: Zring => ; Caulobacter*function_9(kzring_closed2, Fts, JZring_Fts, Zring, Ja_closed);  // modifiers: Fts
  reaction_13: => DivK; Caulobacter*function_10(ks_DivK, CtrA);  // modifiers: CtrA
  reaction_14: DivK_P => DivK; Caulobacter*ktrans_DivK_P*DivK_P;
  reaction_15: DivK => DivK_P; Caulobacter*function_11(ktrans_DivK, DivK, Zring);  // modifiers: Zring
  reaction_16: DivK => ; Caulobacter*kd_DivK*DivK;
  reaction_17: DivK_P => ; Caulobacter*function_10(kd_Divk_P, DivK);  // modifiers: DivK
  reaction_18: => I; Caulobacter*function_6(ks_I, CtrA, hccrM);  // modifiers: CtrA, hccrM
  reaction_19: I => ; Caulobacter*kd_I*I;
  reaction_20: => CcrM; Caulobacter*function_10(ks_CcrM, I);  // modifiers: I
  reaction_21: CcrM => ; Caulobacter*kd_CcrM*CcrM;
  reaction_22: hcori => ; Caulobacter*function_12(km_cori, CcrM, Jm_cori, hcori);  // modifiers: CcrM
  reaction_23: hctrA => ; Caulobacter*function_12(km_ctrA, CcrM, Jm_ctrA, hctrA);  // modifiers: CcrM
  reaction_24: hccrM => ; Caulobacter*function_12(km_ccrM, CcrM, Jm_ccrM, hccrM);  // modifiers: CcrM
  reaction_25: hfts => ; Caulobacter*function_12(km_fts, CcrM, Jm_fts, hfts);  // modifiers: CcrM
  reaction_26: => Ini; Caulobacter*function_13(ka_Ini, DnaA, thetaDnaA, GcrA, thetaGcrA, CtrA, thetaCtrA, hcori, thetacori);  // modifiers: DnaA, GcrA, CtrA, hcori
  reaction_27: => Elong; Caulobacter*function_14(kelong, Elong, Pelong, Count);
  reaction_28: => DNA; Caulobacter*function_14(kelong, Elong, Pelong, Count);  // modifiers: Elong

  // Events:
  Pelong_threshold: at (Elong == Pelong): hcori = 1;
  PctrA_threshold: at (Elong == PctrA): hctrA = 1;
  PccrM_treshold: at (Elong == PccrM): hccrM = 1;
  Pfts_treshold: at (Elong == Pfts): hfts = 1;
  Ini_reset: at (Ini > 0.05): Ini = 0;
  Elong_reset_by_Ini: at (Ini == 0.05): Elong = Elong + Count*0.05;
  Elong_reset_by_Count: at (Elong >= Count/2): Elong = 0;
  DNA_reset_by_Ini: at (Ini == 0.05): DNA = DNA + Count*0.05;
  DNA_reset_by_Z_ring: at (Zring < 0.11): DNA = DNA/2; DNA_reset_by_Z_ring is "DNA reset by Z-ring";
  Count_assignment_by_Ini: at (Ini >= 0.05), fromTrigger=false: Count = Count*2;
  Count_reset_by_Z_ring: at (Zring < 0.11): Count = Count/2; Count_reset_by_Z_ring is "Count reset by Z-ring";

  // Unit definitions:
  unit volume = 1e-3 litre;
  unit time = 60 second;
  unit substance = 1e-3 mole;
  unit unit_0 = 1 / (0.06 second); unit_0 is "1/min";
  unit unit_1 = dimensionless^0;
end
