// SBML level 2 version 4
// dcterms:bibliographicCitation: urn:miriam:pubmed:19680425
// dcterms:bibliographicCitation: urn:miriam:doi:10.1371/journal.pcbi.1000463

function Constant_flux__irreversible(v)
  v;
end
Constant_flux__irreversible is "Constant flux (irreversible)";

function function_with_1k_1J_3M(k, J, M1, M2, M3)
  k*(J^2/(J^2 + M1^2))*M2*M3;
end

function function_with_1k_1J_2M__2(k, J, M1, M2)
  k*(M1^2/(J^2 + M1^2))*M2;
end

function function_for_deg_of_CtrA_and_CtrA_P(k1, M1, J1, M2, J2, M3, M4, J3)
  k1*(M1^2/(J1^2 + M1^2))*(M2^4/(J2^4 + M2^4))*(M3^4/(J3^4 + M3^4))*M4;
end

function function_1k_2M(k, M1, M2)
  k*M1*M2;
end

function function_for_DnaA_1k_1J_2M(k, J, M1, M2)
  k*(J^2/(J^2 + M1^2))*(2 - M2);
end

function function_for_DnaA_1k_1K_2M__2(k, M1, J, M2)
  k*(M1^2/(J^2 + M1^2))*(2 - M2);
end

function function_with_1k_1J_2M(k, J, M1, M2)
  k*(J^2/(J^2 + M1^2))*M2;
end

function function_for_Ini(k, M1, theta1, M2, theta2, M3, theta3, M4, theta4, M5)
  k*((M1/theta1)^4*(M2/theta2)^4/(1 + (M1/theta1)^4 + (M2/theta2)^4 + (M3/theta3)^4 + (M2/theta2)^4*(M3/theta3)^4 + (M4/theta4)^4))*M5;
end

function function_for_1k_1J_2M__4(k, M1, J, M2)
  k*(M1^4/(J^4 + M1^4))*M2;
end
function_for_1k_1J_2M__4 is "function for 1k 1J 2M ^4";

function function_for_1k_1m(k, M)
  k*M;
end

function function_for_h___(k, M1, J, S)
  k*(M1^4/(J^4 + M1^4))*S;
end
function_for_h___ is "function for h____";

function function_for_H__PodJL_and_PerP(k, S, H, M, J)
  k*S*H*((1 - M)/(J + 1 - M));
end

function function_for_DivJ1(H, k, J, M)
  (1 - H)*k*(J^2/(J^2 + M^2));
end

function function_dor_DivJ_2(k, M1, H, M2, J)
  k*M1*(1 - H)*((1 - M2)/(J + 1 - M2));
end

function function_for_1J_1k_1m(k, M1, J)
  k*(M1^2/(J^2 + M1^2));
end

function function_for_Divk_1(k, M1, M2, J, H, M4)
  k*M1*(M2^2/(J^2 + M2^2))*(1 + H*(M4 - 1));
end

function function_for_DivK2(k, M1, M2, J, M4, H)
  k*M1*(M2^2/(J^2 + M2^2))*(M4 + H*(1 - M4));
end

function function_for_CckA(k, M1, M2, J, M3)
  k*(M1 - M2)*(J^2/(J^2 + M3^2));
end

function function_for_CpdR_1(k, M1, M2)
  k*(M1 - M2);
end

function function_for_CpdR_2(k, M1, M2, J)
  k*M1*(M2^2/(J^2 + M2^2));
end

function function_for_ParAADP_2(k, M1, M2)
  k*(M1 - 1)*M2;
end

function function_for_FtsQ(k, M1, J1, M2, J2)
  k*(M1^2/(J1^2 + M1^2))*(M2^4/(J2^4 + M2^4));
end

function function_for_FtsZ_synthesis(k, J, M1, M2, M3)
  k*(J^2/(J^2 + M1^2))*M2*(1 - M3);
end

function function_for_1k_1_M1_M2(k, M1, M2)
  k*(1 - M1)*M2;
end
function_for_1k_1_M1_M2 is "function for 1k 1-M1 M2";

function function_for_Z_synthesis(k, M, J)
  k*((1 - M)/(J + 1 - M));
end

function function_for_Z_deg(k1, k2, M1, J1, M2, theta1, M3, theta2, S, J2)
  (k1 + k2*(M1^4/(J1^4 + M1^4))*((M2/theta1)^4/(1 + (M2/theta1)^4 + (M3/theta2)^4)))*(S/(J2 + S));
end

model Li2009__Assymetric_Caulobacter_cell_cycle()
  // Li2009- Assymetric Caulobacter cell cycle
  // The asymmetric cell division cycle of Caulobacter crescentus is orchestrated by an elaborate gene-protein regulatory network, centered on three major control proteins, DnaA, GcrA and CtrA. The regulatory network is cast into a quantitative computational model to investigate in a systematic fashion how these three proteins control the relevant genetic, biochemical and physiological properties of proliferating bacteria. Different controls for both swarmer and stalked cell cycles are represented in the mathematical scheme. The model is validated against observed phenotypes of wild-type cells and relevant mutants, and it predicts the phenotypes of novel mutants and of known mutants under novel experimental conditions. Because the cell cycle control proteins of Caulobacter are conserved across many species of alpha-proteobacteria, the model we are proposing here may be applicable to other genera of importance to agriculture and medicine
  // isDerivedFrom mamo:MAMO_0000046 GO:0007049 GO:0051726 taxonomy:155892 biomodels.db:BIOMD0000000718
  // hasProperty mamo:MAMO_0000046
  // hasProperty GO:0007049
  // hasProperty GO:0051726
  // hasTaxon taxonomy:155892
  // isDescribedBy biomodels.db:BIOMD0000000718 doi:10.1371/journal.pcbi.1000463

  // Compartments:
  compartment Caulobacter = 1;  // hasTaxon taxonomy:155892

  // Species:
  species DnaA in Caulobacter = 0.78;  // isVersionOf uniprot:P0CAU4
  species GcrA in Caulobacter = 0.65;  // isVersionOf uniprot:A0A0H3C9J4
  species CtrA in Caulobacter = 0.04;  // isVersionOf uniprot:P0CAW8
  species CtrA_P in Caulobacter = 0.08;  // isVersionOf uniprot:P0CAW8
  species DivK in Caulobacter = 0.66;  // isVersionOf uniprot:Q45976
  species DivK_P in Caulobacter = 0.34;  // hasPart ncit:C1897; isVersionOf uniprot:Q45976
  species I in Caulobacter = 0.09;
  species CcrM in Caulobacter = 0.15;  // isVersionOf uniprot:P0CAW2
  species hcori in Caulobacter = 1;  // hasProperty ncit:C44256
  species hctrA in Caulobacter = 0;  // hasProperty ncit:C44256
  species hccrM in Caulobacter = 0;  // hasProperty ncit:C44256
  species hftsZ in Caulobacter = 0;  // hasProperty ncit:C44256
  species Ini in Caulobacter = 0;  // hasProperty GO:0006270
  species DNA in Caulobacter = 1.05;  // isVersionOf ncit:C449
  species Count in Caulobacter = 2;  // hasPart ncit:C13202
  species PodJL in Caulobacter = 0.2;  // isVersionOf uniprot:Q9ZG88
  species PerP in Caulobacter = 0.55;  // isVersionOf uniprot:A0A0H3C966
  species DivJ in Caulobacter = 1;  // isVersionOf uniprot:A0A0H3C5M8
  species CckA_P in Caulobacter = 0.76;  // isVersionOf uniprot:A0A0H3C8Q4
  species CpdR in Caulobacter = 0.66;  // isVersionOf uniprot:Q9AA62
  species RcdA in Caulobacter = 0.74;  // isVersionOf uniprot:Q9A3A9
  species ParAADP in Caulobacter = 1;  // isVersionOf uniprot:P0CAV7
  species FtsZ in Caulobacter = 0.53;  // isVersionOf uniprot:A0A0V2FFH3
  species Zring in Caulobacter = 0.04;  // isVersionOf GO:0043226
  species CckA_tot in Caulobacter = 1.3;  // isVersionOf uniprot:A0A0H3C8Q4
  species CpdR_tot in Caulobacter = 1;  // isVersionOf uniprot:Q9AA62
  species ParA_tot in Caulobacter = 1;  // isVersionOf uniprot:P0CAV7
  species Elong in Caulobacter = 0.05;  // hasProperty GO:0022616
  species Z in Caulobacter = 1;
  species FtsQ in Caulobacter = 0.2;  // isVersionOf uniprot:A0A0V2FFD6

  // Parameters:
  H = 0;
  ks_CtrA_P1 = 0.0159; ks_CtrA_P1 is "ks,CtrA-P1";  // hasProperty ncit:C94967
  ks_CtrA_P2 = 0.14; ks_CtrA_P2 is "ks,CtrA-P2";  // hasProperty ncit:C94967
  kd_CtrA1 = 0.002; kd_CtrA1 is "kd,CtrA1";  // hasProperty ncit:C94967
  kd_CtrA2 = 0.25; kd_CtrA2 is "kd,CtrA2";  // hasProperty ncit:C94967
  ktrans_CtrA_P = 0.025; ktrans_CtrA_P is "ktrans,CtrA_P";  // hasProperty ncit:C94967
  ktrans_CtrA = 0.095; ktrans_CtrA is "ktrans.CtrA";  // hasProperty ncit:C94967
  ks_GcrA = 0.055; ks_GcrA is "ks,GcrA";  // hasProperty ncit:C94967
  kd_GcrA = 0.022; kd_GcrA is "kd,GcrA";  // hasProperty ncit:C94967
  ks_DnaA1 = 0.0031; ks_DnaA1 is "ks,DnaA1";  // hasProperty ncit:C94967
  ks_DnaA2 = 0.0022; ks_DnaA2 is "ks,DnaA2";  // hasProperty ncit:C94967
  kd_DnaA = 0.007; kd_DnaA is "kd,DnaA";  // hasProperty ncit:C94967
  ka_Ini = 0.01; ka_Ini is "ka,Ini";  // hasProperty ncit:C94967
  kelong = 0.0065;  // hasProperty ncit:C94967
  ks_I = 0.09; ks_I is "ks,I";  // hasProperty ncit:C94967
  kd_I = 0.04; kd_I is "kd,I";  // hasProperty ncit:C94967
  ks_CcrM = 0.072; ks_CcrM is "ks,CcrM";  // hasProperty ncit:C94967
  kd_CcrM = 0.07; kd_CcrM is "kd,CcrM";  // hasInstance ncit:C94967
  km_Cori = 0.4; km_Cori is "km,Cori";  // hasProperty ncit:C94967
  km_ctrA = 0.4; km_ctrA is "km,ctrA";  // hasProperty ncit:C94967
  km_ccrM = 0.4; km_ccrM is "km,ccrM";  // hasProperty ncit:C94967
  km_ftsz = 0.4; km_ftsz is "km,ftsz";  // hasProperty ncit:C94967
  ks_PodJL = 0.043; ks_PodJL is "ks,PodJL";  // hasInstance ncit:C94967
  kd_PodJL1 = 0.05; kd_PodJL1 is "kd,PodJL1";  // hasProperty ncit:C94967
  kd_PodJL2 = 0.002; kd_PodJL2 is "kd,PodJL2";  // hasProperty ncit:C94967
  ksep_PodJL = 0.3; ksep_PodJL is "ksep,PodJL";  // hasInstance ncit:C94967
  ks_PerP = 0.04; ks_PerP is "ks,PerP";  // hasProperty ncit:C94967
  kd_PerP = 0.02; kd_PerP is "kd,PerP";  // hasProperty ncit:C94967
  ksep_PerP = 0.011; ksep_PerP is "ksep,PerP";  // hasInstance ncit:C94967
  ks_DivJ1 = 0.002; ks_DivJ1 is "ks,DivJ1";  // hasProperty ncit:C94967
  ks_DivJ2 = 0.025; ks_DivJ2 is "ks,DivJ2";  // hasProperty ncit:C94967
  kd_DivJ = 0.002; kd_DivJ is "kd,DivJ";  // hasProperty ncit:C94967
  ksep_divJ = 0.3; ksep_divJ is "ksep,divJ";  // hasInstance ncit:C94967
  ks_DivK = 0.0024; ks_DivK is "ks,DivK";  // hasProperty ncit:C94967
  kd_DivK = 0.002; kd_DivK is "kd,DivK";  // hasProperty ncit:C94967
  ktrans_DivK = 0.15; ktrans_DivK is "ktrans,DivK";  // hasProperty ncit:C94967
  ktrans_DivK_P = 0.6; ktrans_DivK_P is "ktrans,DivK_P";  // hasProperty ncit:C94967
  ktrans_CckA_P = 0.05; ktrans_CckA_P is "ktrans,CckA_P";  // hasProperty ncit:C94967
  ktrans_CckA = 0.2; ktrans_CckA is "ktrans,CckA";  // hasProperty ncit:C94967
  ktrans_CpdR = 0.6; ktrans_CpdR is "ktrans,CpdR";  // hasProperty ncit:C94967
  ktrans_CpdR_P = 0.5; ktrans_CpdR_P is "ktrans,CpdR_P";  // hasProperty ncit:C94967
  ktrans_ParAATP = 0.5; ktrans_ParAATP is "ktrans,ParAATP";  // hasProperty ncit:C94967
  ktrans_ParAADP = 0.8; ktrans_ParAADP is "ktrans,ParAADP";  // hasProperty ncit:C94967
  ks_RcdA = 0.023; ks_RcdA is "ks,RcdA";  // hasProperty ncit:C94967
  kd_RcdA = 0.017; kd_RcdA is "kd,RcdA";  // hasProperty ncit:C94967
  ks_FtsQ = 0.06; ks_FtsQ is "ks,FtsQ";  // hasProperty ncit:C94967
  kd_FtsQ = 0.035; kd_FtsQ is "kd,FtsQ";  // hasProperty ncit:C94967
  ks_FtsZ = 0.036; ks_FtsZ is "ks,FtsZ";  // hasProperty ncit:C94967
  kd_FtsZ1 = 0.009; kd_FtsZ1 is "kd,FtsZ1";  // hasProperty ncit:C94967
  kd_FtsZ2 = 0.02; kd_FtsZ2 is "kd,FtsZ2";  // hasProperty ncit:C94967
  kd_FtsZ3 = 0.3; kd_FtsZ3 is "kd,FtsZ3";  // hasProperty ncit:C94967
  ks_Zring = 0.035; ks_Zring is "ks,Zring";  // hasProperty ncit:C94967
  kZ_open = 0.8; kZ_open is "kZ,open";  // hasProperty ncit:C94967
  kZ_closed1 = 0.0001; kZ_closed1 is "kZ,closed1";  // hasProperty ncit:C94967
  kZ_closed2 = 1.6; kZ_closed2 is "kZ,closed2";  // hasProperty ncit:C94967
  Ji_CtrA_CtrA_P = 0.4; Ji_CtrA_CtrA_P is "Ji,CtrA-CtrA_P";  // hasProperty OBI:0001144
  Ja_CtrA_CtrA_P = 0.45; Ja_CtrA_CtrA_P is "Ja,CtrA-CtrA_P";  // hasProperty OBI:0001144
  Jd_CtrA_DivK_P = 0.55; Jd_CtrA_DivK_P is "Jd,CtrA-DivK_P";  // hasProperty OBI:0001144
  jd_CtrA_CpdR = 0.6; jd_CtrA_CpdR is "jd,CtrA-CpdR";  // hasProperty OBI:0001144
  jd_CtrA_RcdA = 0.5; jd_CtrA_RcdA is "jd,CtrA-RcdA";  // hasProperty OBI:0001144
  Ji_GcrA_CtrA = 0.4; Ji_GcrA_CtrA is "Ji,GcrA-CtrA";  // hasProperty OBI:0001144
  JiDnaA_GcrA = 0.6; JiDnaA_GcrA is "JiDnaA-GcrA";  // hasProperty OBI:0001144
  Ja_Dna_CtrA_P = 0.3; Ja_Dna_CtrA_P is "Ja,Dna-CtrA_P";  // hasProperty OBI:0001144
  Ja_i_CtrA_P = 0.5; Ja_i_CtrA_P is "Ja,i-CtrA_P";  // hasProperty OBI:0001144
  Jm_Cori = 0.95; Jm_Cori is "Jm,Cori";  // hasInstance OBI:0001144
  Jm_ctrA = 0.95; Jm_ctrA is "Jm,ctrA";  // hasProperty OBI:0001144
  jm_ccrM = 0.95; jm_ccrM is "jm,ccrM";  // hasProperty OBI:0001144
  Jm_ftsZ = 0.95; Jm_ftsZ is "Jm,ftsZ";  // hasProperty OBI:0001144
  Ji_PodJL_CtrA_P = 0.6; Ji_PodJL_CtrA_P is "Ji,PodJL-CtrA_P";  // hasProperty OBI:0001144
  Jd_PodJL_PerP = 0.45; Jd_PodJL_PerP is "Jd,PodJL-PerP";  // hasProperty OBI:0001144
  jsep_PodJL = 0.3; jsep_PodJL is "jsep,PodJL";  // hasInstance OBI:0001144
  Jsep_PerP = 0.3; Jsep_PerP is "Jsep,PerP";  // hasProperty OBI:0001144
  Ji_DivJ_PodJL = 0.13; Ji_DivJ_PodJL is "Ji,DivJ-PodJL";  // hasProperty OBI:0001144
  Jsep_DivJ = 0.3; Jsep_DivJ is "Jsep,DivJ";  // hasProperty OBI:0001144
  Ja_DivK = 0.06; Ja_DivK is "Ja,DivK";  // hasProperty OBI:0001144
  JDivk_P_PodJL = 0.3; JDivk_P_PodJL is "JDivk_P-PodJL";  // hasProperty OBI:0001144
  JDivk_DivJ = 0.3; JDivk_DivJ is "JDivk-DivJ";  // hasProperty OBI:0001144
  Ji_Ccka_DivK_P = 0.3; Ji_Ccka_DivK_P is "Ji,Ccka-DivK_P";  // hasProperty OBI:0001144
  Ja_CpdR_CckA_P = 0.8; Ja_CpdR_CckA_P is "Ja,CpdR-CckA_P";  // hasProperty OBI:0001144
  Ja_RcdA_CtrA_P = 0.4; Ja_RcdA_CtrA_P is "Ja,RcdA-CtrA_P";  // hasProperty OBI:0001144
  Ja_FtsQ_CtrA_P = 0.5; Ja_FtsQ_CtrA_P is "Ja,FtsQ-CtrA_P";  // hasProperty OBI:0001144
  Ja_FtsQ_DNA = 0.05; Ja_FtsQ_DNA is "Ja,FtsQ,DNA";  // hasProperty OBI:0001144
  JiFtsZ_CtrA_P = 0.7; JiFtsZ_CtrA_P is "JiFtsZ-CtrA_P";  // hasProperty OBI:0001144
  Ja_open = 0.01; Ja_open is "Ja,open";  // hasProperty OBI:0001144
  JZ_FtsQ = 0.8; JZ_FtsQ is "JZ-FtsQ";  // hasProperty OBI:0001144
  Ja_closed = 0.05; Ja_closed is "Ja,closed";  // hasProperty OBI:0001144
  thethaCtrA_P = 0.5;  // ncit:C48228
  thethaGcrA = 0.65;  // ncit:C48228
  thethaDnaA = 0.65;  // ncit:C48228
  thethaCori = 0.05;  // ncit:C48228
  thethaZring = 0.3;  // ncit:C48228
  thethaParAADP = 0.3;  // ncit:C48228
  Pelong = 0.05;  // ncit:C104788
  PccrM = 0.2;  // ncit:C104788
  PctrA = 0.375;  // ncit:C104788
  PftsZ = 0.625;  // ncit:C104788

  // Reactions:
  CtrA_synthesis_1: => CtrA; Caulobacter*function_with_1k_1J_3M(ks_CtrA_P1, Ji_CtrA_CtrA_P, CtrA_P, GcrA, hctrA);  // modifiers: CtrA_P, GcrA, hctrA
  CtrA_synthesis_2: => CtrA; Caulobacter*function_with_1k_1J_2M__2(ks_CtrA_P2, Ja_CtrA_CtrA_P, CtrA_P, hctrA);  // modifiers: CtrA_P, hctrA
  CtrA_decay: CtrA => ; Caulobacter*kd_CtrA1*CtrA;
  CtrA_degradation: CtrA => ; Caulobacter*function_for_deg_of_CtrA_and_CtrA_P(kd_CtrA2, DivK_P, Jd_CtrA_DivK_P, CpdR, jd_CtrA_CpdR, RcdA, CtrA, jd_CtrA_RcdA);  // modifiers: DivK_P, CpdR, RcdA
  CtrA_dephosphorylation: CtrA_P => CtrA; Caulobacter*ktrans_CtrA_P*CtrA_P;
  CtrA_phosphorylation: CtrA => CtrA_P; Caulobacter*function_1k_2M(ktrans_CtrA, CtrA, CckA_P);  // modifiers: CckA_P
  CtrA_P_degradation: CtrA_P => ; Caulobacter*function_for_deg_of_CtrA_and_CtrA_P(kd_CtrA2, DivK_P, Jd_CtrA_DivK_P, CpdR, jd_CtrA_CpdR, RcdA, CtrA_P, jd_CtrA_RcdA);  // modifiers: DivK_P, CpdR, RcdA
  CtrA_P_decay: CtrA_P => ; Caulobacter*kd_CtrA1*CtrA_P;
  DnaA_synthesis: => DnaA; Caulobacter*function_for_DnaA_1k_1J_2M(ks_DnaA1, JiDnaA_GcrA, GcrA, hcori);  // modifiers: GcrA, hcori
  DnaA_synthesis_2: => DnaA; Caulobacter*function_for_DnaA_1k_1K_2M__2(ks_DnaA2, CtrA_P, Ja_Dna_CtrA_P, hcori);  // modifiers: CtrA_P, hcori
  DnaA_decay: DnaA => ; Caulobacter*kd_DnaA*DnaA;
  GcrA_synthesis: => GcrA; Caulobacter*function_with_1k_1J_2M(ks_GcrA, Ji_GcrA_CtrA, CtrA_P, DnaA);  // modifiers: CtrA_P, DnaA
  GcrA_decay: GcrA => ; Caulobacter*kd_GcrA*GcrA;
  Initiation_of_replication: => Ini; Caulobacter*function_for_Ini(ka_Ini, DnaA, thethaDnaA, GcrA, thethaGcrA, CtrA_P, thethaCtrA_P, hcori, thethaCori, Count);  // modifiers: DnaA, GcrA, CtrA_P, hcori, Count
  Elongation: => Elong; Caulobacter*function_for_1k_1J_2M__4(kelong, Elong, Pelong, Count);  // modifiers: Count
  DNA_synthesis: => DNA; Caulobacter*function_for_1k_1J_2M__4(kelong, Elong, Pelong, Count);  // modifiers: Elong, Count
  Inermediate_synthesis: => I; Caulobacter*function_with_1k_1J_2M__2(ks_I, Ja_i_CtrA_P, CtrA_P, hccrM);  // modifiers: CtrA_P, hccrM
  intermediate_decay: I => ; Caulobacter*kd_I*I;
  CcrM_synthesis: => CcrM; Caulobacter*function_for_1k_1m(ks_CcrM, I);  // modifiers: I
  CcrM_decay: CcrM => ; Caulobacter*kd_CcrM*CcrM;
  methylation_cori: hcori => ; Caulobacter*function_for_h___(km_Cori, CcrM, Jm_Cori, hcori);  // modifiers: CcrM
  methylation_ctrA: hctrA => ; Caulobacter*function_for_h___(km_ctrA, CcrM, Jm_ctrA, hctrA);  // modifiers: CcrM
  methylation_ccrM: hccrM => ; Caulobacter*function_for_h___(km_ccrM, CcrM, jm_ccrM, hccrM);  // modifiers: CcrM
  methylation_ftsZ: hftsZ => ; Caulobacter*function_for_h___(km_ftsz, CcrM, Jm_ftsZ, hftsZ);  // modifiers: CcrM
  PodJL_synthesis: => PodJL; Caulobacter*function_with_1k_1J_3M(ks_PodJL, Ji_PodJL_CtrA_P, CtrA_P, GcrA, DnaA);  // modifiers: CtrA_P, GcrA, DnaA
  Podjl_decay: PodJL => ; Caulobacter*kd_PodJL1*PodJL;
  PodJL_degradation: PodJL => ; Caulobacter*function_with_1k_1J_2M__2(kd_PodJL2, Jd_PodJL_PerP, PerP, PodJL);  // modifiers: PerP
  PodJL_degradation_2: PodJL => ; Caulobacter*function_for_H__PodJL_and_PerP(ksep_PodJL, PodJL, H, Z, jsep_PodJL);  // modifiers: Z
  PerP_synthesis: => PerP; Caulobacter*function_1k_2M(ks_PerP, CtrA_P, PodJL);  // modifiers: CtrA_P, PodJL
  PerP_decay: PerP => ; Caulobacter*kd_PerP*PerP;
  PerP_degradation: PerP => ; Caulobacter*function_for_H__PodJL_and_PerP(ksep_PerP, PerP, H, Z, Jsep_PerP);  // modifiers: Z
  DivJ_synthesis: => DivJ; Caulobacter*Constant_flux__irreversible(ks_DivJ1);
  DivJ_synthesis2: => DivJ; Caulobacter*function_for_DivJ1(H, ks_DivJ2, Ji_DivJ_PodJL, PodJL);  // modifiers: PodJL
  DivJ_decay: DivJ => ; Caulobacter*kd_DivJ*DivJ;
  DivJ_degradation: DivJ => ; Caulobacter*function_dor_DivJ_2(ksep_divJ, DivJ, H, Z, Jsep_DivJ);  // modifiers: Z
  DivK_synthesis: => DivK; Caulobacter*function_for_1J_1k_1m(ks_DivK, CtrA_P, Ja_DivK);  // modifiers: CtrA_P
  DivK_decay: DivK => ; Caulobacter*kd_DivK*DivK;
  DivK_dephosphorylation: DivK_P => DivK; Caulobacter*function_for_Divk_1(ktrans_DivK_P, DivK_P, PodJL, JDivk_P_PodJL, H, Z);  // modifiers: PodJL, Z
  DivK_phosphorylation: DivK => DivK_P; Caulobacter*function_for_DivK2(ktrans_DivK, DivK, DivJ, JDivk_DivJ, Z, H);  // modifiers: DivJ, Z
  CckA_P_decay: CckA_P => ; Caulobacter*ktrans_CckA_P*CckA_P;
  CckA_P_synthesis: => CckA_P; Caulobacter*function_for_CckA(ktrans_CckA, CckA_tot, CckA_P, Ji_Ccka_DivK_P, DivK_P);  // modifiers: CckA_tot, DivK_P
  CpdR_synthesis: => CpdR; Caulobacter*function_for_CpdR_1(ktrans_CpdR_P, CpdR_tot, CpdR);  // modifiers: CpdR_tot
  CpdR_degradation: CpdR => ; Caulobacter*function_for_CpdR_2(ktrans_CpdR, CpdR, CckA_P, Ja_CpdR_CckA_P);  // modifiers: CckA_P
  ParAADP_synthesis: => ParAADP; Caulobacter*function_for_CpdR_1(ktrans_ParAATP, ParA_tot, ParAADP);  // modifiers: ParA_tot
  parAADP_degradation: ParAADP => ; Caulobacter*function_for_ParAADP_2(ktrans_ParAADP, Count, ParAADP);  // modifiers: Count
  RcdA_synthesis: => RcdA; Caulobacter*function_for_1J_1k_1m(ks_RcdA, CtrA_P, Ja_RcdA_CtrA_P);  // modifiers: CtrA_P
  RcdA_decay: RcdA => ; Caulobacter*kd_RcdA*RcdA;
  FtsQ_synthesis: => FtsQ; Caulobacter*function_for_FtsQ(ks_FtsQ, CtrA_P, Ja_FtsQ_CtrA_P, hcori, Ja_FtsQ_DNA);  // modifiers: CtrA_P, hcori
  FtsQ_decay: FtsQ => ; Caulobacter*kd_FtsQ*FtsQ;
  FtsZ_synthesis: => FtsZ; Caulobacter*function_for_FtsZ_synthesis(ks_FtsZ, JiFtsZ_CtrA_P, CtrA_P, DnaA, hftsZ);  // modifiers: CtrA_P, DnaA, hftsZ
  FtsZ_decay: FtsZ => ; Caulobacter*kd_FtsZ1*FtsZ;
  FtsZ_degradation_1: FtsZ => ; Caulobacter*function_for_1k_1_M1_M2(kd_FtsZ2, Zring, FtsZ);  // modifiers: Zring
  FtsZ_degradation_2: FtsZ => ; Caulobacter*function_for_1k_1_M1_M2(kd_FtsZ3, Z, FtsZ);  // modifiers: Z
  Zring_closing: => Zring; Caulobacter*function_for_1k_1_M1_M2(ks_Zring, Zring, FtsZ);  // modifiers: FtsZ
  Z_synthesis: => Z; Caulobacter*function_for_Z_synthesis(kZ_open, Z, Ja_open);
  Z_degrdataion: Z => ; Caulobacter*function_for_Z_deg(kZ_closed1, kZ_closed2, FtsQ, JZ_FtsQ, Zring, thethaZring, ParAADP, thethaParAADP, Z, Ja_closed);  // modifiers: FtsQ, Zring, ParAADP
  DivK_P_decay: DivK_P => ; Caulobacter*kd_DivK*DivK_P;

  // Events:
  Ini_equal_0_05Count: at (Ini >= 0.05*Count): Count = Count*2, Elong = Elong + Ini, DNA = DNA + Ini, Ini = 0, hcori = 1; Ini_equal_0_05Count is "Ini equal 0.05Count";
  Z_equals_0: at (Z <= 0.1): Count = Count/2, Zring = 0, Elong = Elong/2, DNA = DNA/2;
  Elong_reset_by_count: at (Elong >= Count/2): Elong = 0;
  hcori_reset_by_Elong: at (Elong*2 >= Pelong*Count): hcori = 1;
  hctrA_reset_by_Elong: at (Elong*2 >= PctrA*Count): hctrA = 1;
  hccrM_reset_by_Elong: at (Elong*2 >= PccrM*Count): hccrM = 1;
  hftsZ_reset_by_Elong: at (Elong*2 >= PftsZ*Count): hftsZ = 1;

  // Unit definitions:
  unit volume = 1e-3 litre;
  unit time = 60 second;
  unit substance = 1e-3 mole;
end
