// SBML level 2 version 4

function Constant_flux__irreversible(v)
  v;
end
Constant_flux__irreversible is "Constant flux (irreversible)";

function mixed_competitive_and_noncompetitive_inhibition(v, volume, substrate, Km, compet_inhib, noncompet_inhib, Ki)
  v*volume*substrate/((Km + substrate + compet_inhib)*(1 + noncompet_inhib/Ki));
end

function mass_action__dif_compartments__explicit_volume___1(k, VolCompart, Substrate)
  k*Substrate*VolCompart;
end
mass_action__dif_compartments__explicit_volume___1 is "mass action (dif compartments, explicit volume) [1]";

model Mouse_Iron_Distribution___Rich_and_Deficient_iron_diets__tracer()
  // Mouse Iron Distribution - Rich and Deficient iron diets (tracer)
  // Mouse Iron Distribution Dynamics
  // Dynamic model of iron distribution in mice. This model attempts to fit the radioiron tracer data from Lopes et al. 2010 for mice fed iron deficient and rich diets by adjusting the rate of iron intake (vDiet) and the hepcidin synthesis rate (vhepcidin) independently for each experiment. All other parameters are those that provide the best fit for the adequate diet.
  // This model includes the radioiron tracer species.
  // Differences in parameter values between deficient, rich, and adequate diets:
  // Diet vDiet vhepcidin
  // Adequate 0.00377422 1.7393e-08
  // Deficient 0 8.54927e-09
  // Rich 0.00415624 2.30942e-08
  // biomodels.db:MODEL1903040001 biomodels.db:BIOMD0000000734
  // GO:0055072
  // hasProperty mamo:MAMO_0000046
  // hasTaxon taxonomy:10090
  // isDescribedBy pubmed:20704761 pubmed:28521769

  // Compartments:
  compartment Duodenum = 3.84615e-5;  // BTO:0000365
  compartment RBC = 0.00079;  // BTO:0000424
  compartment Spleen = 6.73077e-5;  // BTO:0001281
  compartment Liver = 0.001161905;  // BTO:0000759
  compartment Plasma = 0.0013;  // BTO:0000131
  compartment RestOfBody = 0.019694766;
  compartment BoneMarrow = 0.000214286;  // BTO:0000141

  // Species:
  species FeDuo in Duodenum = 0; FeDuo is "FeDuo*";  // isVersionOf CHEBI:24875
  species FeDuo_0 in Duodenum = 0.01175906;  // isVersionOf CHEBI:24875
  species FeRBC in RBC = 0; FeRBC is "FeRBC*";  // isVersionOf CHEBI:24875
  species FeRBC_0 in RBC = 0.03797999;  // isVersionOf CHEBI:24875
  species FeSpleen in Spleen = 0; FeSpleen is "FeSpleen*";  // isVersionOf CHEBI:24875
  species FeSpleen_0 in Spleen = 0.0039424;  // isVersionOf CHEBI:24875
  species FeLiver in Liver = 0; FeLiver is "FeLiver*";  // isVersionOf CHEBI:24875
  species FeLiver_0 in Liver = 0.00200011;  // isVersionOf CHEBI:24875
  species Fe2Tf in Plasma = 0; Fe2Tf is "Fe2Tf*";  // hasPart uniprot:Q921I1; hasPart CHEBI:29034
  species NTBI in Plasma = 0; NTBI is "NTBI*";  // isVersionOf CHEBI:24875
  species Tf in Plasma = 1.582183e-5;  // uniprot:Q921I1
  species Fe1Tf in Plasma = 0; Fe1Tf is "Fe1Tf*";  // hasPart CHEBI:29034; hasPart uniprot:Q921I1
  species Hepcidin in Plasma = 2.300175e-8;  // uniprot:Q9EQ21
  species Fe2Tf_0 in Plasma = 1.352482e-5;  // hasPart CHEBI:29034; hasPart uniprot:Q921I1
  species Fe1Tf_0 in Plasma = 9.353347e-6;  // hasPart uniprot:Q921I1; hasPart CHEBI:29034
  species NTBI_0 in Plasma = 3.331121e-8;  // isVersionOf CHEBI:24875
  species Fe2Tf_ in Plasma = 0; Fe2Tf_ is "Fe2Tf**";  // hasPart uniprot:Q921I1; hasPart CHEBI:29034
  species FeRest in RestOfBody = 0; FeRest is "FeRest*";  // isVersionOf CHEBI:24875
  species FeOutside in RestOfBody = 0; FeOutside is "FeOutside*";  // isVersionOf CHEBI:24875
  species FeRest_0 in RestOfBody = 0.0002868417;  // isVersionOf CHEBI:24875
  species $FeOutside_0 in RestOfBody = 0;  // isVersionOf CHEBI:24875
  species FeBM in BoneMarrow = 0.003037836;  // isVersionOf CHEBI:24875
  species FeBM_0 in BoneMarrow = 0; FeBM_0 is "FeBM*";  // isVersionOf CHEBI:24875

  // Parameters:
  var Total_Fe___in_body; Total_Fe___in_body is "Total_Fe* (in body)";
  var FePlasma; FePlasma is "FePlasma*";
  Injected = 3.073e15;
  kNTBI_Fe1Tf = 1084322005;
  kInDuo = 0.06899842;
  kInLiver = 2.977905;
  kInRBC = 1.084476;
  kInRest = 6.163562;
  var FePlasma_conc_; FePlasma_conc_ is "FePlasma(conc)*";
  Km = 0.01594212;
  Ki = 1e-9;
  kFe1Tf_Fe2Tf = 1084322005;
  VDuoNTBI = 0.2002419;
  VLiverNTBI = 0.02611476;
  VSpleenNTBI = 1.342205;
  VRestNTBI = 0.01094513;
  kDuoLoss = 0.02701133;
  vRBCSpleen = 0.0235286;
  kRestLoss = 0.02353324;
  var FePlasma_0;
  kInBM = 15.76906;
  kBMSpleen = 0.06190295;
  var Total_Fe__g; Total_Fe__g is "Total_Fe_(g)";
  var Total_Tf_mg_ml; Total_Tf_mg_ml is "Total_Tf_mg/ml";
  vDiet = 0.003774223;
  var FePlasma_conc; FePlasma_conc is "FePlasma(conc)";
  quantity_to_number_factor = 6.02214179e23;
  Avogadro = 6.02214179e23; Avogadro is "Avogadro Constant";

  // Assignment rules:
  PSpleen := 100*FeSpleen*quantity_to_number_factor*Spleen/Injected;
  PRBC := 100*FeRBC*quantity_to_number_factor*RBC/Injected;
  Total_Fe___in_body := FeDuo*quantity_to_number_factor*Duodenum + FeLiver*quantity_to_number_factor*Liver + FeSpleen*quantity_to_number_factor*Spleen + FeRBC*quantity_to_number_factor*RBC + FeRest*quantity_to_number_factor*RestOfBody + Fe2Tf*quantity_to_number_factor*Plasma + NTBI*quantity_to_number_factor*Plasma + 2*Fe2Tf_*quantity_to_number_factor*Plasma + Fe1Tf*quantity_to_number_factor*Plasma + FeBM_0*quantity_to_number_factor*BoneMarrow;
  FePlasma := Fe2Tf*quantity_to_number_factor*Plasma + NTBI*quantity_to_number_factor*Plasma + Fe1Tf*quantity_to_number_factor*Plasma + 2*Fe2Tf_*quantity_to_number_factor*Plasma;
  PLiver := 100*FeLiver*quantity_to_number_factor*Liver/Injected;
  PDuo := 100*FeDuo*quantity_to_number_factor*Duodenum/Injected;
  FePlasma_conc_ := FePlasma/(Plasma*Avogadro);
  TfSaturation := 100*(2*Fe2Tf*quantity_to_number_factor*Plasma + 2*Fe2Tf_0*quantity_to_number_factor*Plasma + Fe1Tf*quantity_to_number_factor*Plasma + Fe1Tf_0*quantity_to_number_factor*Plasma + 2*Fe2Tf_*quantity_to_number_factor*Plasma)/(2*(Fe2Tf*quantity_to_number_factor*Plasma + Fe1Tf*quantity_to_number_factor*Plasma + Tf*quantity_to_number_factor*Plasma + Fe2Tf_*quantity_to_number_factor*Plasma + Fe2Tf_0*quantity_to_number_factor*Plasma + Fe1Tf_0*quantity_to_number_factor*Plasma));
  POutside := 100*FeOutside*quantity_to_number_factor*RestOfBody/Injected;
  PRest := 100*FeRest*quantity_to_number_factor*RestOfBody/Injected;
  PPlasma := 100*(NTBI*quantity_to_number_factor*Plasma + 2*Fe2Tf_*quantity_to_number_factor*Plasma + Fe2Tf*quantity_to_number_factor*Plasma + Fe1Tf*quantity_to_number_factor*Plasma)/Injected;
  Total_Fe_concentration := (FeDuo_0*quantity_to_number_factor*Duodenum + FeLiver_0*quantity_to_number_factor*Liver + FeSpleen_0*quantity_to_number_factor*Spleen + FeRBC_0*quantity_to_number_factor*RBC + FeRest_0*quantity_to_number_factor*RestOfBody + 2*Fe2Tf_0*quantity_to_number_factor*Plasma + Fe2Tf*quantity_to_number_factor*Plasma + Fe1Tf_0*quantity_to_number_factor*Plasma + NTBI_0*quantity_to_number_factor*Plasma + FeBM*quantity_to_number_factor*BoneMarrow)/(Avogadro*(Duodenum + Liver + Plasma + RBC + RestOfBody + Spleen));
  Total_Fe := FeDuo_0*quantity_to_number_factor*Duodenum + FeLiver_0*quantity_to_number_factor*Liver + FeSpleen_0*quantity_to_number_factor*Spleen + FeRBC_0*quantity_to_number_factor*RBC + FeRest_0*quantity_to_number_factor*RestOfBody + 2*Fe2Tf_0*quantity_to_number_factor*Plasma + Fe2Tf*quantity_to_number_factor*Plasma + Fe1Tf_0*quantity_to_number_factor*Plasma + NTBI_0*quantity_to_number_factor*Plasma + FeBM*quantity_to_number_factor*BoneMarrow;
  FePlasma_0 := 2*Fe2Tf_0*quantity_to_number_factor*Plasma + Fe2Tf*quantity_to_number_factor*Plasma + Fe1Tf_0*quantity_to_number_factor*Plasma + NTBI_0*quantity_to_number_factor*Plasma;
  FePlasma_conc := FePlasma_0/(Plasma*Avogadro);
  PBM := 100*FeBM_0*quantity_to_number_factor*BoneMarrow/Injected;
  Total_Fe__g := Total_Fe*55.845/Avogadro;
  Total_Tf := Tf*quantity_to_number_factor*Plasma + Fe1Tf*quantity_to_number_factor*Plasma + Fe1Tf_0*quantity_to_number_factor*Plasma + Fe2Tf_*quantity_to_number_factor*Plasma + Fe2Tf*quantity_to_number_factor*Plasma + Fe2Tf_0*quantity_to_number_factor*Plasma;
  Total_Tf_conc := Total_Tf/(Avogadro*Plasma);
  Total_Tf_mg_ml := Total_Tf_conc*80;

  // Reactions:
  Duo_NTBI: FeDuo => NTBI; mixed_competitive_and_noncompetitive_inhibition(VDuoNTBI, Duodenum, FeDuo, Km, FeDuo_0, Hepcidin, Ki); Duo_NTBI is "Duo_NTBI*";  // modifiers: FeDuo_0, Hepcidin; isVersionOf GO:0006826
  Fe2Tf_BM_: Fe2Tf_ => 2 FeBM_0 + Tf; mass_action__dif_compartments__explicit_volume___1(kInBM, Plasma, Fe2Tf_); Fe2Tf_BM_ is "Fe2Tf_BM**";  // isVersionOf GO:0006826
  RBC_Spleen: FeRBC => FeSpleen; mass_action__dif_compartments__explicit_volume___1(vRBCSpleen, RBC, FeRBC); RBC_Spleen is "RBC_Spleen*";  // isVersionOf GO:0006826
  Spleen_NTBI: FeSpleen => NTBI; mixed_competitive_and_noncompetitive_inhibition(VSpleenNTBI, Spleen, FeSpleen, Km, FeSpleen_0, Hepcidin, Ki); Spleen_NTBI is "Spleen_NTBI*";  // modifiers: FeSpleen_0, Hepcidin; isVersionOf GO:0006826
  Liver_NTBI: FeLiver => NTBI; mixed_competitive_and_noncompetitive_inhibition(VLiverNTBI, Liver, FeLiver, Km, FeLiver_0, Hepcidin, Ki); Liver_NTBI is "Liver_NTBI*";  // modifiers: FeLiver_0, Hepcidin; isVersionOf GO:0006826
  NTBI_Fe1Tf: NTBI + Tf => Fe1Tf; Plasma*kNTBI_Fe1Tf*NTBI*Tf; NTBI_Fe1Tf is "NTBI_Fe1Tf*";  // GO:0005488
  DuoLoss: FeDuo => FeOutside; mass_action__dif_compartments__explicit_volume___1(kDuoLoss, Duodenum, FeDuo); DuoLoss is "DuoLoss*";  // isVersionOf ncit:C25559
  Fe2Tf_Liver_: Fe2Tf_ => 2 FeLiver + Tf; mass_action__dif_compartments__explicit_volume___1(kInLiver, Plasma, Fe2Tf_); Fe2Tf_Liver_ is "Fe2Tf_Liver**";  // isVersionOf GO:0006826
  Fe2Tf_Rest_: Fe2Tf_ => 2 FeRest + Tf; mass_action__dif_compartments__explicit_volume___1(kInRest, Plasma, Fe2Tf_); Fe2Tf_Rest_ is "Fe2Tf_Rest**";  // isVersionOf GO:0006826
  RestLoss: FeRest => FeOutside; RestOfBody*kRestLoss*FeRest; RestLoss is "RestLoss*";  // isVersionOf ncit:C25559
  Fe2Tf_Duo_: Fe2Tf_ => 2 FeDuo + Tf; mass_action__dif_compartments__explicit_volume___1(kInDuo, Plasma, Fe2Tf_); Fe2Tf_Duo_ is "Fe2Tf_Duo**";  // isVersionOf GO:0006826
  Rest_NTBI: FeRest => NTBI; mixed_competitive_and_noncompetitive_inhibition(VRestNTBI, RestOfBody, FeRest, Km, FeRest_0, Hepcidin, Ki); Rest_NTBI is "Rest_NTBI*";  // modifiers: FeRest_0, Hepcidin; isVersionOf GO:0006826
  Fe1Tf__Fe2Tf_: Fe1Tf + NTBI => Fe2Tf_; Plasma*kFe1Tf_Fe2Tf*Fe1Tf*NTBI; Fe1Tf__Fe2Tf_ is "Fe1Tf*_Fe2Tf**";  // GO:0005488
  Fe1Tf_Liver: Fe1Tf => FeLiver + Tf; mass_action__dif_compartments__explicit_volume___1(kInLiver, Plasma, Fe1Tf); Fe1Tf_Liver is "Fe1Tf_Liver*";  // isVersionOf GO:0006826
  Fe1Tf_BM: Fe1Tf => FeBM_0 + Tf; mass_action__dif_compartments__explicit_volume___1(kInBM, Plasma, Fe1Tf); Fe1Tf_BM is "Fe1Tf_BM*";  // isVersionOf GO:0006826
  Fe1Tf_Rest: Fe1Tf => FeRest + Tf; mass_action__dif_compartments__explicit_volume___1(kInRest, Plasma, Fe1Tf); Fe1Tf_Rest is "Fe1Tf_Rest*";  // isVersionOf GO:0006826
  Fe1Tf_Duo: Fe1Tf => FeDuo + Tf; mass_action__dif_compartments__explicit_volume___1(kInDuo, Plasma, Fe1Tf); Fe1Tf_Duo is "Fe1Tf_Duo*";  // isVersionOf GO:0006826
  Diet: => FeDuo_0; Duodenum*Constant_flux__irreversible(vDiet);  // isPropertyOf ncit:C15222
  HepcidinSynthesis: => Hepcidin; Plasma*Constant_flux__irreversible(v);  // isPropertyOf ncit:C61408
    v = 1.7393e-8;
  HepcidinDecay: Hepcidin => ; Plasma*k1*Hepcidin;  // isPropertyOf ncit:C75947
    k1 = 0.75616;
  Duo_NTBI_0: FeDuo_0 => NTBI_0; mixed_competitive_and_noncompetitive_inhibition(VDuoNTBI, Duodenum, FeDuo_0, Km, FeDuo, Hepcidin, Ki);  // modifiers: FeDuo, Hepcidin; isVersionOf GO:0006826
  Fe2Tf_BM: Fe2Tf_0 => 2 FeBM + Tf; mass_action__dif_compartments__explicit_volume___1(kInBM, Plasma, Fe2Tf_0);  // isVersionOf GO:0006826
  RBC_Spleen_0: FeRBC_0 => FeSpleen_0; mass_action__dif_compartments__explicit_volume___1(vRBCSpleen, RBC, FeRBC_0);  // isVersionOf GO:0006826
  Spleen_NTBI_0: FeSpleen_0 => NTBI_0; mixed_competitive_and_noncompetitive_inhibition(VSpleenNTBI, Spleen, FeSpleen_0, Km, FeSpleen, Hepcidin, Ki);  // modifiers: FeSpleen, Hepcidin; isVersionOf GO:0006826
  Liver_NTBI_0: FeLiver_0 => NTBI_0; mixed_competitive_and_noncompetitive_inhibition(VLiverNTBI, Liver, FeLiver_0, Km, FeLiver, Hepcidin, Ki);  // modifiers: FeLiver, Hepcidin; isVersionOf GO:0006826
  NTBI_Fe1Tf_0: NTBI_0 + Tf => Fe1Tf_0; Plasma*kNTBI_Fe1Tf*NTBI_0*Tf;  // GO:0005488
  DuoLoss_0: FeDuo_0 => $FeOutside_0; mass_action__dif_compartments__explicit_volume___1(kDuoLoss, Duodenum, FeDuo_0);  // isVersionOf ncit:C25559
  Fe2Tf_Liver: Fe2Tf_0 => 2 FeLiver_0 + Tf; mass_action__dif_compartments__explicit_volume___1(kInLiver, Plasma, Fe2Tf_0);  // isVersionOf GO:0006826
  Fe2Tf_Rest: Fe2Tf_0 => 2 FeRest_0 + Tf; mass_action__dif_compartments__explicit_volume___1(kInRest, Plasma, Fe2Tf_0);  // isVersionOf GO:0006826
  RestLoss_0: FeRest_0 => $FeOutside_0; RestOfBody*kRestLoss*FeRest_0;  // isVersionOf ncit:C25559
  Fe2Tf_Duo: Fe2Tf_0 => 2 FeDuo_0 + Tf; mass_action__dif_compartments__explicit_volume___1(kInDuo, Plasma, Fe2Tf_0);  // isVersionOf GO:0006826
  Rest_NTBI_0: FeRest_0 => NTBI_0; mixed_competitive_and_noncompetitive_inhibition(VRestNTBI, RestOfBody, FeRest_0, Km, FeRest, Hepcidin, Ki);  // modifiers: FeRest, Hepcidin; isVersionOf GO:0006826
  Fe1Tf_Fe2Tf: Fe1Tf_0 + NTBI_0 => Fe2Tf_0; Plasma*kFe1Tf_Fe2Tf*Fe1Tf_0*NTBI_0;  // GO:0005488
  Fe1Tf_Liver_0: Fe1Tf_0 => FeLiver_0 + Tf; mass_action__dif_compartments__explicit_volume___1(kInLiver, Plasma, Fe1Tf_0);  // isVersionOf GO:0006826
  Fe1Tf_BM_0: Fe1Tf_0 => FeBM + Tf; mass_action__dif_compartments__explicit_volume___1(kInBM, Plasma, Fe1Tf_0);  // isVersionOf GO:0006826
  Fe1Tf_Rest_0: Fe1Tf_0 => FeRest_0 + Tf; mass_action__dif_compartments__explicit_volume___1(kInRest, Plasma, Fe1Tf_0);  // isVersionOf GO:0006826
  Fe1Tf_Duo_0: Fe1Tf_0 => FeDuo_0 + Tf; mass_action__dif_compartments__explicit_volume___1(kInDuo, Plasma, Fe1Tf_0);  // isVersionOf GO:0006826
  Fe1Tf_Fe2Tf_0: Fe1Tf_0 + NTBI => Fe2Tf; Plasma*kFe1Tf_Fe2Tf*Fe1Tf_0*NTBI; Fe1Tf_Fe2Tf_0 is "Fe1Tf_Fe2Tf*";  // GO:0005488
  Fe1Tf__Fe2Tf: Fe1Tf + NTBI_0 => Fe2Tf; Plasma*kFe1Tf_Fe2Tf*Fe1Tf*NTBI_0; Fe1Tf__Fe2Tf is "Fe1Tf*_Fe2Tf*";  // GO:0005488
  Fe2Tf_Duo_0: Fe2Tf => FeDuo + FeDuo_0 + Tf; mass_action__dif_compartments__explicit_volume___1(kInDuo, Plasma, Fe2Tf); Fe2Tf_Duo_0 is "Fe2Tf_Duo*";  // isVersionOf GO:0006826
  Fe2Tf_Liver_0: Fe2Tf => FeLiver + FeLiver_0 + Tf; mass_action__dif_compartments__explicit_volume___1(kInLiver, Plasma, Fe2Tf); Fe2Tf_Liver_0 is "Fe2Tf_Liver*";  // isVersionOf GO:0006826
  Fe2Tf_BM_0: Fe2Tf => FeBM_0 + FeBM + Tf; mass_action__dif_compartments__explicit_volume___1(kInBM, Plasma, Fe2Tf); Fe2Tf_BM_0 is "Fe2Tf_BM*";  // isVersionOf GO:0006826
  Fe2Tf_Rest_0: Fe2Tf => FeRest + FeRest_0 + Tf; mass_action__dif_compartments__explicit_volume___1(kInRest, Plasma, Fe2Tf); Fe2Tf_Rest_0 is "Fe2Tf_Rest*";  // isVersionOf GO:0006826
  BM_RBC: FeBM => FeRBC_0; mass_action__dif_compartments__explicit_volume___1(kInRBC, BoneMarrow, FeBM);  // isVersionOf GO:0006826
  BM_RBC_0: FeBM_0 => FeRBC; mass_action__dif_compartments__explicit_volume___1(kInRBC, BoneMarrow, FeBM_0); BM_RBC_0 is "BM_RBC*";  // isVersionOf GO:0006826
  BM_Spleen: FeBM => FeSpleen_0; mass_action__dif_compartments__explicit_volume___1(kBMSpleen, BoneMarrow, FeBM);  // isVersionOf GO:0006826
  BM_Spleen_0: FeBM_0 => FeSpleen; mass_action__dif_compartments__explicit_volume___1(kBMSpleen, BoneMarrow, FeBM_0); BM_Spleen_0 is "BM_Spleen*";  // isVersionOf GO:0006826

  // Events:
  event_1: at (time >= 35): NTBI = Injected/(Avogadro*Plasma);

  // Unit definitions:
  unit length = metre;
  unit area = metre^2;
  unit volume = litre;
  unit time = 86400 second;
  unit substance = mole;
end
