// SBML level 2 version 4
// dcterms:bibliographicCitation: Modeling the dynamics of mouse iron body distribution: hepcidin is necessary but not sufficient urn:miriam:pubmed:28521769

function Constant_flux__irreversible(v)
  v;
end
Constant_flux__irreversible is "Constant flux (irreversible)";

function mass_action__dif_compartments__explicit_volume___1(k, VolCompart, Substrate)
  k*Substrate*VolCompart;
end
mass_action__dif_compartments__explicit_volume___1 is "mass action (dif compartments, explicit volume) [1]";

function mixed_competitive_and_noncompetitive_inhibition(v, volume, substrate, Km, compet_inhib, noncompet_inhib, Ki)
  v*volume*substrate/((Km + substrate + compet_inhib)*(1 + noncompet_inhib/Ki));
end

model Mouse_Iron_Distribution___Adequate_iron_diet__tracer()
  // Mouse Iron Distribution - Adequate iron diet (tracer)
  // Mouse Iron Distribution Dynamics
  // Dynamic model of iron distribution in mice. This model includes normal iron and radioactive labelled tracer iron species and was used for parameter estimation given the data from Lopes et al. 2010 for mice fed an adequate iron diet.
  // biomodels.db:MODEL1605030002 biomodels.db:BIOMD0000000735
  // GO:0055072
  // hasProperty mamo:MAMO_0000046
  // hasTaxon taxonomy:10090
  // isDescribedBy pubmed:28521769
  // isDescribedBy pubmed:28521769

  // Compartments:
  compartment Duodenum = 3.84615e-5;  // BTO:0000365
  compartment RBC = 0.00079;  // BTO:0000424
  compartment Spleen = 6.73077e-5;  // BTO:0001281
  compartment Liver = 0.001161905;  // BTO:0000759
  compartment Plasma = 0.0013;  // BTO:0000131
  compartment RestOfBody = 0.019694766;
  compartment BoneMarrow = 0.000214286;  // BTO:0000141

  // Species:
  species FeDuo in Duodenum = 0; FeDuo is "FeDuo*";  // isVersionOf CHEBI:24875
  species FeDuo_0 in Duodenum = 0.01175906;  // isVersionOf CHEBI:24875
  species FeRBC in RBC = 0; FeRBC is "FeRBC*";  // isVersionOf CHEBI:24875
  species FeRBC_0 in RBC = 0.03797999;  // isVersionOf CHEBI:24875
  species FeSpleen in Spleen = 0; FeSpleen is "FeSpleen*";  // isVersionOf CHEBI:24875
  species FeSpleen_0 in Spleen = 0.0039424;  // isVersionOf CHEBI:24875
  species FeLiver in Liver = 0; FeLiver is "FeLiver*";  // isVersionOf CHEBI:24875
  species FeLiver_0 in Liver = 0.00200011;  // isVersionOf CHEBI:24875
  species Fe2Tf in Plasma = 0; Fe2Tf is "Fe2Tf*";  // hasPart CHEBI:29034; hasPart uniprot:Q921I1
  species NTBI in Plasma = 0; NTBI is "NTBI*";  // isVersionOf CHEBI:24875
  species Tf in Plasma = 1.582183e-5;  // uniprot:Q921I1
  species Fe1Tf in Plasma = 0; Fe1Tf is "Fe1Tf*";  // hasPart uniprot:Q921I1; hasPart CHEBI:29034
  species Hepcidin in Plasma = 2.300175e-8;  // uniprot:Q9EQ21
  species Fe2Tf_0 in Plasma = 1.352482e-5;  // hasPart uniprot:Q921I1; hasPart CHEBI:29034
  species Fe1Tf_0 in Plasma = 9.353347e-6;  // hasPart CHEBI:29034; hasPart uniprot:Q921I1
  species NTBI_0 in Plasma = 3.331121e-8;  // isVersionOf CHEBI:24875
  species Fe2Tf_ in Plasma = 0; Fe2Tf_ is "Fe2Tf**";  // hasPart CHEBI:29034; hasPart uniprot:Q921I1
  species FeRest in RestOfBody = 0; FeRest is "FeRest*";  // isVersionOf CHEBI:24875
  species FeOutside in RestOfBody = 0; FeOutside is "FeOutside*";  // isVersionOf CHEBI:24875
  species FeRest_0 in RestOfBody = 0.0002868417;  // isVersionOf CHEBI:24875
  species $FeOutside_0 in RestOfBody = 0;  // isVersionOf CHEBI:24875
  species FeBM in BoneMarrow = 0.003037836;  // isVersionOf CHEBI:24875
  species FeBM_0 in BoneMarrow = 0; FeBM_0 is "FeBM*";  // isVersionOf CHEBI:24875

  // Parameters:
  var Total_Fe___in_body; Total_Fe___in_body is "Total_Fe* (in body)";
  var FePlasma; FePlasma is "FePlasma*";
  Injected = 3.073e15;
  kNTBI_Fe1Tf = 1084322005;
  kInDuo = 0.06899842;
  kInLiver = 2.977905;
  kInRBC = 1.084476;
  kInRest = 6.163562;
  var FePlasma_conc_; FePlasma_conc_ is "FePlasma(conc)*";
  Km = 0.01594212;
  Ki = 1e-9;
  kFe1Tf_Fe2Tf = 1084322005;
  VDuoNTBI = 0.2002419;
  VLiverNTBI = 0.02611476;
  VSpleenNTBI = 1.342205;
  VRestNTBI = 0.01094513;
  kDuoLoss = 0.02701133;
  vRBCSpleen = 0.0235286;
  kRestLoss = 0.02353324;
  var FePlasma_0;
  kInBM = 15.76906;
  kBMSpleen = 0.06190295;
  var Total_Fe__g; Total_Fe__g is "Total_Fe_(g)";
  var Total_Tf_mg_ml; Total_Tf_mg_ml is "Total_Tf_mg/ml";
  vDiet = 0.003774223;
  var FePlasma_conc; FePlasma_conc is "FePlasma(conc)";
  Avogadro = 6.02214179e23 unit_0;
  Initial_for_Avogadro = Avogadro;

  // Assignment rules:
  Total_Fe___in_body := FeDuo*Avogadro*Duodenum + FeLiver*Avogadro*Liver + FeSpleen*Avogadro*Spleen + FeRBC*Avogadro*RBC + FeRest*Avogadro*RestOfBody + Fe2Tf*Avogadro*Plasma + NTBI*Avogadro*Plasma + 2*Fe2Tf_*Avogadro*Plasma + Fe1Tf*Avogadro*Plasma + FeBM_0*Avogadro*BoneMarrow;
  FePlasma := Fe2Tf*Avogadro*Plasma + NTBI*Avogadro*Plasma + Fe1Tf*Avogadro*Plasma + 2*Fe2Tf_*Avogadro*Plasma;
  PDuo := 100*FeDuo*Avogadro*Duodenum/Injected;
  PLiver := 100*FeLiver*Avogadro*Liver/Injected;
  PSpleen := 100*FeSpleen*Avogadro*Spleen/Injected;
  PRBC := 100*FeRBC*Avogadro*RBC/Injected;
  PRest := 100*FeRest*Avogadro*RestOfBody/Injected;
  PPlasma := 100*(NTBI*Avogadro*Plasma + 2*Fe2Tf_*Avogadro*Plasma + Fe2Tf*Avogadro*Plasma + Fe1Tf*Avogadro*Plasma)/Injected;
  POutside := 100*FeOutside*Avogadro*RestOfBody/Injected;
  FePlasma_conc_ := FePlasma/(Plasma*Initial_for_Avogadro);
  TfSaturation := 100*(2*Fe2Tf*Avogadro*Plasma + 2*Fe2Tf_0*Avogadro*Plasma + Fe1Tf*Avogadro*Plasma + Fe1Tf_0*Avogadro*Plasma + 2*Fe2Tf_*Avogadro*Plasma)/(2*(Fe2Tf*Avogadro*Plasma + Fe1Tf*Avogadro*Plasma + Tf*Avogadro*Plasma + Fe2Tf_*Avogadro*Plasma + Fe2Tf_0*Avogadro*Plasma + Fe1Tf_0*Avogadro*Plasma));
  Total_Fe := FeDuo_0*Avogadro*Duodenum + FeLiver_0*Avogadro*Liver + FeSpleen_0*Avogadro*Spleen + FeRBC_0*Avogadro*RBC + FeRest_0*Avogadro*RestOfBody + 2*Fe2Tf_0*Avogadro*Plasma + Fe2Tf*Avogadro*Plasma + Fe1Tf_0*Avogadro*Plasma + NTBI_0*Avogadro*Plasma + FeBM*Avogadro*BoneMarrow;
  Total_Fe_concentration := (FeDuo_0*Avogadro*Duodenum + FeLiver_0*Avogadro*Liver + FeSpleen_0*Avogadro*Spleen + FeRBC_0*Avogadro*RBC + FeRest_0*Avogadro*RestOfBody + 2*Fe2Tf_0*Avogadro*Plasma + Fe2Tf*Avogadro*Plasma + Fe1Tf_0*Avogadro*Plasma + NTBI_0*Avogadro*Plasma + FeBM*Avogadro*BoneMarrow)/(Initial_for_Avogadro*(Duodenum + Liver + Plasma + RBC + RestOfBody + Spleen));
  FePlasma_0 := 2*Fe2Tf_0*Avogadro*Plasma + Fe2Tf*Avogadro*Plasma + Fe1Tf_0*Avogadro*Plasma + NTBI_0*Avogadro*Plasma;
  PBM := 100*FeBM_0*Avogadro*BoneMarrow/Injected;
  Total_Fe__g := Total_Fe*55.845/Initial_for_Avogadro;
  Total_Tf := Tf*Avogadro*Plasma + Fe1Tf*Avogadro*Plasma + Fe1Tf_0*Avogadro*Plasma + Fe2Tf_*Avogadro*Plasma + Fe2Tf*Avogadro*Plasma + Fe2Tf_0*Avogadro*Plasma;
  Total_Tf_conc := Total_Tf/(Initial_for_Avogadro*Plasma);
  Total_Tf_mg_ml := Total_Tf_conc*80;
  FePlasma_conc := FePlasma_0/(Plasma*Initial_for_Avogadro);

  // Reactions:
  Duo_NTBI: FeDuo => NTBI; mixed_competitive_and_noncompetitive_inhibition(VDuoNTBI, Duodenum, FeDuo, Km, FeDuo_0, Hepcidin, Ki); Duo_NTBI is "Duo_NTBI*";  // modifiers: FeDuo_0, Hepcidin; isVersionOf GO:0006826
  Fe2Tf_BM_: Fe2Tf_ => 2 FeBM_0 + Tf; mass_action__dif_compartments__explicit_volume___1(kInBM, Plasma, Fe2Tf_); Fe2Tf_BM_ is "Fe2Tf_BM**";  // isVersionOf GO:0006826
  RBC_Spleen: FeRBC => FeSpleen; mass_action__dif_compartments__explicit_volume___1(vRBCSpleen, RBC, FeRBC); RBC_Spleen is "RBC_Spleen*";  // isVersionOf GO:0006826
  Spleen_NTBI: FeSpleen => NTBI; mixed_competitive_and_noncompetitive_inhibition(VSpleenNTBI, Spleen, FeSpleen, Km, FeSpleen_0, Hepcidin, Ki); Spleen_NTBI is "Spleen_NTBI*";  // modifiers: FeSpleen_0, Hepcidin; isVersionOf GO:0006826
  Liver_NTBI: FeLiver => NTBI; mixed_competitive_and_noncompetitive_inhibition(VLiverNTBI, Liver, FeLiver, Km, FeLiver_0, Hepcidin, Ki); Liver_NTBI is "Liver_NTBI*";  // modifiers: FeLiver_0, Hepcidin; isVersionOf GO:0006826
  NTBI_Fe1Tf: NTBI + Tf => Fe1Tf; Plasma*kNTBI_Fe1Tf*NTBI*Tf; NTBI_Fe1Tf is "NTBI_Fe1Tf*";  // GO:0005488
  DuoLoss: FeDuo => FeOutside; mass_action__dif_compartments__explicit_volume___1(kDuoLoss, Duodenum, FeDuo); DuoLoss is "DuoLoss*";  // isVersionOf ncit:C25559
  Fe2Tf_Liver_: Fe2Tf_ => 2 FeLiver + Tf; mass_action__dif_compartments__explicit_volume___1(kInLiver, Plasma, Fe2Tf_); Fe2Tf_Liver_ is "Fe2Tf_Liver**";  // isVersionOf GO:0006826
  Fe2Tf_Rest_: Fe2Tf_ => 2 FeRest + Tf; mass_action__dif_compartments__explicit_volume___1(kInRest, Plasma, Fe2Tf_); Fe2Tf_Rest_ is "Fe2Tf_Rest**";  // isVersionOf GO:0006826
  RestLoss: FeRest => FeOutside; RestOfBody*kRestLoss*FeRest; RestLoss is "RestLoss*";  // isVersionOf ncit:C25559
  Fe2Tf_Duo_: Fe2Tf_ => 2 FeDuo + Tf; mass_action__dif_compartments__explicit_volume___1(kInDuo, Plasma, Fe2Tf_); Fe2Tf_Duo_ is "Fe2Tf_Duo**";  // isVersionOf GO:0006826
  Rest_NTBI: FeRest => NTBI; mixed_competitive_and_noncompetitive_inhibition(VRestNTBI, RestOfBody, FeRest, Km, FeRest_0, Hepcidin, Ki); Rest_NTBI is "Rest_NTBI*";  // modifiers: FeRest_0, Hepcidin; isVersionOf GO:0006826
  Fe1Tf__Fe2Tf_: Fe1Tf + NTBI => Fe2Tf_; Plasma*kFe1Tf_Fe2Tf*Fe1Tf*NTBI; Fe1Tf__Fe2Tf_ is "Fe1Tf*_Fe2Tf**";  // GO:0005488
  Fe1Tf_Liver: Fe1Tf => FeLiver + Tf; mass_action__dif_compartments__explicit_volume___1(kInLiver, Plasma, Fe1Tf); Fe1Tf_Liver is "Fe1Tf_Liver*";  // isVersionOf GO:0006826
  Fe1Tf_BM: Fe1Tf => FeBM_0 + Tf; mass_action__dif_compartments__explicit_volume___1(kInBM, Plasma, Fe1Tf); Fe1Tf_BM is "Fe1Tf_BM*";  // isVersionOf GO:0006826
  Fe1Tf_Rest: Fe1Tf => FeRest + Tf; mass_action__dif_compartments__explicit_volume___1(kInRest, Plasma, Fe1Tf); Fe1Tf_Rest is "Fe1Tf_Rest*";  // isVersionOf GO:0006826
  Fe1Tf_Duo: Fe1Tf => FeDuo + Tf; mass_action__dif_compartments__explicit_volume___1(kInDuo, Plasma, Fe1Tf); Fe1Tf_Duo is "Fe1Tf_Duo*";  // isVersionOf GO:0006826
  Diet: => FeDuo_0; Duodenum*Constant_flux__irreversible(vDiet);  // isPropertyOf ncit:C15222
  HepcidinSynthesis: => Hepcidin; Plasma*Constant_flux__irreversible(v);  // isPropertyOf ncit:C61408
    v = 1.7393e-8;
  HepcidinDecay: Hepcidin => ; Plasma*k1*Hepcidin;  // isPropertyOf ncit:C75947
    k1 = 0.75616;
  Duo_NTBI_0: FeDuo_0 => NTBI_0; mixed_competitive_and_noncompetitive_inhibition(VDuoNTBI, Duodenum, FeDuo_0, Km, FeDuo, Hepcidin, Ki);  // modifiers: FeDuo, Hepcidin; isVersionOf GO:0006826
  Fe2Tf_BM: Fe2Tf_0 => 2 FeBM + Tf; mass_action__dif_compartments__explicit_volume___1(kInBM, Plasma, Fe2Tf_0);  // isVersionOf GO:0006826
  RBC_Spleen_0: FeRBC_0 => FeSpleen_0; mass_action__dif_compartments__explicit_volume___1(vRBCSpleen, RBC, FeRBC_0);  // isVersionOf GO:0006826
  Spleen_NTBI_0: FeSpleen_0 => NTBI_0; mixed_competitive_and_noncompetitive_inhibition(VSpleenNTBI, Spleen, FeSpleen_0, Km, FeSpleen, Hepcidin, Ki);  // modifiers: FeSpleen, Hepcidin; isVersionOf GO:0006826
  Liver_NTBI_0: FeLiver_0 => NTBI_0; mixed_competitive_and_noncompetitive_inhibition(VLiverNTBI, Liver, FeLiver_0, Km, FeLiver, Hepcidin, Ki);  // modifiers: FeLiver, Hepcidin; isVersionOf GO:0006826
  NTBI_Fe1Tf_0: NTBI_0 + Tf => Fe1Tf_0; Plasma*kNTBI_Fe1Tf*NTBI_0*Tf;  // GO:0005488
  DuoLoss_0: FeDuo_0 => $FeOutside_0; mass_action__dif_compartments__explicit_volume___1(kDuoLoss, Duodenum, FeDuo_0);  // isVersionOf ncit:C25559
  Fe2Tf_Liver: Fe2Tf_0 => 2 FeLiver_0 + Tf; mass_action__dif_compartments__explicit_volume___1(kInLiver, Plasma, Fe2Tf_0);  // isVersionOf GO:0006826
  Fe2Tf_Rest: Fe2Tf_0 => 2 FeRest_0 + Tf; mass_action__dif_compartments__explicit_volume___1(kInRest, Plasma, Fe2Tf_0);  // isVersionOf GO:0006826
  RestLoss_0: FeRest_0 => $FeOutside_0; RestOfBody*kRestLoss*FeRest_0;  // isVersionOf ncit:C25559
  Fe2Tf_Duo: Fe2Tf_0 => 2 FeDuo_0 + Tf; mass_action__dif_compartments__explicit_volume___1(kInDuo, Plasma, Fe2Tf_0);  // isVersionOf GO:0006826
  Rest_NTBI_0: FeRest_0 => NTBI_0; mixed_competitive_and_noncompetitive_inhibition(VRestNTBI, RestOfBody, FeRest_0, Km, FeRest, Hepcidin, Ki);  // modifiers: FeRest, Hepcidin; isVersionOf GO:0006826
  Fe1Tf_Fe2Tf: Fe1Tf_0 + NTBI_0 => Fe2Tf_0; Plasma*kFe1Tf_Fe2Tf*Fe1Tf_0*NTBI_0;  // GO:0005488
  Fe1Tf_Liver_0: Fe1Tf_0 => FeLiver_0 + Tf; mass_action__dif_compartments__explicit_volume___1(kInLiver, Plasma, Fe1Tf_0);  // isVersionOf GO:0006826
  Fe1Tf_BM_0: Fe1Tf_0 => FeBM + Tf; mass_action__dif_compartments__explicit_volume___1(kInBM, Plasma, Fe1Tf_0);  // isVersionOf GO:0006826
  Fe1Tf_Rest_0: Fe1Tf_0 => FeRest_0 + Tf; mass_action__dif_compartments__explicit_volume___1(kInRest, Plasma, Fe1Tf_0);  // isVersionOf GO:0006826
  Fe1Tf_Duo_0: Fe1Tf_0 => FeDuo_0 + Tf; mass_action__dif_compartments__explicit_volume___1(kInDuo, Plasma, Fe1Tf_0);  // isVersionOf GO:0006826
  Fe1Tf_Fe2Tf_0: Fe1Tf_0 + NTBI => Fe2Tf; Plasma*kFe1Tf_Fe2Tf*Fe1Tf_0*NTBI; Fe1Tf_Fe2Tf_0 is "Fe1Tf_Fe2Tf*";  // GO:0005488
  Fe1Tf__Fe2Tf: Fe1Tf + NTBI_0 => Fe2Tf; Plasma*kFe1Tf_Fe2Tf*Fe1Tf*NTBI_0; Fe1Tf__Fe2Tf is "Fe1Tf*_Fe2Tf*";  // GO:0005488
  Fe2Tf_Duo_0: Fe2Tf => FeDuo + FeDuo_0 + Tf; mass_action__dif_compartments__explicit_volume___1(kInDuo, Plasma, Fe2Tf); Fe2Tf_Duo_0 is "Fe2Tf_Duo*";  // isVersionOf GO:0006826
  Fe2Tf_Liver_0: Fe2Tf => FeLiver + FeLiver_0 + Tf; mass_action__dif_compartments__explicit_volume___1(kInLiver, Plasma, Fe2Tf); Fe2Tf_Liver_0 is "Fe2Tf_Liver*";  // isVersionOf GO:0006826
  Fe2Tf_BM_0: Fe2Tf => FeBM_0 + FeBM + Tf; mass_action__dif_compartments__explicit_volume___1(kInBM, Plasma, Fe2Tf); Fe2Tf_BM_0 is "Fe2Tf_BM*";  // isVersionOf GO:0006826
  Fe2Tf_Rest_0: Fe2Tf => FeRest + FeRest_0 + Tf; mass_action__dif_compartments__explicit_volume___1(kInRest, Plasma, Fe2Tf); Fe2Tf_Rest_0 is "Fe2Tf_Rest*";  // isVersionOf GO:0006826
  BM_RBC: FeBM => FeRBC_0; mass_action__dif_compartments__explicit_volume___1(kInRBC, BoneMarrow, FeBM);  // isVersionOf GO:0006826
  BM_RBC_0: FeBM_0 => FeRBC; mass_action__dif_compartments__explicit_volume___1(kInRBC, BoneMarrow, FeBM_0); BM_RBC_0 is "BM_RBC*";  // isVersionOf GO:0006826
  BM_Spleen: FeBM => FeSpleen_0; mass_action__dif_compartments__explicit_volume___1(kBMSpleen, BoneMarrow, FeBM);  // isVersionOf GO:0006826
  BM_Spleen_0: FeBM_0 => FeSpleen; mass_action__dif_compartments__explicit_volume___1(kBMSpleen, BoneMarrow, FeBM_0); BM_Spleen_0 is "BM_Spleen*";  // isVersionOf GO:0006826

  // Events:
  event_1: at (time >= 5000): NTBI = Injected/(Initial_for_Avogadro*Plasma);

  // Unit definitions:
  unit time = 86400 second;
  unit unit_0 = dimensionless^0; unit_0 is "dimensionless";
end
