// SBML level 3 version 1
// dcterms:bibliographicCitation: urn:miriam:pubmed:29644518

function inf(b, S, V, T)
  b*S*V/T;
end

function tg(r, L, S)
  r*S*ln(L/S);
end

function burst(a, di, I)
  a*di*I;
end

model Jenner2018___treatment_of_oncolytic_virus()
  // Jenner2018 - treatment of oncolytic virus
  // The paper describes a model of oncolytic virotherapy. Created by COPASI 4.26 (Build 213) This model is described in the article: Mathematical Modelling of the Interaction Between Cancer Cells and an Oncolytic Virus: Insights into the Effects of Treatment Protocols Adrianne L. Jenner, Chae-Ok Yun, Peter S. Kim, Adelle C. F. Coster Bull Math Biol (2018) 80:1615–1629 Abstract: Oncolyticvirotherapyisanexperimentalcancertreatmentthatusesgenet- ically engineered viruses to target and kill cancer cells. One major limitation of this treatment is that virus particles are rapidly cleared by the immune system, preventing them from arriving at the tumour site. To improve virus survival and infectivity Kim et al. (Biomaterials 32(9):2314–2326, 2011) modified virus particles with the polymer polyethylene glycol (PEG) and the monoclonal antibody herceptin. Whilst PEG mod- ification appeared to improve plasma retention and initial infectivity, it also increased the virus particle arrival time. We derive a mathematical model that describes the inter- action between tumour cells and an oncolytic virus. We tune our model to represent the experimental data by Kim et al. (2011) and obtain optimised parameters. Our model provides a platform from which predictions may be made about the response of cancer growth to other treatment protocols beyond those in the experiments. Through model simulations, we find that the treatment protocol affects the outcome dramatically. We quantify the effects of dosage strategy as a function of tumour cell replication and tumour carrying capacity on the outcome of oncolytic virotherapy as a treatment. The relative significance of the modification of the virus and the crucial role it plays in optimising treatment efficacy are explored. To cite BioModels Database, please use: BioModels Database: An enhanced, curated and annotated resource for published quantitative kinetic models . To the extent possible under law, all copyright and related or neighbouring rights to this encoded model have been dedicated to the public domain worldwide. Please refer to CC0 Public Domain Dedication for more information.
  // isDescribedBy pubmed:29644518
  // hasTaxon taxonomy:9606
  // hasProperty ncit:C62713 mamo:MAMO_0000046
  // biomodels.db:MODEL1908120002
  // model units - substance: substance, time: time, volume: volume, area: area, length: length, extent: substance

  // Compartments:
  compartment tme = 1 volume;  // isVersionOf ncit:C94498

  // Species:
  // oncolytic virus
  species V in tme = V0;  // isVersionOf ncit:C717
  // susceptible cell non infected
  species S in tme = S0;  // isVersionOf CL:0001063
  // infected cell
  species I in tme = 0;  // isVersionOf CL:0001063
  // total tumor cell
  species $T in tme;  // isVersionOf CL:0001063

  // Parameters:
  // virus particle, 0 for PBS, 1e10 for others
  V0 = 0 unit_0;  // isVersionOf ncit:C717
  // viral decay rate, 0 for PBS, 1.38 for others
  dv = 0 unit_1;  // isVersionOf ncit:C25636
  // viral burst size
  // 0 for PBS, 3.5e9 for others
  a = 0 unit_0;  // isVersionOf ncit:C84380
  // burst rate, 0 for PBS, 0.1 for others
  di = 0 unit_1;  // isVersionOf ncit:C25636
  // growth rate of tumor
  r = 0.037 unit_1;
  // capacity of cells
  L = 3.49e9 unit_0;
  // infection rate
  // 0.562 for Ad, 0.771 for Ad-PEG, 0.862 for Ad-PEG-HER
  // 0 for PBS
  b = 0 unit_1;  // isVersionOf ncit:C25636
  // initial tumor size, 1e6*
  // 251 for PBS, 200 for Ad, 223 for Ad-PEG, 153 for Ad-PEG-HER
  S0 = 251000000 unit_0;  // isVersionOf CL:0001063

  // Assignment rules:
  T := I + S;

  // Reactions:
  virus_burst: => V; tme*burst(a, di, I);  // modifiers: I
  virus_decay: V => ; tme*dv*V;
  tumor_growth: => S; tme*tg(r, L, S);  // isVersionOf GO:0008283
  tumor_infection: S => I; tme*inf(b, S, V, T);  // modifiers: V, T
  infected_tumor_death: I => ; tme*di*I;  // isVersionOf GO:0000821

  // Events:
  virus_treatment_1: at (time >= 2), persistent=false, fromTrigger=false: V = V0;  // isVersionOf ncit:C62713
  virus_treatment_2: at (time >= 4), persistent=false, fromTrigger=false: V = V0;  // isVersionOf ncit:C62713

  // Unit definitions:
  unit length = metre;
  unit area = metre^2;
  unit volume = dimensionless^0;
  unit time = 86400 second;
  unit substance = 1e-3 mole;
  unit unit_0 = dimensionless^0; unit_0 is "1";
  unit unit_1 = 1 / (86400 second); unit_1 is "1/d";
end
