// SBML level 2 version 4
// dcterms:bibliographicCitation: urn:miriam:pubmed:31306418

function Function_for_Tumor_Cell_P_delayed_death(alpha_2, P, C)
  alpha_2*P*C;
end

function Function_for_Tumor_Cell_P_early_death(alpha_1, P, C)
  alpha_1*P*C;
end

function Function_for_Damaged_Tumor_Cell_D_death(rho, D, P, K, kappa)
  rho*D*(1 - (P + D)/K)/kappa;
end

function Function_for_Elimination_of_Chemotherapy(lambda, C)
  lambda*C;
end

function Function_for_Tumor_Cell_P_logistic_growth(P, D, K, rho)
  rho*P*(1 - (P + D)/K);
end

model New_Model()
  // Perez-Garcia19 - Computational design of improved standardized chemotherapy protocols for grade 2 oligodendrogliomas
  // This is a model built by COPASI4.24(Build 197) This a model from the article: Computational design of improved standardized chemotherapy protocols for grade II oligodendrogliomas Víctor M. Pérez-García, Luis E. Ayala-Hernández, Juan Belmonte-Beitia, Philippe Schucht, Michael Murek, Andreas Raabe, Juan Sepúlveda. PLoS Comput Biol. 2019 Jul; 15(7): e1006778. Abstract: Here we put forward a mathematical model describing the response of low-grade (WHO grade II) oligodendrogliomas (LGO) to temozolomide (TMZ). The model describes the longitudinal volumetric dynamics of tumor response to TMZ of a cohort of 11 LGO patients treated with TMZ. After finding patient-specific parameters, different therapeutic strategies were tried computationally on the ‘in-silico twins’ of those patients. Chemotherapy schedules with larger-than-standard rest periods between consecutive cycles had either the same or better long-term efficacy than the standard 28-day cycles. The results were confirmed in a large trial of 2000 virtual patients. These long-cycle schemes would also have reduced toxicity and defer the appearance of resistances. On the basis of those results, a combination scheme consisting of five induction TMZ cycles given monthly plus 12 maintenance cycles given every three months was found to provide substantial survival benefits for the in-silico twins of the 11 LGO patients (median 5.69 years, range: 0.67 to 68.45 years) and in a large virtual trial including 2000 patients. We used 220 sets of experiments in-silico to show that a clinical trial incorporating 100 patients per arm (standard intensive treatment versus 5 + 12 scheme) could demonstrate the superiority of the novel scheme after a follow-up period of 10 years. Thus, the proposed treatment plan could be the basis for a standardized TMZ treatment for LGO patients with survival benefits. This model originates from BioModels Database: A Database of Annotated Published Models (http://www.ebi.ac.uk/biomodels/). It is copyright (c) 2005-2011 The BioModels.net Team. For more information see the terms of use. To cite BioModels Database, please use: Li C, Donizelli M, Rodriguez N, Dharuri H, Endler L, Chelliah V, Li L, He E, Henry A, Stefan MI, Snoep JL, Hucka M, Le Novère N, Laibe C (2010) BioModels Database: An enhanced, curated and annotated resource for published quantitative kinetic models. BMC Syst Biol., 4:92
  // biomodels.db:MODEL1909170002 biomodels.db:BIOMD0000000814
  // hasProperty efo:0000632
  // hasProperty ncit:C1244
  // hasProperty mamo:MAMO_0000046
  // hasProperty ncit:C15632
  // hasProperty efo:0000311

  // Compartments:
  compartment compartment = 1;  // isVersionOf ncit:C13413

  // Species:
  species Drug_Concentration_C in compartment = 0;  // isVersionOf ncit:C15632; isVersionOf ncit:C41185
  species Tumor_Cell_Population_P in compartment = 144.9521;  // isVersionOf efo:0000311
  species Damaged_Tumor_Cells_D in compartment = 0;  // isVersionOf efo:0000311; isPropertyOf ncit:C25401

  // Parameters:
  alpha_1 = 0.1027971;
  alpha_2 = 0.1396878;
  lambda = 8.3184 unit_0;
  K = 261.799 unit_1;
  kappa = 1;
  d = 150 unit_2;
  b = 1.9 unit_3;
  beta = 0.0021 unit_4;
  rho = 0.002931927 unit_0;
  dose1 = 0;
  dose2 = 0;
  dose3 = 0;
  dose_4 = 0;
  dose_5 = 0;

  // Reactions:
  Tumor_Cell_P_logistic_growth: => Tumor_Cell_Population_P; compartment*Function_for_Tumor_Cell_P_logistic_growth(Tumor_Cell_Population_P, Damaged_Tumor_Cells_D, K, rho);  // modifiers: Damaged_Tumor_Cells_D; isVersionOf GO:0040007
  Tumor_Cell_P_early_death: Tumor_Cell_Population_P => Damaged_Tumor_Cells_D; compartment*Function_for_Tumor_Cell_P_early_death(alpha_1, Tumor_Cell_Population_P, Drug_Concentration_C);  // modifiers: Drug_Concentration_C
  Tumor_Cell_P_delayed_death: Tumor_Cell_Population_P => ; compartment*Function_for_Tumor_Cell_P_delayed_death(alpha_2, Tumor_Cell_Population_P, Drug_Concentration_C);  // modifiers: Drug_Concentration_C
  Damaged_Tumor_Cell_D_death: Damaged_Tumor_Cells_D => ; compartment*Function_for_Damaged_Tumor_Cell_D_death(rho, Damaged_Tumor_Cells_D, Tumor_Cell_Population_P, K, kappa);  // modifiers: Tumor_Cell_Population_P
  Elimination_of_Chemotherapy: Drug_Concentration_C => ; compartment*Function_for_Elimination_of_Chemotherapy(lambda, Drug_Concentration_C);

  // Events:
  injection_1: at (((piecewise(time - 28*ceil(time/28), xor(time < 0, 28 < 0), time - 28*floor(time/28)) == 27) && (time > 54)) && (time < 608)): dose1 = dose1 + 1, Drug_Concentration_C = Drug_Concentration_C + beta*b*d;
  injection_2: at (((piecewise(time - 28*ceil(time/28), xor(time < 0, 28 < 0), time - 28*floor(time/28)) == 0) && (time > 54)) && (time < 608)): Drug_Concentration_C = Drug_Concentration_C + beta*d*b, dose2 = dose2 + 1;
  injection_3: at ((((((((((((((((((((time == 57) || (time == 85)) || (time == 113)) || (time == 141)) || (time == 169)) || (time == 197)) || (time == 225)) || (time == 253)) || (time == 281)) || (time == 309)) || (time == 337)) || (time == 365)) || (time == 393)) || (time == 421)) || (time == 449)) || (time == 477)) || (time == 505)) || (time == 533)) || (time == 561)) || (time == 589)): Drug_Concentration_C = Drug_Concentration_C + beta*b*d, dose3 = dose3 + 1;
  injection_4: at ((((((((((((((((((((time == 58) || (time == 86)) || (time == 114)) || (time == 142)) || (time == 170)) || (time == 198)) || (time == 226)) || (time == 254)) || (time == 282)) || (time == 310)) || (time == 338)) || (time == 366)) || (time == 394)) || (time == 422)) || (time == 450)) || (time == 478)) || (time == 506)) || (time == 534)) || (time == 562)) || (time == 590)): Drug_Concentration_C = Drug_Concentration_C + beta*b*d, dose_4 = dose_4 + 1;
  injection_5: at ((((((((((((((((((((time == 59) || (time == 87)) || (time == 115)) || (time == 143)) || (time == 171)) || (time == 199)) || (time == 227)) || (time == 255)) || (time == 283)) || (time == 311)) || (time == 339)) || (time == 367)) || (time == 395)) || (time == 423)) || (time == 451)) || (time == 479)) || (time == 507)) || (time == 535)) || (time == 563)) || (time == 591)): Drug_Concentration_C = Drug_Concentration_C + beta*b*d, dose_5 = dose_5 + 1;

  // Unit definitions:
  unit volume = 1e-3 litre;
  unit time = 86400 second;
  unit unit_0 = 1 / (8640 second); unit_0 is "1/d";
  unit unit_1 = metre^3; unit_1 is "m^3";
  unit unit_2 = 1e-3 gram / metre^2; unit_2 is "mg/m^2";
  unit unit_3 = metre^2; unit_3 is "m^2";
  unit unit_4 = 1 / (1e-3 litre); unit_4 is "1/ml";
end
