// SBML level 2 version 4
// dcterms:bibliographicCitation: urn:miriam:pubmed:30674661

function Function_for_exponential_linear_growth(alpha_0, n, alpha_1)
  alpha_0*n + alpha_1;
end
Function_for_exponential_linear_growth is "Function for exponential-linear growth";

function Function_for_generalized_logistic_growth(alpha, n, K, v)
  alpha*n*(1 - (n/K)^v);
end

function Function_for_Gompertz_growth(alpha, n, K)
  alpha*n*ln(K) - alpha*n*ln(n);
end

function Function_for_Von_Bertalanffy_equation(a, n, gamma, b)
  a*n^gamma - b*n;
end

function Function_for_exponential_growth(alpha_0, n)
  alpha_0*n;
end

function Function_for_power_law_model(a, n, gamma)
  a*n^gamma;
end

function Function_for_logistic_growth(alpha, n, K)
  alpha*n*(1 - n/K);
end

model New_Model()
  // West2019 - Cellular interactions constrain tumor growth
  // These selections of models are described in the paper: Cellular interactions constrain tumor growth by Jeffrey West and Paul K. Newton Significance: A mathematical model relating tumor heterogeneity at the cellular level to tumor growth at the macroscopic level is described based on a statistical mechanics framework. The model takes into account the number of accessible states available to each cell as well as their long-range coupling (population cooperation) to other cells. We show that the degree to which cell populations cooperate determines the number of independent cell states, which in turn dictates the macroscopic (volumetric) growth law. It follows that targeting cell-to-cell interactions or functional coupling among cell populations could be a way of mitigating and controlling tumor growth. Abstract: A tumor is made up of a heterogeneous collection of cell types, all competing on a fitness landscape mediated by microenvironmental conditions that dictate their interactions. Despite the fact that much is known about cell signaling, cellular cooperation, and the functional constraints that affect cellular behavior, the specifics of how these constraints (and the range over which they act) affect the macroscopic tumor growth laws that govern total volume, mass, and carrying capacity remain poorly understood. We develop a statistical mechanics approach that focuses on the total number of possible states each cell can occupy and show how different assumptions on correlations of these states give rise to the many different macroscopic tumor growth laws used in the literature. Although it is widely understood that molecular and cellular heterogeneity within a tumor is a driver of growth, here we emphasize that focusing on the functional coupling of states at the cellular level is what determines macroscopic growth characteristics.
  // biomodels.db:MODEL1909240001 biomodels.db:BIOMD0000000820
  // hasProperty efo:0000311
  // hasProperty ncit:C28359
  // hasProperty mamo:MAMO_0000046
  // hasProperty ncit:C19388
  // isDescribedBy pubmed:30674661

  // Compartments:
  compartment compartment = 1;  // isVersionOf ncit:C13413

  // Species:
  species tumor_at_Exp_Lin_growth in compartment = 1; tumor_at_Exp_Lin_growth is "tumor at Exp-Lin growth";  // isVersionOf ncit:C120284
  species tumor_at_Gen__logistic_growth in compartment = 1; tumor_at_Gen__logistic_growth is "tumor at Gen. logistic growth";  // isVersionOf ncit:C120284
  species tumor_at_Gomp__growth in compartment = 1; tumor_at_Gomp__growth is "tumor at Gomp. growth";  // isVersionOf ncit:C120284
  species tumor_at_Power_growth in compartment = 1;  // isVersionOf ncit:C120284
  species tumor_at_Von_Bert__growth in compartment = 1; tumor_at_Von_Bert__growth is "tumor at Von Bert. growth";  // isVersionOf ncit:C120284
  species tumor_at_Exp_growth in compartment = 1;  // isVersionOf ncit:C120284
  species tumor_at_Logistic_growth in compartment = 1;  // isVersionOf ncit:C120284

  // Parameters:
  alpha_0 = 1;
  alpha_1 = 10000;
  tau = 10;
  alpha_1_variable = 0;
  alpha_0_variable = 1;
  alpha = 1;
  K = 100;
  nu = 0.3;
  a = 4;
  b = 0.2;

  // Assignment rules:
  gamma := 2/3;

  // Reactions:
  exponential_linear_growth: => tumor_at_Exp_Lin_growth; compartment*Function_for_exponential_linear_growth(alpha_0_variable, tumor_at_Exp_Lin_growth, alpha_1_variable); exponential_linear_growth is "exponential-linear growth";  // isVersionOf GO:0040007
  generalized_logistic_growth: => tumor_at_Gen__logistic_growth; compartment*Function_for_generalized_logistic_growth(alpha, tumor_at_Gen__logistic_growth, K, nu);  // isVersionOf GO:0040007
  Gompertz_growth: => tumor_at_Gomp__growth; compartment*Function_for_Gompertz_growth(alpha, tumor_at_Gomp__growth, K);  // isVersionOf GO:0040007
  power_law_model: => tumor_at_Power_growth; compartment*Function_for_power_law_model(a, tumor_at_Power_growth, gamma);  // isVersionOf GO:0040007
  Von_Bertalanffy_equation: => tumor_at_Von_Bert__growth; compartment*Function_for_Von_Bertalanffy_equation(a, tumor_at_Von_Bert__growth, gamma, b);  // isVersionOf GO:0040007
  exponential_growth: => tumor_at_Exp_growth; compartment*Function_for_exponential_growth(alpha_0, tumor_at_Exp_growth);  // isVersionOf GO:0040007
  logistic_growth: => tumor_at_Logistic_growth; compartment*Function_for_logistic_growth(alpha, tumor_at_Logistic_growth, K);  // isVersionOf GO:0040007

  // Events:
  exponential_model_switch: at (time > tau): alpha_1_variable = alpha_1_variable + alpha_1, alpha_0_variable = alpha_0_variable - alpha_0;

  // Unit definitions:
  unit volume = 1e-3 litre;
  unit substance = 1e-3 mole;
end
