// SBML level 3 version 1
// dcterms:bibliographicCitation: urn:miriam:pubmed:31009513

function signal_source_of_mTOR_0(S_2, epsilon_2)
  S_2/epsilon_2;
end

function Dose_for_Glucose_0(u_1)
  u_1;
end

function Consumption_of_Glucose_0(myu_G, G)
  myu_G*G;
end

function loss_of_AMPK_0(A, epsilon_1)
  A/epsilon_1;
end

function production_of_mTOR(l_5, l_6, epsilon_2, dletaD, gamma, A)
  l_5*l_6^2/(epsilon_2*(l_6^2 + dletaD*gamma*A^2));
end

function loss_of_mTOR_0(R, epsilon_2)
  R/epsilon_2;
end

function Decay_of_Drug_0(myu_D, D)
  myu_D*D;
end

function Dose_for_Drug_0(u_2)
  u_2;
end

function production_of_miR_451(G, l_1, l_2, alpha, A)
  G + l_1*l_2^2/(l_2^2 + alpha*A^2);
end
production_of_miR_451 is "production of miR-451";

function loss_of_miR_451_0(M)
  M;
end
loss_of_miR_451_0 is "loss of miR-451";

function signal_source_of_AMPK_0(S_1, episilon_1)
  S_1/episilon_1;
end

function production_of_AMPK(l_3, l_4, epsilon_1, beta, M)
  l_3*l_4^2/(epsilon_1*(l_4^2 + beta*M^2));
end

model New_Model()
  // Jung2019 - Regulating glioblastoma signaling pathways and anti-invasion therapy - core control model
  // This model is based on paper:
  // Strategies in regulating glioblastoma signaling pathways and anti-invasion therapy
  // Abstract:
  // Glioblastoma multiforme is one of the most invasive type of glial tumors, which rapidly grows and commonly spreads into nearby brain tissue. It is a devastating brain cancer that often results in death within approximately 12 to 15 months after diagnosis. In this work, optimal control theory was applied to regulate intracellular signaling pathways of miR-451–AMPK–mTOR–cell cycle dynamics via glucose and drug intravenous administration infusions. Glucose level is controlled to activate miR-451 in the up-stream pathway of the model. A potential drug blocking the inhibitory pathway of mTOR by AMPK complex is incorporated to explore regulation of the down-stream pathway to the cell cycle. Both miR-451 and mTOR levels are up-regulated inducing cell proliferation and reducing invasion in the neighboring tissues. Concomitant and alternating glucose and drug infusions are explored under various circumstances to predict best clinical outcomes with least administration costs.
  // biomodels.db:MODEL1909300005 biomodels.db:BIOMD0000000828
  // isDescribedBy pubmed:31009513
  // hasProperty efo:0000311 ncit:C3058 ncit:C17132 GO:0023052 mamo:MAMO_0000046
  // isDescribedBy pubmed:31009513
  // model units - substance: substance, time: time, volume: volume, area: area, length: length, extent: substance

  // Compartments:
  compartment compartment = 1 volume;  // isVersionOf ncit:C13413

  // Species:
  species Glucose_G in compartment = 6.642156e-22;  // isVersionOf CHEBI:17234
  species Drug_D in compartment = 0;  // isVersionOf CHEBI:23888
  species miR_451_M in compartment = 3.055392e-21; miR_451_M is "miR-451 M";  // isVersionOf ncit:C82834; isVersionOf uniprot:P56211
  species AMPK_A in compartment = 2.075674e-21;  // isVersionOf uniprot:P54646; isVersionOf ncit:C94701
  species mTOR_R in compartment = 4.583088e-21;  // isVersionOf CCO:2475; isVersionOf ncit:C38928; isVersionOf uniprot:P42345
  species $deltaD in compartment;

  // Parameters:
  myu_G = 0.5;
  l_1 = 4;
  l_2 = 1;
  alpha = 1.6;
  l_3 = 4;
  l_4 = 1;
  beta = 1;
  S_1 = 0.2;
  epsilon_1 = 0.02;
  l_5 = 4;
  l_6 = 1;
  gamma = 1;
  S_2 = 1.2;
  epsilon_2 = 0.02;
  myu_D = 1.316;
  u_1 = 0;
  u_2 = 0;

  // Assignment rules:
  deltaD := exp(-Drug_D);

  // Reactions:
  Dose_for_Glucose: => Glucose_G; compartment*Dose_for_Glucose_0(u_1);  // isVersionOf GO:0035737
  Dose_for_Drug: => Drug_D; compartment*Dose_for_Drug_0(u_2);  // isVersionOf GO:0035737
  Consumption_of_Glucose: Glucose_G => ; compartment*Consumption_of_Glucose_0(myu_G, Glucose_G);
  Decay_of_Drug: Drug_D => ; compartment*Decay_of_Drug_0(myu_D, Drug_D);
  Production_of_miR_451: => miR_451_M; compartment*production_of_miR_451(Glucose_G, l_1, l_2, alpha, AMPK_A); Production_of_miR_451 is "Production of miR-451";  // modifiers: Glucose_G, AMPK_A
  loss_of_miR_451: miR_451_M => ; compartment*loss_of_miR_451_0(miR_451_M); loss_of_miR_451 is "loss of miR-451";
  signal_source_of_AMPK: => AMPK_A; compartment*signal_source_of_AMPK_0(S_1, epsilon_1);  // isVersionOf GO:0023052
  Production_of_AMPK: => AMPK_A; compartment*production_of_AMPK(l_3, l_4, epsilon_1, beta, miR_451_M);  // modifiers: miR_451_M
  loss_of_AMPK: AMPK_A => ; compartment*loss_of_AMPK_0(AMPK_A, epsilon_1);
  signal_source_of_mTOR: => mTOR_R; compartment*signal_source_of_mTOR_0(S_2, epsilon_2);  // isVersionOf GO:0023052
  Production_of_mTOR: => mTOR_R; compartment*production_of_mTOR(l_5, l_6, epsilon_2, deltaD, gamma, AMPK_A);  // modifiers: deltaD, AMPK_A
  loss_of_mTOR: mTOR_R => ; compartment*loss_of_mTOR_0(mTOR_R, epsilon_2);

  // Events:
  event: at (piecewise(time - 12*ceil(time/12), xor(time < 0, 12 < 0), time - 12*floor(time/12)) == 0), t0=false, fromTrigger=false: u_1 = u_1 + 1, u_2 = u_2 + 1;
  event_2: at ((((((((((time == 3) || (time == 15)) || (time == 27)) || (time == 39)) || (time == 51)) || (time == 63)) || (time == 75)) || (time == 87)) || (time == 99)) || (time == 111)), t0=false, fromTrigger=false: u_1 = u_1 - 1, u_2 = u_2 - 1;

  // Unit definitions:
  unit length = metre;
  unit area = metre^2;
  unit volume = 1e-3 litre;
  unit time = second;
  unit substance = 1e-3 mole;
end
