// SBML level 2 version 4
// dcterms:bibliographicCitation: urn:miriam:pubmed:31009513

function Degradation_of_p55cdc_T_0(k_6, p55cdc_T)
  k_6*p55cdc_T;
end

function Production_of_CycB_0(k_1)
  k_1;
end

function Degradation_of_CycB_0(k_21, CycB)
  k_21*CycB;
end

function Degradation_of_CycB_by_Cdh1_0(k_22, Cdh1, CycB)
  k_22*Cdh1*CycB;
end

function Inhibitory_effect_of_p21_or_p27_genes(_p27_p21, HIF, CycB)
  _p27_p21*HIF*CycB;
end

function Activation_of_Cdh1_by_p55cdc_A_0(k_32, p55cdc_A, Cdh1, J_3)
  k_32*p55cdc_A*(1 - Cdh1)/(J_3 + 1 - Cdh1);
end

function Activation_of_Cdh1_0(k_31, Cdh1, J_3)
  k_31*(1 - Cdh1)/(J_3 + 1 - Cdh1);
end

function Inactivation_of_Cdh1_by_CycB_0(k_4, mass_s, CycB, Cdh1, J_4)
  k_4*mass_s*CycB*Cdh1/(J_4 + Cdh1);
end

function Production_of_p55cd_T(k_51)
  k_51;
end

function transcription_of_p55dc_T_by_CycB(k_52, CycB, mass_s, n, J_5)
  k_52*(CycB*mass_s)^n/(J_5^n + (CycB*mass_s)^n);
end

function grow_of_mass_0(myu, mass, _m_)
  myu*mass*(1 - mass/_m_);
end

function Degradation_of_p55cdc_A_0(k_6, p55cdc_A)
  k_6*p55cdc_A;
end

function Inactivation_of_p55cdc_A_0(k_8, Mad, p55cdc_A, J_8)
  k_8*Mad*p55cdc_A/(J_8 + p55cdc_A);
end

function Activation_of_p55cdc_A_by_Plk1_0(k_7, Plk1, p55cdc_T, p55cdc_A, J_7)
  k_7*Plk1*(p55cdc_T - p55cdc_A)/(J_7 + p55cdc_T - p55cdc_A);
end

function Activation_of_Plk1_by_CycB_0(k_9, mass_s, CycB, Plk1)
  k_9*mass_s*CycB*(1 - Plk1);
end

function degradation_of_Plk1(k_10, Plk1)
  k_10*Plk1;
end

function Dose_for_Drug_0(u_2)
  u_2;
end

function Dose_for_Glucose_0(u_1)
  u_1;
end

function Consumption_of_Glucose_0(myu_G, G)
  myu_G*G;
end

function Decay_of_Drug_0(myu_D, D)
  myu_D*D;
end

function production_of_miR_451(G, l_1, l_2, alpha, A)
  G + l_1*l_2^2/(l_2^2 + alpha*A^2);
end
production_of_miR_451 is "production of miR-451";

function loss_of_miR_451_0(M)
  M;
end
loss_of_miR_451_0 is "loss of miR-451";

function signal_source_of_AMPK_0(S_1, episilon_1)
  S_1/episilon_1;
end

function production_of_AMPK(l_3, l_4, epsilon_1, beta, M)
  l_3*l_4^2/(epsilon_1*(l_4^2 + beta*M^2));
end

function loss_of_AMPK_0(A, epsilon_1)
  A/epsilon_1;
end

function signal_source_of_mTOR_0(S_2, epsilon_2)
  S_2/epsilon_2;
end

function production_of_mTOR(l_5, l_6, epsilon_2, dletaD, gamma, A)
  l_5*l_6^2/(epsilon_2*(l_6^2 + dletaD*gamma*A^2));
end

function loss_of_mTOR_0(R, epsilon_2)
  R/epsilon_2;
end

model New_Model()
  // Jung2019 - egulating glioblastoma signaling pathways and anti-invasion therapy cell cycle dynamics model
  // This model is based on paper, based on its cell cycle dynamics model: Strategies in regulating glioblastoma signaling pathways and anti-invasion therapy Abstract: Glioblastoma multiforme is one of the most invasive type of glial tumors, which rapidly grows and commonly spreads into nearby brain tissue. It is a devastating brain cancer that often results in death within approximately 12 to 15 months after diagnosis. In this work, optimal control theory was applied to regulate intracellular signaling pathways of miR-451–AMPK–mTOR–cell cycle dynamics via glucose and drug intravenous administration infusions. Glucose level is controlled to activate miR-451 in the up-stream pathway of the model. A potential drug blocking the inhibitory pathway of mTOR by AMPK complex is incorporated to explore regulation of the down-stream pathway to the cell cycle. Both miR-451 and mTOR levels are up-regulated inducing cell proliferation and reducing invasion in the neighboring tissues. Concomitant and alternating glucose and drug infusions are explored under various circumstances to predict best clinical outcomes with least administration costs.
  // biomodels.db:MODEL1910020001 biomodels.db:BIOMD0000000829
  // hasProperty GO:0023052
  // hasProperty efo:0000311
  // hasProperty mamo:MAMO_0000046
  // hasProperty ncit:C3058
  // hasProperty ncit:C17132

  // Compartments:
  compartment compartment = 1;  // isVersionOf ncit:C13413

  // Species:
  species Glucose_G in compartment = 6.642156e-22;  // isVersionOf CHEBI:17234
  species Drug_D in compartment = 0;  // isVersionOf CHEBI:23888
  species miR_451_M in compartment = 3.055392e-21; miR_451_M is "miR-451 M";  // isVersionOf uniprot:P56211; isVersionOf ncit:C82834
  species AMPK_A in compartment = 2.075674e-21;  // isVersionOf uniprot:P54646; isVersionOf ncit:C94701
  species mTOR_R in compartment = 4.583088e-21;  // isVersionOf CCO:2475; isVersionOf uniprot:P42345; isVersionOf ncit:C38928
  species $deltaD in compartment;
  species Cdh1 in compartment = 1;  // isVersionOf uniprot:Q9UM11
  species CycB in compartment = 0.1;  // isVersionOf uniprot:Q8WWL7
  species p55cdc_T in compartment = 1;  // isVersionOf uniprot:Q12834
  species mass in compartment = 0.45;  // isVersionOf ncit:C43246
  species $mass_s in compartment;  // isVersionOf ncit:C43246
  species p55cdc_A in compartment = 0.85;  // isVersionOf uniprot:Q12834
  species Plk1 in compartment = 0.6;  // isVersionOf uniprot:P53350

  // Parameters:
  myu_G = 0.5;
  l_1 = 4;
  l_2 = 1;
  alpha = 1.6;
  l_3 = 4;
  l_4 = 1;
  beta = 1;
  S_1 = 0.2;
  epsilon_1 = 0.02;
  l_5 = 4;
  l_6 = 1;
  gamma = 1;
  S_2 = 1.2;
  epsilon_2 = 0.02;
  myu_D = 1.316;
  u_1 = 0;
  u_2 = 0;
  k_1 = 0.12;
  k_2 = 0.12; k_2 is "k_2'";
  k_2_ = 4.5; k_2_ is "k_2''";
  p27_p21 = 1.05; p27_p21 is "p27/p21";
  zeta_2 = 1;
  K = 0.01;
  n_2 = 10;
  K_H = 10;
  k_3 = 3; k_3 is "k_3'";
  k_3_ = 30; k_3_ is "k_3''";
  k_4 = 105;
  J_3 = 0.04;
  J_4 = 0.04;
  zeta_1 = 2.5;
  n_1 = 10;
  K_m = 0.5;
  k_5 = 0.015; k_5 is "k_5'";
  k_5_ = 0.6; k_5_ is "k_5''";
  k_6 = 0.3;
  n = 4;
  J_5 = 0.3;
  k_7 = 3;
  J_7 = 0.001;
  k_8 = 1.5;
  J_8 = 0.001;
  Mad = 1;
  k_9 = 0.3;
  k_10 = 0.06;
  myu = 0.03; myu is "myu+";
  epsilon = 0.006;
  var myu_0;
  myu_hat = 0.5;
  m = 10; m is "m*";

  // Assignment rules:
  HIF := zeta_2/(K^n_2*(K_H^n_2 + (1/K)^n_2));
  myu_0 := myu + epsilon*myu_hat;
  mass_s := mass + zeta_1*(1/mTOR_R)^n_1/(K_m^n_1 + (1/mTOR_R)^n_1);
  deltaD := exp(-Drug_D);

  // Reactions:
  Dose_for_Glucose: => Glucose_G; compartment*Dose_for_Glucose_0(u_1);  // isVersionOf GO:0035737
  Dose_for_Drug: => Drug_D; compartment*Dose_for_Drug_0(u_2);  // isVersionOf GO:0035737
  Consumption_of_Glucose: Glucose_G => ; compartment*Consumption_of_Glucose_0(myu_G, Glucose_G);
  Decay_of_Drug: Drug_D => ; compartment*Decay_of_Drug_0(myu_D, Drug_D);
  Production_of_miR_451: => miR_451_M; compartment*production_of_miR_451(Glucose_G, l_1, l_2, alpha, AMPK_A); Production_of_miR_451 is "Production of miR-451";  // modifiers: Glucose_G, AMPK_A
  loss_of_miR_451: miR_451_M => ; compartment*loss_of_miR_451_0(miR_451_M); loss_of_miR_451 is "loss of miR-451";
  signal_source_of_AMPK: => AMPK_A; compartment*signal_source_of_AMPK_0(S_1, epsilon_1);  // isVersionOf GO:0023052
  Production_of_AMPK: => AMPK_A; compartment*production_of_AMPK(l_3, l_4, epsilon_1, beta, miR_451_M);  // modifiers: miR_451_M
  loss_of_AMPK: AMPK_A => ; compartment*loss_of_AMPK_0(AMPK_A, epsilon_1);
  signal_source_of_mTOR: => mTOR_R; compartment*signal_source_of_mTOR_0(S_2, epsilon_2);  // isVersionOf GO:0023052
  Production_of_mTOR: => mTOR_R; compartment*production_of_mTOR(l_5, l_6, epsilon_2, deltaD, gamma, AMPK_A);  // modifiers: deltaD, AMPK_A
  loss_of_mTOR: mTOR_R => ; compartment*loss_of_mTOR_0(mTOR_R, epsilon_2);
  Activation_of_Cdh1: => Cdh1; compartment*Activation_of_Cdh1_0(k_3, Cdh1, J_3);
  Activation_of_Cdh1_by_p55cdc_A: => Cdh1; compartment*Activation_of_Cdh1_by_p55cdc_A_0(k_3_, p55cdc_A, Cdh1, J_3);  // modifiers: p55cdc_A
  Degradation_of_CycB: CycB => ; compartment*Degradation_of_CycB_0(k_2, CycB);
  Degradation_of_CycB_by_Cdh1: CycB => ; compartment*Degradation_of_CycB_by_Cdh1_0(k_2_, Cdh1, CycB);  // modifiers: Cdh1
  Degradation_of_p55cdc_T: p55cdc_T => ; compartment*Degradation_of_p55cdc_T_0(k_6, p55cdc_T);
  Inactivation_of_Cdh1_by_CycB: Cdh1 => ; compartment*Inactivation_of_Cdh1_by_CycB_0(k_4, mass_s, CycB, Cdh1, J_4);  // modifiers: mass_s, CycB
  inhibitory_effect_of_p21_or_p27_genes: CycB => ; compartment*Inhibitory_effect_of_p21_or_p27_genes(p27_p21, HIF, CycB);
  Production_of_CycB: => CycB; compartment*Production_of_CycB_0(k_1);
  production_of_p55cdc_T: => p55cdc_T; compartment*Production_of_p55cd_T(k_5);
  transcription_of_p55cdc_T_by_CycB: => p55cdc_T; compartment*transcription_of_p55dc_T_by_CycB(k_5_, CycB, mass_s, n, J_5);  // modifiers: CycB, mass_s
  Activation_of_p55cdc_A_by_Plk1: => p55cdc_A; compartment*Activation_of_p55cdc_A_by_Plk1_0(k_7, Plk1, p55cdc_T, p55cdc_A, J_7);  // modifiers: Plk1, p55cdc_T
  Inactivation_of_p55cdc_A: p55cdc_A => ; compartment*Inactivation_of_p55cdc_A_0(k_8, Mad, p55cdc_A, J_8);
  Degradation_of_p55cdc_A: p55cdc_A => ; compartment*Degradation_of_p55cdc_A_0(k_6, p55cdc_A);
  Activation_of_Plk1_by_CycB: => Plk1; compartment*Activation_of_Plk1_by_CycB_0(k_9, mass_s, CycB, Plk1);  // modifiers: mass_s, CycB
  Degradation_of_Plk1: Plk1 => ; compartment*degradation_of_Plk1(k_10, Plk1);
  grow_of_mass: => mass; compartment*grow_of_mass_0(myu_0, mass, m);

  // Events:
  event: at (piecewise(time - 12*ceil(time/12), xor(time < 0, 12 < 0), time - 12*floor(time/12)) == 0): u_1 = u_1 + 1, u_2 = u_2 + 1;
  event_2: at ((((((((((((((time == 3) || (time == 15)) || (time == 27)) || (time == 39)) || (time == 51)) || (time == 63)) || (time == 75)) || (time == 87)) || (time == 99)) || (time == 111)) || (time == 123)) || (time == 135)) || (time == 147)) || (time == 159)): u_1 = u_1 - 1, u_2 = u_2 - 1;

  // Unit definitions:
  unit volume = 1e-3 litre;
  unit substance = 1e-3 mole;
end
