// SBML level 2 version 3

model MODEL1610100000()
  // Proctor2017- Role of microRNAs in osteoarthritis (Positive Feedback By Micro RNA)
  // This model is described in the article:
  // Computer simulation models as a tool to investigate the role of microRNAs in osteoarthritis.
  // Proctor CJ, Smith GR.
  // PLoS ONE 2017; 12(11): e0187568
  // Abstract:
  // The aim of this study was to show how computational models can be used to increase our understanding of the role of microRNAs in osteoarthritis (OA) using miR-140 as an example. Bioinformatics analysis and experimental results from the literature were used to create and calibrate models of gene regulatory networks in OA involving miR-140 along with key regulators such as NF-?B, SMAD3, and RUNX2. The individual models were created with the modelling standard, Systems Biology Markup Language, and integrated to examine the overall effect of miR-140 on cartilage homeostasis. Down-regulation of miR-140 may have either detrimental or protective effects for cartilage, indicating that the role of miR-140 is complex. Studies of individual networks in isolation may therefore lead to different conclusions. This indicated the need to combine the five chosen individual networks involving miR-140 into an integrated model. This model suggests that the overall effect of miR-140 is to change the response to an IL-1 stimulus from a prolonged increase in matrix degrading enzymes to a pulse-like response so that cartilage degradation is temporary. Our current model can easily be modified and extended as more experimental data become available about the role of miR-140 in OA. In addition, networks of other microRNAs that are important in OA could be incorporated. A fully integrated model could not only aid our understanding of the mechanisms of microRNAs in ageing cartilage but could also provide a useful tool to investigate the effect of potential interventions to prevent cartilage loss.
  // This model is hosted on BioModels Database and identified by: MODEL1610100000.
  // To cite BioModels Database, please use: Chelliah V et al. BioModels: ten-year anniversary. Nucl. Acids Res. 2015, 43(Database issue):D542-8.
  // To the extent possible under law, all copyright and related or neighbouring rights to this encoded model have been dedicated to the public domain worldwide. Please refer to CC0 Public Domain Dedication for more information.
  // biomodels.db:MODEL1610100000

  // Compartments:
  compartment cell = 1;

  // Species:
  substanceOnly species miR in cell = 1000;
  substanceOnly species miR_gene in cell = 2;
  substanceOnly species miR_gene_TF1 in cell = 0;
  substanceOnly species miR_gene_TF2 in cell = 0;
  substanceOnly species Signal in cell = 0;
  substanceOnly species TF1 in cell = 0;
  substanceOnly species TF1_mRNA in cell = 0;
  substanceOnly species TF2 in cell = 1000;
  substanceOnly species $Sink in cell = 0;

  // Parameters:
  kbinTF1miRgene = 0.002;
  kbinTF2miRgene = 0.0001;
  kdegMiR = 0.0004;
  kdegTF1 = 1e-5;
  kdegTF1mRNA = 0.0001;
  kdegTF1mRNAbyMiR = 1e-6;
  krelTF1miRgene = 0.001;
  krelTF2miRgene = 0.001;
  ksynMiR = 0.2;
  ksynTF1 = 0.0003;
  ksynTF1mRNA = 0.01;

  // Reactions:
  miR_gene_TF1_binding: miR_gene + TF1 => miR_gene_TF1; kbinTF1miRgene*miR_gene*TF1;
  miR_gene_TF1_release: miR_gene_TF1 => miR_gene + TF1; krelTF1miRgene*miR_gene_TF1;
  miR_gene_TF2_binding: miR_gene + TF2 => miR_gene_TF2; kbinTF2miRgene*miR_gene*TF2;
  miR_gene_TF2_release: miR_gene_TF2 => miR_gene + TF2; krelTF2miRgene*miR_gene_TF2;
  miR_synthesis: miR_gene_TF2 => miR_gene_TF2 + miR; ksynMiR*miR_gene_TF2;
  miR_degradation: miR => $Sink; kdegMiR*miR;
  TF1_transcription: Signal => Signal + TF1_mRNA; ksynTF1mRNA*Signal;
  TF1_mRNA_degradation: TF1_mRNA => $Sink; kdegTF1mRNA*TF1_mRNA;
  TF1_mRNA_degradation_via_miR: TF1_mRNA + miR => miR; kdegTF1mRNAbyMiR*TF1_mRNA*miR;
  TF1_translation: TF1_mRNA => TF1_mRNA + TF1; ksynTF1*TF1_mRNA;
  TF1_degradation: TF1 => $Sink; kdegTF1*TF1;

  // Events:
  ActivateSignal: at (time > 3600): Signal = 100;
  DeactivateSignal: at (time > 7200): Signal = 0;

  // Unit definitions:
  unit substance = item;
end
