// SBML level 2 version 4
// dcterms:bibliographicCitation: urn:miriam:doi:10.1371/journal.pcbi.1004787

function Constant_flux__irreversible(v)
  v;
end
Constant_flux__irreversible is "Constant flux (irreversible)";

function Function_for_R22(s3, q0_mdm2, q1_mdm2, y6, h, q2)
  s3*(q0_mdm2 + q1_mdm2*y6^h)/(q2 + q0_mdm2 + q1_mdm2*y6^h);
end

function Function_for_R45(p12, AKT_0, y18)
  p12*AKT_0*y18;
end

function Function_for_R8(g7, y4, y3, y12)
  g7*y4*(y3 + y12)^2;
end

function Function_for_R43(p8, PIP2, PI3K_tot)
  p8*PIP2*PI3K_tot;
end

function Function_for_R59(s9, E2F1, M3)
  s9*E2F1^2/(M3^2 + E2F1^2);
end

function Function_for_R4(p1, ATM_0, y1, h, M1)
  p1*ATM_0*y1^h/(y1^h + M1^h);
end

function Function_for_R12(g101, g11, y12, h, y5)
  (g101 + g11*y12^h)*y5;
end

function Function_for_R2(y1, rep, DNA_DSB_RepairCplx_total)
  y1*rep/(y1 + DNA_DSB_RepairCplx_total);
end

function Function_modifier(k, modifier)
  k*modifier;
end

function Function_for_R1(h1, DNA_DSB_DUE_to_IR, is_IR_switched_on, h2, y33, DNA_DSB_max, y1)
  (h1*DNA_DSB_DUE_to_IR*is_IR_switched_on + h2*y33)*(DNA_DSB_max - y1);
end

function Function_for_R53(d12, Rb_p, M2)
  d12*Rb_p/(M2 + Rb_p);
end

function Function_modifier1_modifier2(k, modifier1, modifier2)
  k*modifier1*modifier2;
end

function Function_for_R82(a2, y33, y32)
  a2*y33^2*y32;
end

function Function_substrate_modifier(k, modifier, substrate)
  k*modifier*substrate;
end

model Hat2016___Reponse_of_p53_System_to_irradiation_in_cell_fate_decision_making()
  // Hat2016 - Reponse of p53 System to irradiation in cell fate decision making
  // The p53 transcription factor is a regulator of key cellular processes including DNA repair, cell cycle arrest, and apoptosis. In this theoretical study, we investigate how the complex circuitry of the p53 network allows for stochastic yet unambiguous cell fate decision-making. The proposed Markov chain model consists of the regulatory core and two subordinated bistable modules responsible for cell cycle arrest and apoptosis. The regulatory core is controlled by two negative feedback loops (regulated by Mdm2 and Wip1) responsible for oscillations, and two antagonistic positive feedback loops (regulated by phosphatases Wip1 and PTEN) responsible for bistability. By means of bifurcation analysis of the deterministic approximation we capture the recurrent solutions (i.e., steady states and limit cycles) that delineate temporal responses of the stochastic system. Direct switching from the limit-cycle oscillations to the "apoptotic" steady state is enabled by the existence of a subcritical Neimark-Sacker bifurcation in which the limit cycle loses its stability by merging with an unstable invariant torus. Our analysis provides an explanation why cancer cell lines known to have vastly diverse expression levels of Wip1 and PTEN exhibit a broad spectrum of responses to DNA damage: from a fast transition to a high level of p53 killer (a p53 phosphoform which promotes commitment to apoptosis) in cells characterized by high PTEN and low Wip1 levels to long-lasting p53 level oscillations in cells having PTEN promoter methylated (as in, e.g., MCF-7 cell line).
  // biomodels.db:MODEL1809060002 biomodels.db:BIOMD0000000943
  // hasPart GO:0007049
  // hasTaxon taxonomy:9606
  // isDescribedBy doi:10.1371/journal.pcbi.1004787
  // hasProperty mamo:MAMO_0000046
  // isDescribedBy pubmed:26928575

  // Compartments:
  compartment nuclear = 1;  // isVersionOf ncit:C13361
  compartment cytoplasm = 1;  // isVersionOf GO:0005737

  // Species:
  species DNA_double_strand_break in nuclear = 0;  // isVersionOf GO:0035861
  species ATM_phosphorylated in nuclear = 0;  // isVersionOf uniprot:Q13315; hasProperty PATO:0002220
  species SIAH1_0 in nuclear = SIAH1_tot;  // isVersionOf uniprot:Q8IUQ4
  species HIPK2 in nuclear = 0;  // isVersionOf uniprot:Q9H2X6
  species p53_0phosphorylated in nuclear = 0;  // isVersionOf uniprot:P04637; hasProperty PATO:0002220
  species p53_arrester in nuclear = 0;  // isVersionOf uniprot:P04637
  species p53_S46phosphorylated in nuclear = 0;  // isVersionOf uniprot:P04637; hasProperty PATO:0002220
  species Mdm2_nuc_S166S186phosphorylated in nuclear = 0;  // isVersionOf uniprot:Q00987; hasProperty PATO:0002220
  species Wip1 in nuclear = 0;  // isVersionOf uniprot:O15297
  species p53_killer in nuclear = 0;  // isVersionOf uniprot:P04637
  species Mdm2_mRNA in nuclear = 0;  // isVersionOf uniprot:Q00987; hasProperty CHEBI:33697
  species Mdm2_cyt_0phosphorylated in cytoplasm = 0;  // isVersionOf uniprot:Q00987; hasProperty PATO:0002220
  species Mdm2_cyt_S166S186phosphorylated in cytoplasm = 0;  // isVersionOf uniprot:Q00987; hasProperty PATO:0002220
  species AKT_phosphorylated in cytoplasm = 0;  // isVersionOf uniprot:P31749; hasProperty PATO:0002220
  species Mdm2_nuc_S166S186p_S395p in nuclear = 0;  // isVersionOf uniprot:Q00987; hasProperty PATO:0002220
  species Wip1_mRNA in nuclear = 0;  // isVersionOf uniprot:O15297; hasProperty CHEBI:33697
  species PTEN_mRNA in nuclear = 0;  // isVersionOf uniprot:P60484; hasProperty CHEBI:33697
  species PTEN in nuclear = 0;  // isVersionOf uniprot:P60484
  species PIP3 in nuclear = 0;
  species p21_mRNA in nuclear = 0;  // isVersionOf ncit:C17388; hasProperty CHEBI:33697
  species p21__free in nuclear = 0; p21__free is "p21_(free)";  // isVersionOf ncit:C17388
  species Cyclin_E__free in nuclear = 0; Cyclin_E__free is "Cyclin_E (free)";  // isVersionOf uniprot:O96020
  species Cyclin_E_p21_complex in nuclear = 0; Cyclin_E_p21_complex is "Cyclin_E:p21_complex";  // hasPart ncit:C17388; hasPart uniprot:O96020
  species Rb1_0__free in nuclear = Rb_tot; Rb1_0__free is "Rb1_0_(free)";  // isVersionOf uniprot:P06400
  species Rb1_0_E2F1_complex in nuclear = 0; Rb1_0_E2F1_complex is "Rb1_0:E2F1 complex";  // hasPart uniprot:Q01094; hasPart uniprot:P06400
  species Bax_mRNA in nuclear = 0;  // isVersionOf uniprot:Q07812; hasProperty CHEBI:33697
  species Bax__free in nuclear = 0; Bax__free is "Bax_(free)";  // isVersionOf uniprot:Q07812
  species BclXL__free in cytoplasm = BclXL_tot; BclXL__free is "BclXL_(free)";  // isVersionOf uniprot:Q07817
  species Bax_BclXL_complex in nuclear = 0; Bax_BclXL_complex is "Bax:BclXL_complex";  // hasPart uniprot:Q92934; hasPart uniprot:Q07812
  species Bad_0__free in cytoplasm = Bad_tot; Bad_0__free is "Bad_0_(free)";  // isVersionOf uniprot:Q92934
  species Bad_phosphorylated__free in cytoplasm = 0; Bad_phosphorylated__free is "Bad_phosphorylated_(free)";  // isVersionOf uniprot:Q92934; hasProperty PATO:0002220
  species proCaspase in nuclear = 0;  // ncit:C48044
  species Caspase in nuclear = 0;  // isVersionOf uniprot:P42575
  species $ATM_tot in nuclear = 100000;  // isVersionOf uniprot:Q13315
  species $AKT_tot in nuclear = 100000;  // isVersionOf uniprot:P31749
  species $PIP_tot in nuclear = 100000;
  species $PI3K_tot in nuclear = 100000;  // isVersionOf uniprot:P27986
  species $E2F1_tot in nuclear = 200000;  // isVersionOf uniprot:Q01094
  species $Fourteen33_tot in nuclear = 200000;  // isVersionOf uniprot:P31947
  species $ATM_0 in nuclear;  // isVersionOf uniprot:Q13315
  species $SIAH1_phosphorylated in nuclear;  // isVersionOf uniprot:Q8IUQ4; hasProperty PATO:0002220
  species $AKT_0 in cytoplasm;  // isVersionOf uniprot:P31749
  species $PIP2 in nuclear;
  species $Rb_tot in nuclear = 300000;  // isVersionOf uniprot:P06400
  species $SIAH1_tot in nuclear = 100000;  // isVersionOf uniprot:Q8IUQ4
  species $Bad_tot in cytoplasm = 60000;  // isVersionOf uniprot:Q92934
  species $BclXL_tot in cytoplasm = 100000;  // isVersionOf uniprot:Q07817
  species $Rb_phosphorylated in nuclear;  // isVersionOf uniprot:P06400; hasProperty PATO:0002220
  species $E2F1 in nuclear;  // isVersionOf uniprot:Q01094
  species $BclXL_Bad_complex in cytoplasm;  // hasPart uniprot:Q92934; hasPart uniprot:Q07817
  species $Bad_phosphorylated_Fourteen33_complex in cytoplasm;  // hasPart uniprot:P31947; hasPart uniprot:Q92934; hasProperty PATO:0002220
  species $Fourteen33_free in nuclear;  // isVersionOf uniprot:P31947

  // Parameters:
  is_IR_switched_on = 0;
  h1 = 1e-6;
  can_Caspase_make_DNA_DSB = 1;
  has_DNA_DSB_repair = 1;
  a1 = 3e-10;
  a2 = 1e-12;
  q0_pten = 1e-5;
  q0_wip1 = 1e-5;
  q0_mdm2 = 0.0001;
  q0_bax = 1e-5;
  q0_p21 = 1e-5;
  q1_pten = 3e-13;
  q1_mdm2 = 3e-13;
  q1_wip1 = 3e-13;
  q1_p21 = 3e-13;
  q1_bax = 3e-13;
  q2 = 0.003;
  s1 = 0.1;
  s2 = 0.03;
  s3 = 0.1;
  s4 = 0.03;
  s5 = 0.1;
  t1 = 0.1;
  t2 = 0.1;
  t3 = 0.1;
  t4 = 0.1;
  t5 = 0.1;
  s6 = 300;
  s7 = 30;
  s8 = 30;
  s9 = 30;
  s10 = 3;
  p1 = 0.0003;
  p2 = 1e-8;
  p3 = 3e-8;
  p4 = 1e-10;
  p5 = 1e-8;
  p6 = 1e-8;
  p7 = 3e-9;
  p8 = 3e-9;
  p9 = 3e-6;
  p10 = 3e-6;
  p11 = 1e-10;
  p12 = 1e-9;
  d1 = 1e-8;
  d2 = 3e-5;
  d3 = 0.0001;
  d4 = 1e-10;
  d5 = 0.0001;
  d6 = 1e-10;
  d7 = 3e-7;
  d8 = 0.0001;
  d9 = 3e-5;
  d10 = 0.0001;
  d11 = 1e-10;
  d12 = 10000;
  b1 = 3e-5;
  b2 = 0.003;
  b3 = 0.003;
  b4 = 1e-5;
  b5 = 1e-5;
  u1 = 0.001;
  u2 = 0.001;
  u3 = 0.001;
  u5 = 0.0001;
  u6 = 0.0001;
  i1 = 0.001;
  g1 = 0.0003;
  g2 = 0.0003;
  g3 = 0.0003;
  g4 = 0.0003;
  g5 = 0.0003;
  g6 = 3e-5;
  g7 = 1e-13;
  g8 = 0.0003;
  g9 = 0.0001;
  g10 = 1e-5;
  g101 = 1e-5;
  g11 = 1e-11;
  g12 = 1e-13;
  g13 = 1e-13;
  g14 = 0.0001;
  g15 = 3e-5;
  g16 = 0.0001;
  g17 = 0.0003;
  g18 = 0.0003;
  g19 = 0.0003;
  g20 = 0.0001;
  h = 2;
  M1 = 5;
  M2 = 100000;
  M3 = 200000;
  DNA_DSB_RepairCplx_total = 20;
  DNA_DSB_max = 1000000;
  IR_Gy = 2;
  DNA_DSB_per_IR_Gy = 10;
  tp2 = 600;

  // Assignment rules:
  rep := has_DNA_DSB_repair*0.001;
  h2 := can_Caspase_make_DNA_DSB*1e-13;
  ATM_0 := ATM_tot - ATM_phosphorylated;
  Rb_phosphorylated := Rb_tot - Rb1_0__free - Rb1_0_E2F1_complex;
  AKT_0 := AKT_tot - AKT_phosphorylated;
  PIP2 := PIP_tot - PIP3;
  SIAH1_phosphorylated := SIAH1_tot - SIAH1_0;
  BclXL_Bad_complex := BclXL_tot - BclXL__free - Bax_BclXL_complex;
  Bad_phosphorylated_Fourteen33_complex := Bad_tot - BclXL_Bad_complex - Bad_0__free - Bad_phosphorylated__free;
  E2F1 := E2F1_tot - Rb1_0_E2F1_complex;
  Fourteen33_free := Fourteen33_tot - Bad_phosphorylated_Fourteen33_complex;
  time_days := time/86400;
  DNA_DSB_due_to_IR := IR_Gy*DNA_DSB_per_IR_Gy/tp2;

  // Reactions:
  DNA_damage_R1: => DNA_double_strand_break; nuclear*Function_for_R1(h1, DNA_DSB_due_to_IR, is_IR_switched_on, h2, Caspase, DNA_DSB_max, DNA_double_strand_break);  // modifiers: Caspase; isVersionOf ncit:C16507
  DNA_Repair_R2: DNA_double_strand_break => ; nuclear*Function_for_R2(DNA_double_strand_break, rep, DNA_DSB_RepairCplx_total);  // isVersionOf GO:0006281
  Dephoshorylation_by_Wip1_R3: ATM_phosphorylated => ; nuclear*Function_substrate_modifier(d1, Wip1, ATM_phosphorylated);  // modifiers: Wip1
  Phoshorylation_due_to_IR_R4: => ATM_phosphorylated; nuclear*Function_for_R4(p1, ATM_0, DNA_double_strand_break, h, M1);  // modifiers: ATM_0, DNA_double_strand_break
  Phosphorylation_by_ATM_p_R5: SIAH1_0 => ; nuclear*Function_substrate_modifier(p2, ATM_phosphorylated, SIAH1_0);  // modifiers: ATM_phosphorylated
  Dephosphorylation_of_SIAH1_p_R6: => SIAH1_0; nuclear*Function_modifier(d2, SIAH1_phosphorylated);  // modifiers: SIAH1_phosphorylated
  Synthesis_of_HIPK2_R7: => HIPK2; nuclear*Constant_flux__irreversible(s8);  // isVersionOf ncit:C61408
  Degradation_induced_by_Mdm2_nuc_S166S186p_and_SIAH1_R8: HIPK2 => ; nuclear*Function_for_R8(g7, HIPK2, SIAH1_0, Mdm2_nuc_S166S186phosphorylated);  // modifiers: SIAH1_0, Mdm2_nuc_S166S186phosphorylated
  Synthesis_of_p53_0p_R9: => p53_0phosphorylated; nuclear*Constant_flux__irreversible(s6);  // isVersionOf ncit:C61408
  Phosphorylation_by_ATM_p_on_Ser15_and_Ser20_R10: p53_0phosphorylated => p53_arrester; nuclear*Function_substrate_modifier(p3, ATM_phosphorylated, p53_0phosphorylated);  // modifiers: ATM_phosphorylated
  Dephosphorylation_spontaneous_of_p53_arrester_R11: p53_arrester => p53_0phosphorylated; nuclear*d3*p53_arrester;
  Degradation_spontanuous_and_induced_by_Mdm2_nuc_S166S186p__R12: p53_0phosphorylated => ; nuclear*Function_for_R12(g101, g11, Mdm2_nuc_S166S186phosphorylated, h, p53_0phosphorylated); Degradation_spontanuous_and_induced_by_Mdm2_nuc_S166S186p__R12 is "Degradation spontanuous and induced by Mdm2_nuc_S166S186p R12";  // modifiers: Mdm2_nuc_S166S186phosphorylated
  Dephosphorylation_of_Ser46_by_Wip1_R13: p53_S46phosphorylated => p53_0phosphorylated; nuclear*Function_substrate_modifier(d11, Wip1, p53_S46phosphorylated);  // modifiers: Wip1
  Phosphorylation_at_Ser46_by_HIPK2_R14: p53_0phosphorylated => p53_S46phosphorylated; nuclear*Function_substrate_modifier(p11, HIPK2, p53_0phosphorylated);  // modifiers: HIPK2
  Degradation_spontaneous_and_induced_by_Mdm2_nuc_S166S186p_R15: p53_arrester => ; nuclear*Function_for_R12(g101, g12, Mdm2_nuc_S166S186phosphorylated, h, p53_arrester);  // modifiers: Mdm2_nuc_S166S186phosphorylated
  Phosphorylation_at_Ser46_by_HIPK2_R16: p53_arrester => p53_killer; nuclear*Function_substrate_modifier(p4, HIPK2, p53_arrester);  // modifiers: HIPK2
  Dephosphorylation_at_Ser46_by_Wip1_R17: p53_killer => p53_arrester; nuclear*Function_substrate_modifier(d4, Wip1, p53_killer);  // modifiers: Wip1
  Phosphorylation_by_ATM_p_on_Ser15_and_Ser20_R18: p53_S46phosphorylated => p53_killer; nuclear*Function_substrate_modifier(p3, ATM_phosphorylated, p53_S46phosphorylated);  // modifiers: ATM_phosphorylated
  Degradation_spontaneous_and_induced_by_Mdm2_nuc_S166S186p_R19: p53_S46phosphorylated => ; nuclear*Function_for_R12(g10, g13, Mdm2_nuc_S166S186phosphorylated, h, p53_S46phosphorylated);  // modifiers: Mdm2_nuc_S166S186phosphorylated
  Degradation_spontaneous_and_induced_by_Mdm2_nuc_S166S186p_R20: p53_killer => ; nuclear*Function_for_R12(g10, g13, Mdm2_nuc_S166S186phosphorylated, h, p53_killer);  // modifiers: Mdm2_nuc_S166S186phosphorylated
  Dephosphorylation_of_Ser15_and_Ser20_R21: p53_killer => p53_S46phosphorylated; nuclear*d10*p53_killer;
  Transcription_Mdm2_gene_transcription_R22: => Mdm2_mRNA; nuclear*Function_for_R22(s3, q0_mdm2, q1_mdm2, p53_arrester, h, q2);  // modifiers: p53_arrester
  Degradation_spontaneous_R23: Mdm2_mRNA => ; nuclear*g3*Mdm2_mRNA;
  Translation_of_mdm2_R24: => Mdm2_cyt_0phosphorylated; Function_modifier(t3, Mdm2_mRNA);  // modifiers: Mdm2_mRNA; isVersionOf GO:0006412
  Phosphorylation_of_Mdm2_cyt_0_by_AKT_p_R25: Mdm2_cyt_0phosphorylated => Mdm2_cyt_S166S186phosphorylated; cytoplasm*Function_substrate_modifier(p5, AKT_phosphorylated, Mdm2_cyt_0phosphorylated);  // modifiers: AKT_phosphorylated
  Dephosphorylation_at_Ser166_and_186_R26: Mdm2_cyt_S166S186phosphorylated => Mdm2_cyt_0phosphorylated; cytoplasm*d5*Mdm2_cyt_S166S186phosphorylated;
  Degradation_spontaneous_R27: Mdm2_cyt_0phosphorylated => ; cytoplasm*g14*Mdm2_cyt_0phosphorylated;
  Nuclear_import_of_Mdm2_cyto_S166S186p_R28: Mdm2_cyt_S166S186phosphorylated => Mdm2_nuc_S166S186phosphorylated; i1*Mdm2_cyt_S166S186phosphorylated;  // isVersionOf GO:0051170
  Degradation_spontaneous_R29: Mdm2_cyt_S166S186phosphorylated => ; cytoplasm*g15*Mdm2_cyt_S166S186phosphorylated;
  Degradation_spontaneous_R30: Mdm2_nuc_S166S186phosphorylated => ; nuclear*g15*Mdm2_nuc_S166S186phosphorylated;
  Phosphorylation_by_ATM_p_at_Ser395_R31: Mdm2_nuc_S166S186phosphorylated => Mdm2_nuc_S166S186p_S395p; nuclear*Function_substrate_modifier(p6, ATM_phosphorylated, Mdm2_nuc_S166S186phosphorylated);  // modifiers: ATM_phosphorylated
  Dephosphorylation_of_Ser395_of_Mdm2_nuc_S166S186p_S395p_by_Wip1_R32: Mdm2_nuc_S166S186p_S395p => Mdm2_nuc_S166S186phosphorylated; nuclear*Function_substrate_modifier(d6, Wip1, Mdm2_nuc_S166S186p_S395p);  // modifiers: Wip1
  Degradation_spontaneous_R33: Mdm2_nuc_S166S186p_S395p => ; nuclear*g15*Mdm2_nuc_S166S186p_S395p;
  Degradation_Ser395p_dependent_R34: Mdm2_nuc_S166S186p_S395p => ; nuclear*g16*Mdm2_nuc_S166S186p_S395p; Degradation_Ser395p_dependent_R34 is "Degradation Ser395p-dependent R34";
  Transcription_of_Wip1_gene_R35: => Wip1_mRNA; nuclear*Function_for_R22(s1, q0_wip1, q1_wip1, p53_arrester, h, q2);  // modifiers: p53_arrester
  Degradation_R36: Wip1_mRNA => ; nuclear*g1*Wip1_mRNA;
  Translation_of_Wip_mRNA_R37: => Wip1; nuclear*Function_modifier(t1, Wip1_mRNA);  // modifiers: Wip1_mRNA; isVersionOf GO:0006412
  Translation_of_Wip_mRNA_R38: Wip1 => ; nuclear*g8*Wip1;  // isVersionOf GO:0006412
  Transcription_of_PTEN_gene_R39: => PTEN_mRNA; nuclear*Function_for_R22(s2, q0_pten, q1_pten, p53_killer, h, q2);  // modifiers: p53_killer
  Degradation_R40: PTEN_mRNA => ; nuclear*g2*PTEN_mRNA;
  Translation_of_PTEN_mRNA_R41: => PTEN; nuclear*Function_modifier(t2, PTEN_mRNA);  // modifiers: PTEN_mRNA; isVersionOf GO:0006412
  Degradation_of_PTEN_R42: PTEN => ; nuclear*g6*PTEN;
  Phopshorylation_of_PIP2_by_PI3K_R43: => PIP3; nuclear*Function_for_R43(p8, PIP2, PI3K_tot);  // modifiers: PIP2, PI3K_tot
  Dephosphorylation_of_PIP3_by_PTENR44: PIP3 => ; nuclear*Function_substrate_modifier(d7, PTEN, PIP3);  // modifiers: PTEN
  Phopshorylation_at_PIP3_R45: => AKT_phosphorylated; Function_for_R45(p12, AKT_0, PIP3);  // modifiers: AKT_0, PIP3
  Dephosphorylation_of_AKT_R46: AKT_phosphorylated => ; cytoplasm*d8*AKT_phosphorylated;
  Transcription_of_p21_gene_R47: => p21_mRNA; nuclear*Function_for_R22(s5, q0_p21, q1_p21, p53_arrester, h, q2);  // modifiers: p53_arrester
  Degradation_of_p21_mRNA_R48: p21_mRNA => ; nuclear*g5*p21_mRNA;
  Translation_of_p21_mRNA_R49: => p21__free; nuclear*Function_modifier(t5, p21_mRNA);  // modifiers: p21_mRNA; isVersionOf GO:0006412
  Binding_of_Cyclin_E_and_p21_R50: p21__free + Cyclin_E__free => Cyclin_E_p21_complex; nuclear*b5*p21__free*Cyclin_E__free;
  Dissociation_of_complex_Cyclin_E_p21_R51: Cyclin_E_p21_complex => p21__free + Cyclin_E__free; nuclear*u6*Cyclin_E_p21_complex; Dissociation_of_complex_Cyclin_E_p21_R51 is "Dissociation of complex Cyclin_E:p21 R51";
  Degradation_of_p21_R52: p21__free => ; nuclear*g19*p21__free;
  Dephosphorylation_of_Rb1_at_S567_R53: => Rb1_0__free; nuclear*Function_for_R53(d12, Rb_phosphorylated, M2);  // modifiers: Rb_phosphorylated
  Binding_of_Rb1_and_E2F1_R54: Rb1_0__free => Rb1_0_E2F1_complex; nuclear*Function_substrate_modifier(b4, E2F1, Rb1_0__free);  // modifiers: E2F1
  Phosphorylation_of_Rb1_by_Cyclin_E__R55: Rb1_0__free => ; nuclear*Function_substrate_modifier(p9, Cyclin_E__free, Rb1_0__free); Phosphorylation_of_Rb1_by_Cyclin_E__R55 is "Phosphorylation of Rb1 by Cyclin_E R55";  // modifiers: Cyclin_E__free
  Dissociation_of_Rb1_E2F1_complex_R56: Rb1_0_E2F1_complex => Rb1_0__free; nuclear*u5*Rb1_0_E2F1_complex; Dissociation_of_Rb1_E2F1_complex_R56 is "Dissociation of Rb1:E2F1 complex R56";
  Phosphorylation_of_Rb1_in_Rb1_E2F1_complex_by_Cyclin_ER57: Rb1_0_E2F1_complex => ; nuclear*Function_substrate_modifier(p10, Cyclin_E__free, Rb1_0_E2F1_complex); Phosphorylation_of_Rb1_in_Rb1_E2F1_complex_by_Cyclin_ER57 is "Phosphorylation of Rb1 in Rb1:E2F1 complex by Cyclin_ER57";  // modifiers: Cyclin_E__free
  Synthesis_R58: => Cyclin_E__free; nuclear*Constant_flux__irreversible(s10);  // isVersionOf ncit:C61408
  Synthesis_induced_by_E2F1_R59: => Cyclin_E__free; nuclear*Function_for_R59(s9, E2F1, M3);  // modifiers: E2F1; isVersionOf ncit:C61408
  Degradation_R60: Cyclin_E__free => ; nuclear*g20*Cyclin_E__free;
  Degradation_R61: Cyclin_E_p21_complex => ; nuclear*g20*Cyclin_E_p21_complex;
  Transcription_of_Bax_gene_R62: => Bax_mRNA; nuclear*Function_for_R22(s4, q0_bax, q1_bax, p53_killer, h, q2);  // modifiers: p53_killer
  Degradation_of_Bax_mRNA_R63: Bax_mRNA => ; nuclear*g4*Bax_mRNA;
  Translation_of_Bax_mRNA_R64: => Bax__free; nuclear*Function_modifier(t4, Bax_mRNA);  // modifiers: Bax_mRNA; isVersionOf GO:0006412
  Dissociation_of_Bax_BclXL_complex_R65: Bax_BclXL_complex => Bax__free + BclXL__free; u1*Bax_BclXL_complex; Dissociation_of_Bax_BclXL_complex_R65 is "Dissociation of Bax:BclXL complex R65";
  Binding_of_Bax_and_BclXL_R66: Bax__free + BclXL__free => Bax_BclXL_complex; b1*Bax__free*BclXL__free;
  Degradation_R67: Bax__free => ; nuclear*g9*Bax__free;
  Dissociation_of_BclXL_Bad_complex_R68: => BclXL__free; cytoplasm*Function_modifier(u2, BclXL_Bad_complex); Dissociation_of_BclXL_Bad_complex_R68 is "Dissociation of BclXL:Bad complex R68";  // modifiers: BclXL_Bad_complex
  Degradation_of_Bax_in_Bax_BclXL_complex_R69: Bax_BclXL_complex => BclXL__free; g16*Bax_BclXL_complex; Degradation_of_Bax_in_Bax_BclXL_complex_R69 is "Degradation of Bax in Bax:BclXL complex R69";
  Phosphorylation_of_Bad_in_BclXL_Bad_complex_R70: => BclXL__free; cytoplasm*Function_modifier1_modifier2(p7, AKT_phosphorylated, BclXL_Bad_complex); Phosphorylation_of_Bad_in_BclXL_Bad_complex_R70 is "Phosphorylation of Bad in BclXL:Bad complex R70";  // modifiers: AKT_phosphorylated, BclXL_Bad_complex
  Binding_of_BclXL_and_Bad_0_R71: BclXL__free + Bad_0__free => ; cytoplasm*b2*BclXL__free*Bad_0__free;
  Dephosphorylation_R72: Bad_phosphorylated__free => Bad_0__free; cytoplasm*d9*Bad_phosphorylated__free;
  Dissociation_of_BclXL_Bad_complex_R73: => Bad_0__free; cytoplasm*Function_modifier(u2, BclXL_Bad_complex); Dissociation_of_BclXL_Bad_complex_R73 is "Dissociation of BclXL:Bad complex R73";  // modifiers: BclXL_Bad_complex
  Phosphorylation_of_Bad_0_by_AKT_p_R74: Bad_0__free => Bad_phosphorylated__free; cytoplasm*Function_substrate_modifier(p7, AKT_phosphorylated, Bad_0__free);  // modifiers: AKT_phosphorylated
  Dephosphorylation_and_dissociation_of_Bad_p_in_Bad_14_3_3_complex_R75: => Bad_0__free; cytoplasm*Function_modifier(d9, Bad_phosphorylated_Fourteen33_complex); Dephosphorylation_and_dissociation_of_Bad_p_in_Bad_14_3_3_complex_R75 is "Dephosphorylation and dissociation of Bad_p in Bad:14_3_3 complex R75";  // modifiers: Bad_phosphorylated_Fourteen33_complex
  Dissociation_of_Bad_14_3_3_complex_R76: => Bad_phosphorylated__free; cytoplasm*Function_modifier(u3, Bad_phosphorylated_Fourteen33_complex); Dissociation_of_Bad_14_3_3_complex_R76 is "Dissociation of Bad:14-3-3 complex R76";  // modifiers: Bad_phosphorylated_Fourteen33_complex
  Phosphorylation_of_Bad_in_BclXL_Bad_complex_and_complex_Dissociation_R77: => Bad_phosphorylated__free; cytoplasm*Function_modifier1_modifier2(p7, AKT_phosphorylated, BclXL_Bad_complex); Phosphorylation_of_Bad_in_BclXL_Bad_complex_and_complex_Dissociation_R77 is "Phosphorylation of Bad in BclXL:Bad complex and complex Dissociation R77";  // modifiers: AKT_phosphorylated, BclXL_Bad_complex
  Binding_of_Bad_p_and_14_3_3_R78: Bad_phosphorylated__free => ; Function_substrate_modifier(b3, Fourteen33_free, Bad_phosphorylated__free); Binding_of_Bad_p_and_14_3_3_R78 is "Binding of Bad_p and 14-3-3 R78";  // modifiers: Fourteen33_free
  Synthesis_of_proCaspase_R79: => proCaspase; nuclear*Constant_flux__irreversible(s7);  // isVersionOf ncit:C61408
  Degradation_of_proCaspase_R80: proCaspase => ; nuclear*g17*proCaspase;
  Activation_of_caspases_by_active__free__Bax_R81: proCaspase => Caspase; nuclear*Function_substrate_modifier(a1, Bax__free, proCaspase); Activation_of_caspases_by_active__free__Bax_R81 is "Activation of caspases by active (free) Bax R81";  // modifiers: Bax__free
  Activation_autoactivation_of_caspases_R82: proCaspase => Caspase; nuclear*Function_for_R82(a2, Caspase, proCaspase);
  Degradation_of_caspases_R83: Caspase => ; nuclear*g18*Caspase;

  // Events:
  Irradiation_phase: at ((2592000 <= time) && (time <= 2592600)): is_IR_switched_on = 1;
  Stop_Irradiation_phase: at (time >= 2592601): is_IR_switched_on = 0;

  // Unit definitions:
  unit volume = 1e-3 litre;
  unit substance = 1e-3 mole;
end
