// SBML level 3 version 1
// dcterms:bibliographicCitation: urn:miriam:pubmed:32834656

function Rate_Law_for_reaction(tau, S, alpha, I1, I2)
  tau*S*alpha*(I1 + I2);
end

function Rate_Law_for_reaction_1(alpha, tau, S, I1, I2)
  (1 - alpha)*tau*S*(I1 + I2);
end

model Ghanbari2020___forecasting_the_second_wave_of_COVID_19_in_Iran()
  // Ghanbari2020 - forecasting the second wave of COVID-19 in Iran
  // One of the common misconceptions about COVID-19 disease is to assume that we will not see a recurrence after the first wave of the disease has subsided. This completely wrong perception causes people to disregard the necessary protocols and engage in some misbehavior, such as routine socializing or holiday travel. These conditions will put double pressure on the medical staff and endanger the lives of many people around the world. In this research, we are interested in analyzing the existing data to predict the number of infected people in the second wave of out-breaking COVID-19 in Iran. For this purpose, a model is proposed. The mathematical analysis corresponded to the model is also included in this paper. Based on proposed numerical simulations, several scenarios of progress of COVID-19 corresponding to the second wave of the disease in the coming months, will be discussed. We predict that the second wave of will be most severe than the first one. From the results, improving the recovery rate of people with weak immune systems via appropriate medical incentives is resulted as one of the most effective prescriptions to prevent the widespread unbridled outbreak of the second wave of COVID-19.
  // isDescribedBy pubmed:32834656
  // DOID:0080600
  // hasTaxon taxonomy:2697049
  // hasTaxon taxonomy:9606
  // isDescribedBy pubmed:32834656
  // hasProperty mamo:MAMO_0000028
  // model units - substance: substance, time: time, volume: volume, area: area, length: length, extent: substance

  // Compartments:
  compartment Iran = 1 volume;  // ncit:C16755

  // Species:
  species Susceptible in Iran = 7.884121e7;  // ido:0000514; ncit:C171133
  species Infected_strong_immune_system in Iran = 5060.4;  // ncit:C171133; ido:0000511
  species Infected_weak_immune_system in Iran = 4487.6;  // ncit:C171133; ido:0000511
  species Recovered in Iran = 4590;  // ido:0000621

  // Parameters:
  alpha = 0.55;
  gamma_1 = 0.1;
  gamma_2 = 0.061;
  tau = 2e-9;
  mu = 0.02;
  Lockdown_start = 19;
  Lockdown_end = 33;

  // Reactions:
  Susceptible_to_Infected_I1: Susceptible => Infected_strong_immune_system; Iran*Rate_Law_for_reaction(tau, Susceptible, alpha, Infected_strong_immune_system, Infected_weak_immune_system);  // modifiers: Infected_weak_immune_system; ncit:C128320; ncit:C171133
  Susceptible_to_Infected_I2: Susceptible => Infected_weak_immune_system; Iran*Rate_Law_for_reaction_1(alpha, tau, Susceptible, Infected_strong_immune_system, Infected_weak_immune_system);  // modifiers: Infected_strong_immune_system; ncit:C128320; ncit:C171133
  Infected_I1_to_Recovered: Infected_strong_immune_system => Recovered; Iran*gamma_1*Infected_strong_immune_system;  // ncit:C25746
  Infected_I2_to_Recovered: Infected_weak_immune_system => Recovered; Iran*gamma_2*Infected_weak_immune_system;  // ncit:C25746
  Infected_I2_to_Deceased: Infected_weak_immune_system => ; Iran*mu*Infected_weak_immune_system;  // isVersionOf ncit:C28554

  // Events:
  Lockdown: at ((Lockdown_start < time) && (time < Lockdown_end)), persistent=false: tau = 2e-9*exp(-alpha*time);
  After_Lockdown: at (time > Lockdown_end), persistent=false: tau = 1.47e-9;

  // Unit definitions:
  unit length = dimensionless^0;
  unit area = dimensionless^0;
  unit volume = dimensionless^0;
  unit time = 86400 second;
  unit substance = item;
end
