// SBML level 2 version 4

function Flow(Q, S)
  Q*S;
end

function Henri_Michaelis_Menten__irreversible(substrate, Km, V)
  V*substrate/(Km + substrate);
end
Henri_Michaelis_Menten__irreversible is "Henri-Michaelis-Menten (irreversible)";

function Flow_from_organ(Q, S, Ktp)
  Q*S/Ktp;
end

function Glomerular(S, Flow)
  S*Flow;
end

model PBPK_model_of_metformin_in_humans__eight_PO_administrations_with_12h_interval()
  // PBPK model of metformin in humans, eight PO administrations with 12h interval
  // This model is supplementary material of publication "Physiologically based metformin pharmacokinetics model of mice and scale-up to humans for the estimation of concentrations in various tissues"
  // by Darta Maija Zake, Linda Zaharenko, JanisKurlovics, Vitalijs Komasilovs, Egils Stalidzans and Janis Klovins.
  // This is a whole-body model representing the pharmacokinetics of metformin in the human body. The model is in the form of Ordinary differential equations and describes metformin concentration in 21 compartments.
  // The model consists of 21 compartments (“compartments” in COPASI model) describing various tissues or tissue sub-compartments and body fluids of metformin action (venous and arterial plasma, red blood cells, intestine, kidney, heart, fat, muscle, brain, lungs, stomach, liver, portal vein, remainder, urine and feces). Body weight and the weight of all compartments is expressed as a volume in mL and for the calculations it is assumed that 1mL = 1g. The volumes of most compartments are calculated as a fraction of the body weight/volume, and the fractions are determined from literature data, the volumes of the stomach lumen and intestine lumen are fixed and do not change depending on the body weight. Similarly, the volume of external urine and feces is set to 1L, but those are “volumeless” compartments as they are only necessary for the calculation of metformin amount, not concentration.
  // The model consists of 21 species (“species” in COPASI model) that correspond to the metformin concentrations in the 21 compartments. The initial concentrations for all the species are 0 nmol/mL as metformin is not produced in the body and can only be detected after dose administration.
  // The model consists of 35 reactions – they describe the transport processes of metformin in the body. The reactions include local parameters that are involved only in that particular reaction and global parameters – parameters that are used in multiple reactions or are calculated depending on another parameter e.g. scale-up coefficients.
  // The model consists of 62 global quantities – parameters involved in multiple reactions or necessary for another parameter calculation:
  // 1.Parameters describing peroral metformin dose (Metformin Dose in Lumen in mg).
  // 2.Parameter describing human physiology – body weight (in mL), cardiac output, blood flow to different compartments described as Q”compartment_name” (for example Qliver describes blood flow to the liver compartment). Qgfr refers to the glomerular filtration rate.
  // 3.Parameters involved in the scale-up of the model
  // •Tissue:plasma partition coefficients (Ktp) that were estimated in the mice model.
  // •Kidney coefficient that is used for the scale-up of metformin elimination and is involved in the calculation of the rate parameters in the reactions “13.4. KidneyPlasma -> KidneyTissue” and “13.5. KidneyTissue -> KidneyTubular”. This parameter was determined using parameter estimation.
  // •Intestine coefficient that is involved in the calculation of the intestinal reaction rates of the reactions (03.2. IntestineLumen -> Enterocytes (PMAT OCT3), 03.3. Enterocytes -> IntestineVascular (OCT1), 03.4. IntestineLumen -> IntestineVascular (Saturable), 03.6. IntestineLumen -> Enterocytes (Diffusion) , 03.7. IntestineLumen -> IntestineVascular (Diffusion)). The parmaeters for these reactions are taken from Proctor publication and the intectine coefficient is used for the scale-up from the cell-culture to the human intestine.
  // 4.Parameters involved in the calculation of metformin amount in mg, these parameters are named mg”Compartment_name” (for example mgLiver describes the metformin amount in mg in the liver tissues).
  // The time points of dose release are defined as “events” in COPASI and can be changed as necessary. The current model has 14 events and is set for a multiple-dose regimen for 7-day long twice-daily metformin administration.
  // Time course simulations can be accessed through the section “Time Course” in this section the time duration and intervals can be changed. When time-course simulations are run three plots are created – Metformin amount in the 21 compartments, metformin concentrations in the compartments and reaction fluxes of all the reactions (see “Output Specifications” -> “Plots” to activate or deactivate plots). The time-course also includes multiple "Sliders" that allow to easily change 3 parameters - "Body Weight", "Cardiac Output", "Metformin Dose in Lumen in mg".
  // hasProperty mamo:MAMO_0000046

  // Compartments:
  // the small intestine volume is compromised of 280 mL of stmach contents (juice + water administerd with dose) + 120 mL of small intestine gastric juice
  compartment IntestineLumen = 500;
  compartment Liver;
  compartment KidneyPlasma;
  compartment Remainder;
  compartment PlasmaVenous;
  compartment Urine = 1000;
  compartment Feces = 1000;
  compartment Heart;
  compartment Muscle;
  compartment Brain;
  compartment Adipose;
  compartment PlasmaArterial;
  compartment Lung;
  compartment PortalVein;
  compartment Stomach;
  compartment Enterocytes;
  compartment KidneyTissue;
  compartment IntestineVascular;
  // Stomach lumen volume is compromised of 40mL stomach juice + 240mL of water that is administered with the metformin dose
  compartment StomachLumen = 350;
  compartment RBC;
  compartment KidneyTubular;

  // Species:
  substanceOnly species mLiver in Liver = 0;
  substanceOnly species mKidneyPlasma in KidneyPlasma = 0;
  substanceOnly species mRemainder in Remainder = 0;
  substanceOnly species mPlasmaVenous in PlasmaVenous = 0;
  substanceOnly species mHeart in Heart = 0;
  substanceOnly species mMuscle in Muscle = 0;
  substanceOnly species mAdipose in Adipose = 0;
  substanceOnly species mBrain in Brain = 0;
  substanceOnly species mFeces in Feces = 0;
  substanceOnly species mUrineExternal in Urine = 0;
  substanceOnly species mIntestineLumen in IntestineLumen = 0;
  substanceOnly species mPlasmaArterial in PlasmaArterial = 0;
  substanceOnly species mLung in Lung = 0;
  substanceOnly species mPortalVein in PortalVein = 0;
  substanceOnly species mStomach in Stomach = 0;
  substanceOnly species mEnterocytes in Enterocytes = 0;
  substanceOnly species mKidneyTissue in KidneyTissue = 0;
  substanceOnly species mIntestineVascular in IntestineVascular = 0;
  substanceOnly species mStomachLumen in StomachLumen = 0;
  substanceOnly species mRBC in RBC = 0;
  substanceOnly species mKidneyTubular in KidneyTubular = 0;

  // Parameters:
  // Metformīna molmasa 129,16 g/mol
  Metformin_Dose_in_Lumen_in_mg = 389.92 unit_0;
  Body_Weight = 70000 unit_1;
  Cardiac_Output = 312000 unit_2;
  Ktp_Liver = 5.5;
  Ktp_Brain = 0.8;
  Ktp_Adipose = 0.73;
  Ktp_Heart = 2.5;
  Ktp_Kidney = 4.5;
  Ktp_Muscle = 4.1;
  Ktp_Remainder = 0.8;
  QAdipose has unit_2;
  QBrain has unit_2;
  QHeart has unit_2;
  QKidney has unit_2;
  QMuscle has unit_2;
  QRemainder has unit_2;
  Ktp_Lung = 3;
  QLiverArtery has unit_2;
  QStomach has unit_2;
  QPortalVein has unit_2;
  QIntestineVascular has unit_2;
  Ktp_Stomach = 3.2;
  Ktp_IntestineVascular = 4.6;
  Qgfr = 5600;
  var mArterialPlasma__kidney; mArterialPlasma__kidney is "mArterialPlasma (kidney)";
  var _03_2__IntestineLumen____Enterocytes__PMAT_OCT3__Vf; _03_2__IntestineLumen____Enterocytes__PMAT_OCT3__Vf is "03.2. IntestineLumen -> Enterocytes (PMAT OCT3) Vf";
  var _03_3__Enterocytes____IntestineVascular__OCT1__Vmax; _03_3__Enterocytes____IntestineVascular__OCT1__Vmax is "03.3. Enterocytes -> IntestineVascular (OCT1) Vmax";
  var _03_4__IntestineLumen____IntestineVascular__Saturable; _03_4__IntestineLumen____IntestineVascular__Saturable is "03.4. IntestineLumen -> IntestineVascular (Saturable)";
  var _03_6__IntestineLumen____Enterocytes__Diffusion__Coefficient; _03_6__IntestineLumen____Enterocytes__Diffusion__Coefficient is "03.6. IntestineLumen -> Enterocytes (Diffusion) Coefficient";
  var _03_7__IntestineLumen____IntestineVascular__Diffusion__Coefficient; _03_7__IntestineLumen____IntestineVascular__Diffusion__Coefficient is "03.7. IntestineLumen -> IntestineVascular (Diffusion) Coefficient";
  Intestine_Coefficient = 0.7;
  Kidney_Coefficient = 320;
  var _13_4__KidneyPlasma____KidneyTissue; _13_4__KidneyPlasma____KidneyTissue is "13.4. KidneyPlasma -> KidneyTissue";
  var _13_5__KidneyTissue____KidneyTubular; _13_5__KidneyTissue____KidneyTubular is "13.5. KidneyTissue -> KidneyTubular";
  Initial_for_Adipose = Adipose;
  Initial_for_Brain = Brain;
  Initial_for_Enterocytes = Enterocytes;
  Initial_for_Feces = Feces;
  Initial_for_Heart = Heart;
  Initial_for_IntestineLumen = IntestineLumen;
  Initial_for_IntestineVascular = IntestineVascular;
  Initial_for_KidneyPlasma = KidneyPlasma;
  Initial_for_KidneyTissue = KidneyTissue;
  Initial_for_KidneyTubular = KidneyTubular;
  Initial_for_Liver = Liver;
  Initial_for_Lung = Lung;
  Initial_for_Muscle = Muscle;
  Initial_for_PlasmaArterial = PlasmaArterial;
  Initial_for_PlasmaVenous = PlasmaVenous;
  Initial_for_PortalVein = PortalVein;
  Initial_for_RBC = RBC;
  Initial_for_Remainder = Remainder;
  Initial_for_StomachLumen = StomachLumen;
  Initial_for_Stomach = Stomach;
  Initial_for_Urine = Urine;
  Initial_for_Body_Weight = Body_Weight;
  Initial_for_Cardiac_Output = Cardiac_Output;
  ModelValue_55 = Intestine_Coefficient; ModelValue_55 is "Initial for Intestine Coefficient";
  ModelValue_61 = IntestineSurffaceCoefficient; ModelValue_61 is "Initial for IntestineSurffaceCoefficient";
  Initial_for_Kidney_Coefficient = Kidney_Coefficient;
  ModelValue_0 = Metformin_Dose_in_Lumen_in_mg; ModelValue_0 is "Initial for Metformin Dose in Lumen in mg";
  Initial_for_QIntestineVascular = QIntestineVascular;
  Initial_for_QLiverArtery = QLiverArtery;
  Initial_for_QPortalVeinOut = QPortalVeinOut;
  Initial_for_QPortalVein = QPortalVein;
  Initial_for_QStomach = QStomach;

  // Assignment rules:
  Brain := Initial_for_Body_Weight*0.02;
  mArterialPlasma__kidney := mPlasmaArterial/PlasmaArterial;
  PlasmaArterial := Initial_for_Body_Weight*0.0107;
  Lung := Initial_for_Body_Weight*0.0076;
  Liver := Initial_for_Body_Weight*0.0257;
  KidneyPlasma := Initial_for_Body_Weight*0.00146;
  Remainder := Initial_for_Body_Weight*0.233;
  PlasmaVenous := Initial_for_Body_Weight*0.0321;
  Heart := Initial_for_Body_Weight*0.005;
  Muscle := Initial_for_Body_Weight*0.4;
  Enterocytes := Initial_for_Body_Weight*0.0012;
  KidneyTissue := Initial_for_Body_Weight*0.00146;
  mgKidneyTissues := 129.16*Initial_for_KidneyTissue*(mKidneyTissue/KidneyTissue)/1000000;
  IntestineVascular := Initial_for_Body_Weight*0.009;
  RBC := Initial_for_Body_Weight*0.0314;
  mgRBC := 129.16*(mRBC/RBC)*Initial_for_RBC/1000000;
  KidneyTubular := Initial_for_Body_Weight*0.00146;
  mKidneyTotal := (Initial_for_KidneyPlasma*(mKidneyPlasma/KidneyPlasma) + Initial_for_KidneyTissue*(mKidneyTissue/KidneyTissue) + Initial_for_KidneyTubular*(mKidneyTubular/KidneyTubular))/(Initial_for_KidneyPlasma + Initial_for_KidneyTissue + Initial_for_KidneyTubular);
  mgKidneyTubular := 129.16*Initial_for_KidneyTubular*(mKidneyTubular/KidneyTubular)/1000000;
  QAdipose := Initial_for_Cardiac_Output*0.052;
  QBrain := Initial_for_Cardiac_Output*0.114;
  QHeart := Initial_for_Cardiac_Output*0.04;
  QKidney := Initial_for_Cardiac_Output*0.175;
  QMuscle := Initial_for_Cardiac_Output*0.191;
  QRemainder := Initial_for_Cardiac_Output*0.201;
  mgLiver := 129.16*(mLiver/Liver)*Initial_for_Liver/1000000;
  mgIntestineLumen := 129.16*(mIntestineLumen/IntestineLumen)*Initial_for_IntestineLumen/1000000;
  mgBrain := 129.16*(mBrain/Brain)*Initial_for_Brain/1000000;
  mgHeart := 129.16*(mHeart/Heart)*Initial_for_Heart/1000000;
  mgKidneyPlasma := 129.16*(mKidneyPlasma/KidneyPlasma)*Initial_for_KidneyPlasma/1000000;
  mgRemainder := 129.16*(mRemainder/Remainder)*Initial_for_Remainder/1000000;
  mgMuscle := 129.16*(mMuscle/Muscle)*Initial_for_Muscle/1000000;
  mgUrineSum := 129.16*(mUrineExternal/Urine)*Initial_for_Urine/1000000;
  mgFeces := 129.16*(mFeces/Feces)*Initial_for_Feces/1000000;
  mgEnterocytes := 129.16*(mEnterocytes/Enterocytes)*Initial_for_Enterocytes/1000000;
  _13_4__KidneyPlasma____KidneyTissue := Initial_for_Kidney_Coefficient*87339;
  _13_5__KidneyTissue____KidneyTubular := Initial_for_Kidney_Coefficient*3000;
  mgIntestineVascular := 129.16*(mIntestineVascular/IntestineVascular)*Initial_for_IntestineVascular/1000000;
  mgIntestineTotal := mgIntestineVascular + mgEnterocytes;
  Adipose := Initial_for_Body_Weight*0.215;
  mgAdipose := 129.16*(mAdipose/Adipose)*Initial_for_Adipose/1000000;
  mgLung := 129.16*(mLung/Lung)*Initial_for_Lung/1000000;
  mgVenousPlasma := 129.16*(mPlasmaVenous/PlasmaVenous)*Initial_for_PlasmaVenous/1000000;
  mgArterialPlasma := 129.16*(mPlasmaArterial/PlasmaArterial)*Initial_for_PlasmaArterial/1000000;
  mgStomachLumen := 129.16*(mStomachLumen/StomachLumen)*Initial_for_StomachLumen/1000000;
  mgKidneyTotal := mgKidneyTubular + mgKidneyPlasma + mgKidneyTissues;
  QPortalVein := Initial_for_Cardiac_Output*0.064;
  IntestineSurffaceCoefficient := 70/0.032;
  _03_2__IntestineLumen____Enterocytes__PMAT_OCT3__Vf := ModelValue_55*ModelValue_61*1271;
  _03_3__Enterocytes____IntestineVascular__OCT1__Vmax := ModelValue_55*ModelValue_61*495;
  _03_4__IntestineLumen____IntestineVascular__Saturable := ModelValue_55*ModelValue_61*19.2;
  _03_6__IntestineLumen____Enterocytes__Diffusion__Coefficient := ModelValue_55*ModelValue_61*0.14;
  _03_7__IntestineLumen____IntestineVascular__Diffusion__Coefficient := ModelValue_55*ModelValue_61*0.26;
  PortalVein := Initial_for_Body_Weight*0.0028;
  mgPortalVein := 129.16*(mPortalVein/PortalVein)*Initial_for_PortalVein/1000000;
  QStomach := Initial_for_Cardiac_Output*0.011;
  Stomach := Initial_for_Body_Weight*0.0021;
  mgStomach := 129.16*(mStomach/Stomach)*Initial_for_Stomach/1000000;
  QLiverArtery := Initial_for_Cardiac_Output*0.046;
  QIntestineVascular := Initial_for_Cardiac_Output*0.106;
  QPortalVeinOut := Initial_for_QStomach + Initial_for_QPortalVein + Initial_for_QIntestineVascular;
  QLiverOut := Initial_for_QPortalVeinOut + Initial_for_QLiverArtery;
  mIntestineTotal := (mEnterocytes/Enterocytes*Initial_for_Enterocytes + Initial_for_IntestineVascular*(mIntestineVascular/IntestineVascular))/(Initial_for_Enterocytes + Initial_for_IntestineVascular);

  // Reactions:
  _03_5__IntestineVascular____PortalVein: mIntestineVascular => mPortalVein; Flow_from_organ(QIntestineVascular, mIntestineVascular/IntestineVascular, Ktp_IntestineVascular); _03_5__IntestineVascular____PortalVein is "03.5. IntestineVascular -> PortalVein";
  _06_3__Liver____PlasmaVenous: mLiver => mPlasmaVenous; Flow_from_organ(QLiverOut, mLiver/Liver, Ktp_Liver); _06_3__Liver____PlasmaVenous is "06.3. Liver -> PlasmaVenous";
  _13_2__KidneyPlasma____PlasmaVenous: mKidneyPlasma => mPlasmaVenous; Flow_from_organ(QKidney, mKidneyPlasma/KidneyPlasma, Ktp_Kidney); _13_2__KidneyPlasma____PlasmaVenous is "13.2. KidneyPlasma -> PlasmaVenous";
  _09_2__Muscle____PlasmaVenous: mMuscle => mPlasmaVenous; Flow_from_organ(QMuscle, mMuscle/Muscle, Ktp_Muscle); _09_2__Muscle____PlasmaVenous is "09.2. Muscle -> PlasmaVenous";
  _12_2__Remainder____PlasmaVenous: mRemainder => mPlasmaVenous; Flow_from_organ(QRemainder, mRemainder/Remainder, Ktp_Remainder); _12_2__Remainder____PlasmaVenous is "12.2. Remainder -> PlasmaVenous";
  _02__IntestineLumen____Feces: mIntestineLumen => mFeces; _02__IntestineLumen____Feces_k1*(mIntestineLumen/IntestineLumen); _02__IntestineLumen____Feces is "02. IntestineLumen -> Feces";
    _02__IntestineLumen____Feces_k1 = 650;
  _13_1__PlasmaArterial____KidneyPlasma: mPlasmaArterial => mKidneyPlasma; Flow(QKidney, mPlasmaArterial/PlasmaArterial); _13_1__PlasmaArterial____KidneyPlasma is "13.1. PlasmaArterial -> KidneyPlasma";
  _09_1__PlasmaArterial____Muscle: mPlasmaArterial => mMuscle; Flow(QMuscle, mPlasmaArterial/PlasmaArterial); _09_1__PlasmaArterial____Muscle is "09.1. PlasmaArterial -> Muscle";
  _12_1__PlasmaArterial____Remainder: mPlasmaArterial => mRemainder; Flow(QRemainder, mPlasmaArterial/PlasmaArterial); _12_1__PlasmaArterial____Remainder is "12.1. PlasmaArterial -> Remainder";
  _13_3__PlasmaArterial____KidneyTubular: mKidneyPlasma => mKidneyTubular; Glomerular(mArterialPlasma__kidney, Qgfr); _13_3__PlasmaArterial____KidneyTubular is "13.3. PlasmaArterial -> KidneyTubular";
  _06_2__PortalVein____Liver: mPortalVein => mLiver; Flow(QPortalVeinOut, mPortalVein/PortalVein); _06_2__PortalVein____Liver is "06.2. PortalVein -> Liver";
  _05_1__PlasmaArterial____Stomach: mPlasmaArterial => mStomach; Flow(QStomach, mPlasmaArterial/PlasmaArterial); _05_1__PlasmaArterial____Stomach is "05.1. PlasmaArterial -> Stomach";
  _05_2__Stomach____PortalVein: mStomach => mPortalVein; Flow_from_organ(QStomach, mStomach/Stomach, Ktp_Stomach); _05_2__Stomach____PortalVein is "05.2. Stomach -> PortalVein";
  _04__PlasmaArterial____PortalVein: mPlasmaArterial => mPortalVein; Flow(QPortalVein, mPlasmaArterial/PlasmaArterial); _04__PlasmaArterial____PortalVein is "04. PlasmaArterial -> PortalVein";
  _03_1__PlasmaArterial____IntestineVascular: mPlasmaArterial => mIntestineVascular; Flow(QIntestineVascular, mPlasmaArterial/PlasmaArterial); _03_1__PlasmaArterial____IntestineVascular is "03.1. PlasmaArterial -> IntestineVascular";
  _06_1__PlasmaArterial____Liver: mPlasmaArterial => mLiver; Flow(QLiverArtery, mPlasmaArterial/PlasmaArterial); _06_1__PlasmaArterial____Liver is "06.1. PlasmaArterial -> Liver";
  _03_2__IntestineLumen____Enterocytes__PMAT_OCT3: mIntestineLumen => mEnterocytes; Henri_Michaelis_Menten__irreversible(mIntestineLumen/IntestineLumen, _03_2__IntestineLumen____Enterocytes__PMAT_OCT3_Km, _03_2__IntestineLumen____Enterocytes__PMAT_OCT3__Vf); _03_2__IntestineLumen____Enterocytes__PMAT_OCT3 is "03.2. IntestineLumen -> Enterocytes (PMAT OCT3)";
    _03_2__IntestineLumen____Enterocytes__PMAT_OCT3_Km = 900;
  _03_4__IntestineLumen____IntestineVascular__Saturable_0: mIntestineLumen => mIntestineVascular; Henri_Michaelis_Menten__irreversible(mIntestineLumen/IntestineLumen, _03_4__IntestineLumen____IntestineVascular__Saturable_0_Km, _03_4__IntestineLumen____IntestineVascular__Saturable); _03_4__IntestineLumen____IntestineVascular__Saturable_0 is "03.4. IntestineLumen -> IntestineVascular (Saturable)";
    _03_4__IntestineLumen____IntestineVascular__Saturable_0_Km = 60;
  _03_3__Enterocytes____IntestineVascular__OCT1: mEnterocytes => mIntestineVascular; Henri_Michaelis_Menten__irreversible(mEnterocytes/Enterocytes, _03_3__Enterocytes____IntestineVascular__OCT1_Km, _03_3__Enterocytes____IntestineVascular__OCT1__Vmax); _03_3__Enterocytes____IntestineVascular__OCT1 is "03.3. Enterocytes -> IntestineVascular (OCT1)";
    _03_3__Enterocytes____IntestineVascular__OCT1_Km = 12300;
  _13_4__KidneyPlasma____KidneyTissue_0: mKidneyPlasma => mKidneyTissue; Henri_Michaelis_Menten__irreversible(mKidneyPlasma/KidneyPlasma, _13_4__KidneyPlasma____KidneyTissue_0_Km, _13_4__KidneyPlasma____KidneyTissue); _13_4__KidneyPlasma____KidneyTissue_0 is "13.4. KidneyPlasma -> KidneyTissue";
    _13_4__KidneyPlasma____KidneyTissue_0_Km = 1380;
  _13_5__KidneyTissue____KidneyTubular_0: mKidneyTissue => mKidneyTubular; Henri_Michaelis_Menten__irreversible(mKidneyTissue/KidneyTissue, _13_5__KidneyTissue____KidneyTubular_0_Km, _13_5__KidneyTissue____KidneyTubular); _13_5__KidneyTissue____KidneyTubular_0 is "13.5. KidneyTissue -> KidneyTubular";
    _13_5__KidneyTissue____KidneyTubular_0_Km = 230;
  _01__StomachLumen_____IntestineLumen: mStomachLumen => mIntestineLumen; _01__StomachLumen_____IntestineLumen_k1*(mStomachLumen/StomachLumen); _01__StomachLumen_____IntestineLumen is "01. StomachLumen -> IntestineLumen";
    _01__StomachLumen_____IntestineLumen_k1 = 350;
  _07_2__Lung____PlasmaArterial: mLung => mPlasmaArterial; Flow_from_organ(Cardiac_Output, mLung/Lung, Ktp_Lung); _07_2__Lung____PlasmaArterial is "07.2. Lung -> PlasmaArterial";
  _07_1__PlasmaVenous____Lung: mPlasmaVenous => mLung; Flow(Cardiac_Output, mPlasmaVenous/PlasmaVenous); _07_1__PlasmaVenous____Lung is "07.1. PlasmaVenous -> Lung";
  _08_2__Brain____PlasmaVenous: mBrain => mPlasmaVenous; Flow_from_organ(QBrain, mBrain/Brain, Ktp_Brain); _08_2__Brain____PlasmaVenous is "08.2. Brain -> PlasmaVenous";
  _08_1__PlasmaArterial____Brain: mPlasmaArterial => mBrain; Flow(QBrain, mPlasmaArterial/PlasmaArterial); _08_1__PlasmaArterial____Brain is "08.1. PlasmaArterial -> Brain";
  _11_2__Heart____PlasmaVenous: mHeart => mPlasmaVenous; Flow_from_organ(QHeart, mHeart/Heart, Ktp_Heart); _11_2__Heart____PlasmaVenous is "11.2. Heart -> PlasmaVenous";
  _11_1__PlasmaArterial____Heart: mPlasmaArterial => mHeart; Flow(QHeart, mPlasmaArterial/PlasmaArterial); _11_1__PlasmaArterial____Heart is "11.1. PlasmaArterial -> Heart";
  _10_2__Adipose____PlasmaVenous: mAdipose => mPlasmaVenous; Flow_from_organ(QAdipose, mAdipose/Adipose, Ktp_Adipose); _10_2__Adipose____PlasmaVenous is "10.2. Adipose -> PlasmaVenous";
  _10_1__PlasmaArterial____Adipose: mPlasmaArterial => mAdipose; Flow(QAdipose, mPlasmaArterial/PlasmaArterial); _10_1__PlasmaArterial____Adipose is "10.1. PlasmaArterial -> Adipose";
  _14_1__PlasmaVenous____RBC: mPlasmaVenous => mRBC; _14_1__PlasmaVenous____RBC_k1*(mPlasmaVenous/PlasmaVenous); _14_1__PlasmaVenous____RBC is "14.1. PlasmaVenous -> RBC";
    _14_1__PlasmaVenous____RBC_k1 = 84;
  _14_2__RBC____PlasmaVenous: mRBC => mPlasmaVenous; _14_2__RBC____PlasmaVenous_k1*(mRBC/RBC); _14_2__RBC____PlasmaVenous is "14.2. RBC -> PlasmaVenous";
    _14_2__RBC____PlasmaVenous_k1 = 96;
  _13_6__KidneyTubular____UrineExternal: mKidneyTubular => mUrineExternal; _13_6__KidneyTubular____UrineExternal_k1*(mKidneyTubular/KidneyTubular); _13_6__KidneyTubular____UrineExternal is "13.6. KidneyTubular -> UrineExternal";
    _13_6__KidneyTubular____UrineExternal_k1 = 70;
  _03_6__IntestineLumen____Enterocytes__Diffusion: mIntestineLumen -> mEnterocytes; _03_6__IntestineLumen____Enterocytes__Diffusion__Coefficient*(mIntestineLumen/IntestineLumen) - _03_6__IntestineLumen____Enterocytes__Diffusion__Coefficient*(mEnterocytes/Enterocytes); _03_6__IntestineLumen____Enterocytes__Diffusion is "03.6. IntestineLumen -> Enterocytes (Diffusion)";
  _03_7__IntestineLumen____IntestineVascular__Diffusion: mIntestineLumen -> mIntestineVascular; _03_7__IntestineLumen____IntestineVascular__Diffusion__Coefficient*(mIntestineLumen/IntestineLumen) - _03_7__IntestineLumen____IntestineVascular__Diffusion__Coefficient*(mIntestineVascular/IntestineVascular); _03_7__IntestineLumen____IntestineVascular__Diffusion is "03.7. IntestineLumen -> IntestineVascular (Diffusion)";

  // Events:
  Dose_0_001h: at (time > 0.001): mStomachLumen = (1000000*ModelValue_0/(129.16*Initial_for_StomachLumen) + mStomachLumen/StomachLumen)*StomachLumen; Dose_0_001h is "Dose 0.001h";
  Dose__12h: at (time > 12): mStomachLumen = (1000000*ModelValue_0/(129.16*Initial_for_StomachLumen) + mStomachLumen/StomachLumen)*StomachLumen; Dose__12h is "Dose -12h";
  Dose_24h: at (time > 24): mStomachLumen = (1000000*ModelValue_0/(129.16*Initial_for_StomachLumen) + mStomachLumen/StomachLumen)*StomachLumen;
  Dose_36h: at (time > 36): mStomachLumen = (1000000*ModelValue_0/(129.16*Initial_for_StomachLumen) + mStomachLumen/StomachLumen)*StomachLumen;
  Dose_48h: at (time > 48): mStomachLumen = (1000000*ModelValue_0/(129.16*Initial_for_StomachLumen) + mStomachLumen/StomachLumen)*StomachLumen;
  Dose_60h: at (time > 60): mStomachLumen = (1000000*ModelValue_0/(129.16*Initial_for_StomachLumen) + mStomachLumen/StomachLumen)*StomachLumen;
  Dose_72h: at (time > 72): mStomachLumen = (1000000*ModelValue_0/(129.16*Initial_for_StomachLumen) + mStomachLumen/StomachLumen)*StomachLumen;
  Dose_84h: at (time > 84): mStomachLumen = (1000000*ModelValue_0/(129.16*Initial_for_StomachLumen) + mStomachLumen/StomachLumen)*StomachLumen;

  // Unit definitions:
  unit volume = 1e-3 litre;
  unit time = 3600 second;
  unit substance = 1e-9 mole;
  unit unit_0 = 1e-3 gram; unit_0 is "mg";
  unit unit_1 = 1e-3 litre; unit_1 is "ml";
  unit unit_2 = 1e-3 litre / (360000 second); unit_2 is "ml/h";
end
