// SBML level 2 version 4

function Henri_Michaelis_Menten__irreversible(substrate, Km, V)
  V*substrate/(Km + substrate);
end
Henri_Michaelis_Menten__irreversible is "Henri-Michaelis-Menten (irreversible)";

function Flow_from_organ(Q, S, Ktp)
  Q*S/Ktp;
end

function Glomerular(S, Flow)
  S*Flow;
end

function Flow(Q, S)
  Q*S;
end

model PBPK_model_of_metformin_in_mice__single_dose_intavenous()
  // PBPK model of metformin in mice: single dose intavenous
  // This model is supplementary material of publication "Physiologically based metformin pharmacokinetics model of mice and scale-up to humans for the estimation of concentrations in various tissues"
  // by Darta Maija Zake, Linda Zaharenko, JanisKurlovics, Vitalijs Komasilovs, Egils Stalidzans and Janis Klovins.
  // This is a whole-body model representing the pharmacokinetics of metformin in the mouse body. The model is in the form of ordinary differential equations and describes metformin concentration in 20 compartments.
  // The model consists of 20 compartments (“Compartments” in COPASI model) describing various tissues or tissue sub-compartments and body fluids of metformin action (venous and arterial plasma, intestine, kidney, heart, fat, muscle, brain, lungs, stomach, liver, portal vein, remainder urine and feces). Body weight and the weight of all compartments is expressed as a volume in mL and for the calculations it is assumed that 1mL = 1g. The volumes of most compartments are calculated as a fraction of the body weight/volume, and the fractions are determined from literature data, the volumes of the stomach lumen and intestine lumen are fixed and do not change depending on the body weight. Similarly, the volume of external urine and feces is set to 1mL, but those are “volumeless” compartments as they are only necessary for the calculation of metformin amount, not concentration.
  // The model consists of 20 species (“Species” in COPASI model) that correspond to the metformin concentrations in the 20 compartments. The initial concentrations for all the species are 0 nmol/mL as metformin is not produced in the body and can only be detected after dose administration.
  // The model consists of 33 reactions – they describe the transport processes of metformin in the body. The reactions include local parameters that are involved only in that particular reaction and global parameters – parameters that are used in multiple reactions or are calculated depending on another parameter e.g. scale-up coefficients.
  // The model consists of 52 global quantities – parameters involved in multiple reactions or necessary for another parameter calculation:
  // 1.Parameters describing metformin dose – either in peroral (Metformin Dose in Lumen in mg) or intravenous (Metformin Dose in Plasma in mg).
  // 2.Parameter describing mice physiology – body weight (in mL), cardiac output, blood flow to different compartments described as Q”compartment_name” (for example Qliver describes blood flow to the liver compartment). Qgfr refers to the glomerular filtration rate.
  // 3.Tissue:plasma partition coefficients (Ktp) that are necessary for the scale-up to humans.
  // 4.Parameters involved in the calculation of metformin amount in mg, these parameters are named mg”Compartment_name” (for example mgLiver describes the metformin amount in mg in the liver tissues).
  // The time points of dose release are defined as “events” in COPASI and can be changed as necessary.
  // Time course simulations can be accessed through the section “Time Course” in this section the time duration and intervals can be changed. When time-course simulations are run three plots are created – Metformin amount in the 20 compartments, metformin concentrations in the compartments and reaction fluxes of all the reactions (see “Output Specifications” -> “Plots” to activate or deactivate plots).
  // hasProperty mamo:MAMO_0000046

  // Compartments:
  compartment IntestineLumen = 0.6;
  compartment Liver;
  compartment KidneyPlasma;
  compartment Remainder;
  compartment PlasmaVenous;
  compartment Urine = 1;
  compartment Feces = 1;
  compartment Heart;
  compartment Muscle;
  compartment Brain;
  compartment Adipose;
  compartment PlasmaArterial;
  compartment Lung;
  compartment PortalVein;
  compartment Stomach;
  compartment IntestineEnterocytes;
  compartment KidneyTissue;
  compartment IntestineVascular;
  compartment StomachLumen = 0.4;
  compartment KidneyTubular;

  // Species:
  substanceOnly species mLiver in Liver = 0;
  substanceOnly species mKidneyPlasma in KidneyPlasma = 0;
  substanceOnly species mRemainder in Remainder = 0;
  substanceOnly species mPlasmaVenous in PlasmaVenous = 1000000*Metformin_Dose_in_Plasma_in_mg/(129.16*PlasmaVenous)*PlasmaVenous;
  substanceOnly species mHeart in Heart = 0;
  substanceOnly species mMuscle in Muscle = 0;
  substanceOnly species mAdipose in Adipose = 0;
  substanceOnly species mBrain in Brain = 0;
  substanceOnly species mFeces in Feces = 0;
  substanceOnly species mUrine in Urine = 0;
  substanceOnly species mIntestineLumen in IntestineLumen = 0;
  substanceOnly species mPlasmaArterial in PlasmaArterial = 0;
  substanceOnly species mLung in Lung = 0;
  substanceOnly species mPortalVein in PortalVein = 0;
  substanceOnly species mStomach in Stomach = 0;
  substanceOnly species mIntestineEnterocytes in IntestineEnterocytes = 0;
  substanceOnly species mKidneyTissue in KidneyTissue = 0;
  substanceOnly species mIntestineVascular in IntestineVascular = 0;
  substanceOnly species mStomachLumen in StomachLumen = 0;
  substanceOnly species mKidneyTubular in KidneyTubular = 0;

  // Parameters:
  // Metformīna molmasa 129,16 g/mol
  Metformin_Dose_in_Lumen_in_mg = 0 unit_0;
  Body_Weight = 27.5 unit_1;
  Metformin_Dose_in_Plasma_in_mg = 1.375 unit_0;
  Cardiac_Output = 838.8 unit_2;
  Ktp_Liver = 5.5;
  Ktp_Brain = 0.8;
  Ktp_Adipose = 0.73;
  Ktp_Heart = 2.500089;
  Ktp_Kidney = 4.5;
  Ktp_Muscle = 4.1;
  Ktp_Remainder = 0.8;
  QAdipose has unit_2;
  QBrain has unit_2;
  QHeart has unit_2;
  QKidney has unit_2;
  QMuscle has unit_2;
  QRemainder has unit_2;
  Ktp_Lung = 3;
  QLiverArtery has unit_2;
  QStomach has unit_2;
  QPortalVein has unit_2;
  QIntestineVascular has unit_2;
  Ktp_Stomach = 3.2;
  Ktp_IntestineVascular = 4.6;
  Qgfr = 20;
  var mArterialPlasma__for_kidney; mArterialPlasma__for_kidney is "mArterialPlasma (for kidney)";
  Initial_for_Adipose = Adipose;
  Initial_for_Brain = Brain;
  Initial_for_Feces = Feces;
  Initial_for_Heart = Heart;
  Initial_for_IntestineEnterocytes = IntestineEnterocytes;
  Initial_for_IntestineLumen = IntestineLumen;
  Initial_for_IntestineVascular = IntestineVascular;
  Initial_for_KidneyPlasma = KidneyPlasma;
  Initial_for_KidneyTissue = KidneyTissue;
  Initial_for_KidneyTubular = KidneyTubular;
  Initial_for_Liver = Liver;
  Initial_for_Lung = Lung;
  Initial_for_Muscle = Muscle;
  Initial_for_PlasmaArterial = PlasmaArterial;
  Initial_for_PlasmaVenous = PlasmaVenous;
  Initial_for_PortalVein = PortalVein;
  Initial_for_Remainder = Remainder;
  Initial_for_StomachLumen = StomachLumen;
  Initial_for_Stomach = Stomach;
  Initial_for_Urine = Urine;
  Initial_for_Body_Weight = Body_Weight;
  Initial_for_Cardiac_Output = Cardiac_Output;
  ModelValue_0 = Metformin_Dose_in_Lumen_in_mg; ModelValue_0 is "Initial for Metformin Dose in Lumen in mg";
  Initial_for_QIntestineVascular = QIntestineVascular;
  Initial_for_QLiverArtery = QLiverArtery;
  Initial_for_QPortalVeinOut = QPortalVeinOut;
  Initial_for_QPortalVein = QPortalVein;
  Initial_for_QStomach = QStomach;

  // Assignment rules:
  Liver := Initial_for_Body_Weight*0.0549;
  KidneyPlasma := Initial_for_Body_Weight*0.0056;
  Remainder := Initial_for_Body_Weight*0.3585;
  PlasmaVenous := Initial_for_Body_Weight*0.0375;
  Heart := Initial_for_Body_Weight*0.005;
  Muscle := Initial_for_Body_Weight*0.384;
  Brain := Initial_for_Body_Weight*0.0165;
  Adipose := Initial_for_Body_Weight*0.07;
  PlasmaArterial := Initial_for_Body_Weight*0.0125;
  Lung := Initial_for_Body_Weight*0.0073;
  PortalVein := Initial_for_Body_Weight*0.0058;
  Stomach := Initial_for_Body_Weight*0.006;
  IntestineEnterocytes := Initial_for_Body_Weight*0.0025;
  KidneyTissue := Initial_for_Body_Weight*0.0056;
  IntestineVascular := Initial_for_Body_Weight*0.0228;
  KidneyTubular := Initial_for_Body_Weight*0.0056;
  mgUrine := 129.16*(mUrine/Urine)*Initial_for_Urine/1000000;
  mgFeces := 129.16*(mFeces/Feces)*Initial_for_Feces/1000000;
  mgIntestineEnterocytes := 129.16*(mIntestineEnterocytes/IntestineEnterocytes)*Initial_for_IntestineEnterocytes/1000000;
  mgPlasmaVenous := 129.16*(mPlasmaVenous/PlasmaVenous)*Initial_for_PlasmaVenous/1000000;
  QAdipose := Initial_for_Cardiac_Output*0.005;
  QBrain := Initial_for_Cardiac_Output*0.033;
  QHeart := Initial_for_Cardiac_Output*0.066;
  mgKidneyTissues := 129.16*Initial_for_KidneyTissue*(mKidneyTissue/KidneyTissue)/1000000;
  mgIntestineVascular := 129.16*(mIntestineVascular/IntestineVascular)*Initial_for_IntestineVascular/1000000;
  mgIntestineTotal := mgIntestineEnterocytes + mgIntestineVascular;
  mgStomachLumen := 129.16*(mStomachLumen/StomachLumen)*Initial_for_StomachLumen/1000000;
  mArterialPlasma__for_kidney := mPlasmaArterial/PlasmaArterial;
  mgKidneyTubular := 129.16*Initial_for_KidneyTubular*(mKidneyTubular/KidneyTubular)/1000000;
  QKidney := Initial_for_Cardiac_Output*0.091;
  QMuscle := Initial_for_Cardiac_Output*0.159;
  QRemainder := Initial_for_Cardiac_Output*0.411;
  mgLiver := 129.16*(mLiver/Liver)*Initial_for_Liver/1000000;
  mgIntestineLumen := 129.16*(mIntestineLumen/IntestineLumen)*Initial_for_IntestineLumen/1000000;
  mgBrain := 129.16*(mBrain/Brain)*Initial_for_Brain/1000000;
  mgAdipose := 129.16*(mAdipose/Adipose)*Initial_for_Adipose/1000000;
  mgHeart := 129.16*(mHeart/Heart)*Initial_for_Heart/1000000;
  mgKidneyPlasma := 129.16*(mKidneyPlasma/KidneyPlasma)*Initial_for_KidneyPlasma/1000000;
  mgKidneyTotal := mgKidneyPlasma + mgKidneyTissues + mgKidneyTubular;
  mgRemainder := 129.16*(mRemainder/Remainder)*Initial_for_Remainder/1000000;
  mgMuscle := 129.16*(mMuscle/Muscle)*Initial_for_Muscle/1000000;
  mgPortalVein := 129.16*(mPortalVein/PortalVein)*Initial_for_PortalVein/1000000;
  mgPlasmaArterial := 129.16*(mPlasmaArterial/PlasmaArterial)*Initial_for_PlasmaArterial/1000000;
  mgLung := 129.16*(mLung/Lung)*Initial_for_Lung/1000000;
  mgStomach := 129.16*(mStomach/Stomach)*Initial_for_Stomach/1000000;
  QLiverArtery := Initial_for_Cardiac_Output*0.02;
  QStomach := Initial_for_Cardiac_Output*0.02;
  QPortalVein := Initial_for_Cardiac_Output*0.06;
  QIntestineVascular := Initial_for_Cardiac_Output*0.135;
  QPortalVeinOut := Initial_for_QStomach + Initial_for_QPortalVein + Initial_for_QIntestineVascular;
  QLiverOut := Initial_for_QPortalVeinOut + Initial_for_QLiverArtery;
  mIntestineSum := (mIntestineEnterocytes/IntestineEnterocytes*Initial_for_IntestineEnterocytes + Initial_for_IntestineVascular*(mIntestineVascular/IntestineVascular))/(Initial_for_IntestineEnterocytes + Initial_for_IntestineVascular);
  mKidneySum := (Initial_for_KidneyPlasma*(mKidneyPlasma/KidneyPlasma) + Initial_for_KidneyTissue*(mKidneyTissue/KidneyTissue) + Initial_for_KidneyTubular*(mKidneyTubular/KidneyTubular))/(Initial_for_KidneyPlasma + Initial_for_KidneyTissue + Initial_for_KidneyTubular);

  // Reactions:
  _03_5__IntestineVascular____PortalVein: mIntestineVascular => mPortalVein; Flow_from_organ(QIntestineVascular, mIntestineVascular/IntestineVascular, Ktp_IntestineVascular); _03_5__IntestineVascular____PortalVein is "03.5. IntestineVascular -> PortalVein";
  _06_3__Liver____PlasmaVenous: mLiver => mPlasmaVenous; Flow_from_organ(QLiverOut, mLiver/Liver, Ktp_Liver); _06_3__Liver____PlasmaVenous is "06.3. Liver -> PlasmaVenous";
  _13_2__KidneyPlasma____PlasmaVenous: mKidneyPlasma => mPlasmaVenous; Flow_from_organ(QKidney, mKidneyPlasma/KidneyPlasma, Ktp_Kidney); _13_2__KidneyPlasma____PlasmaVenous is "13.2. KidneyPlasma -> PlasmaVenous";
  _09_2__Muscle____PlasmaVenous: mMuscle => mPlasmaVenous; Flow_from_organ(QMuscle, mMuscle/Muscle, Ktp_Muscle); _09_2__Muscle____PlasmaVenous is "09.2. Muscle -> PlasmaVenous";
  _12_2__Remainder____PlasmaVenous: mRemainder => mPlasmaVenous; Flow_from_organ(QRemainder, mRemainder/Remainder, Ktp_Remainder); _12_2__Remainder____PlasmaVenous is "12.2. Remainder -> PlasmaVenous";
  _02__IntestineLumen____Feces: mIntestineLumen => mFeces; _02__IntestineLumen____Feces_k1*(mIntestineLumen/IntestineLumen); _02__IntestineLumen____Feces is "02. IntestineLumen -> Feces";
    _02__IntestineLumen____Feces_k1 = 0.177684;
  _13_1__PlasmaArterial____KidneyPlasma: mPlasmaArterial => mKidneyPlasma; Flow(QKidney, mPlasmaArterial/PlasmaArterial); _13_1__PlasmaArterial____KidneyPlasma is "13.1. PlasmaArterial -> KidneyPlasma";
  _09_1__PlasmaArterial____Muscle: mPlasmaArterial => mMuscle; Flow(QMuscle, mPlasmaArterial/PlasmaArterial); _09_1__PlasmaArterial____Muscle is "09.1. PlasmaArterial -> Muscle";
  _12_1__PlasmaArterial____Remainder: mPlasmaArterial => mRemainder; Flow(QRemainder, mPlasmaArterial/PlasmaArterial); _12_1__PlasmaArterial____Remainder is "12.1. PlasmaArterial -> Remainder";
  _13_3__KidneyPlasma____KidneyTubular: mKidneyPlasma => mKidneyTubular; Glomerular(mArterialPlasma__for_kidney, Qgfr); _13_3__KidneyPlasma____KidneyTubular is "13.3. KidneyPlasma -> KidneyTubular";
  _06_2__PortalVein____Liver: mPortalVein => mLiver; Flow(QPortalVeinOut, mPortalVein/PortalVein); _06_2__PortalVein____Liver is "06.2. PortalVein -> Liver";
  _05_1__PlasmaArterial____Stomach: mPlasmaArterial => mStomach; Flow(QStomach, mPlasmaArterial/PlasmaArterial); _05_1__PlasmaArterial____Stomach is "05.1. PlasmaArterial -> Stomach";
  _05_2__Stomach____PortalVein: mStomach => mPortalVein; Flow_from_organ(QStomach, mStomach/Stomach, Ktp_Stomach); _05_2__Stomach____PortalVein is "05.2. Stomach -> PortalVein";
  _04__PlasmaArterial____PortalVein: mPlasmaArterial => mPortalVein; Flow(QPortalVein, mPlasmaArterial/PlasmaArterial); _04__PlasmaArterial____PortalVein is "04. PlasmaArterial -> PortalVein";
  _03_1__PlasmaArterial____IntestineVascular: mPlasmaArterial => mIntestineVascular; Flow(QIntestineVascular, mPlasmaArterial/PlasmaArterial); _03_1__PlasmaArterial____IntestineVascular is "03.1. PlasmaArterial -> IntestineVascular";
  _06_1__PlasmaArterial____Liver: mPlasmaArterial => mLiver; Flow(QLiverArtery, mPlasmaArterial/PlasmaArterial); _06_1__PlasmaArterial____Liver is "06.1. PlasmaArterial -> Liver";
  _03_2__IntestineLumen____IntestineEnterocytes__PMAT_OCT3: mIntestineLumen => mIntestineEnterocytes; Henri_Michaelis_Menten__irreversible(mIntestineLumen/IntestineLumen, _03_2__IntestineLumen____IntestineEnterocytes__PMAT_OCT3_Km, _03_2__IntestineLumen____IntestineEnterocytes__PMAT_OCT3_V); _03_2__IntestineLumen____IntestineEnterocytes__PMAT_OCT3 is "03.2. IntestineLumen -> IntestineEnterocytes (PMAT OCT3)";
    _03_2__IntestineLumen____IntestineEnterocytes__PMAT_OCT3_Km = 900; _03_2__IntestineLumen____IntestineEnterocytes__PMAT_OCT3_V = 1271;
  _03_4__IntestineLumen____IntestineVascular__Saturable: mIntestineLumen => mIntestineVascular; Henri_Michaelis_Menten__irreversible(mIntestineLumen/IntestineLumen, _03_4__IntestineLumen____IntestineVascular__Saturable_Km, _03_4__IntestineLumen____IntestineVascular__Saturable_V); _03_4__IntestineLumen____IntestineVascular__Saturable is "03.4. IntestineLumen -> IntestineVascular (Saturable)";
    _03_4__IntestineLumen____IntestineVascular__Saturable_Km = 60; _03_4__IntestineLumen____IntestineVascular__Saturable_V = 19.2;
  _03_3__IntestineEnterocytes____IntestineVascular__OCT1: mIntestineEnterocytes => mIntestineVascular; Henri_Michaelis_Menten__irreversible(mIntestineEnterocytes/IntestineEnterocytes, _03_3__IntestineEnterocytes____IntestineVascular__OCT1_Km, _03_3__IntestineEnterocytes____IntestineVascular__OCT1_V); _03_3__IntestineEnterocytes____IntestineVascular__OCT1 is "03.3. IntestineEnterocytes -> IntestineVascular (OCT1)";
    _03_3__IntestineEnterocytes____IntestineVascular__OCT1_Km = 12300; _03_3__IntestineEnterocytes____IntestineVascular__OCT1_V = 495;
  _13_4__KidneyPlasma____KidneyTissue: mKidneyPlasma => mKidneyTissue; Henri_Michaelis_Menten__irreversible(mKidneyPlasma/KidneyPlasma, _13_4__KidneyPlasma____KidneyTissue_Km, _13_4__KidneyPlasma____KidneyTissue_V); _13_4__KidneyPlasma____KidneyTissue is "13.4. KidneyPlasma -> KidneyTissue";
    _13_4__KidneyPlasma____KidneyTissue_Km = 1380; _13_4__KidneyPlasma____KidneyTissue_V = 87339.5;
  _13_5__KidneyTissue____KidneyTubular: mKidneyTissue => mKidneyTubular; Henri_Michaelis_Menten__irreversible(mKidneyTissue/KidneyTissue, _13_5__KidneyTissue____KidneyTubular_Km, _13_5__KidneyTissue____KidneyTubular_V); _13_5__KidneyTissue____KidneyTubular is "13.5. KidneyTissue -> KidneyTubular";
    _13_5__KidneyTissue____KidneyTubular_Km = 230; _13_5__KidneyTissue____KidneyTubular_V = 3000;
  _01__StomachLumen_____IntestineLumen: mStomachLumen => mIntestineLumen; _01__StomachLumen_____IntestineLumen_k1*(mStomachLumen/StomachLumen); _01__StomachLumen_____IntestineLumen is "01. StomachLumen -> IntestineLumen";
    _01__StomachLumen_____IntestineLumen_k1 = 3.16214;
  _07_2__Lung____PlasmaArterial: mLung => mPlasmaArterial; Flow_from_organ(Cardiac_Output, mLung/Lung, Ktp_Lung); _07_2__Lung____PlasmaArterial is "07.2. Lung -> PlasmaArterial";
  _07_1__PlasmaVenous____Lung: mPlasmaVenous => mLung; Flow(Cardiac_Output, mPlasmaVenous/PlasmaVenous); _07_1__PlasmaVenous____Lung is "07.1. PlasmaVenous -> Lung";
  _08_2__Brain____PlasmaVenous: mBrain => mPlasmaVenous; Flow_from_organ(QBrain, mBrain/Brain, Ktp_Brain); _08_2__Brain____PlasmaVenous is "08.2. Brain -> PlasmaVenous";
  _08_1__PlasmaArterial____Brain: mPlasmaArterial => mBrain; Flow(QBrain, mPlasmaArterial/PlasmaArterial); _08_1__PlasmaArterial____Brain is "08.1. PlasmaArterial -> Brain";
  _11_2__Heart____PlasmaVenous: mHeart => mPlasmaVenous; Flow_from_organ(QHeart, mHeart/Heart, Ktp_Heart); _11_2__Heart____PlasmaVenous is "11.2. Heart -> PlasmaVenous";
  _11_1__PlasmaArterial____Heart: mPlasmaArterial => mHeart; Flow(QHeart, mPlasmaArterial/PlasmaArterial); _11_1__PlasmaArterial____Heart is "11.1. PlasmaArterial -> Heart";
  _10_2__Adipose____PlasmaVenous: mAdipose => mPlasmaVenous; Flow_from_organ(QAdipose, mAdipose/Adipose, Ktp_Adipose); _10_2__Adipose____PlasmaVenous is "10.2. Adipose -> PlasmaVenous";
  _10_1__PlasmaArterial____Adipose: mPlasmaArterial => mAdipose; Flow(QAdipose, mPlasmaArterial/PlasmaArterial); _10_1__PlasmaArterial____Adipose is "10.1. PlasmaArterial -> Adipose";
  _13_6__KidneyTubular____UrineExternal: mKidneyTubular => mUrine; _13_6__KidneyTubular____UrineExternal_k1*(mKidneyTubular/KidneyTubular); _13_6__KidneyTubular____UrineExternal is "13.6. KidneyTubular -> UrineExternal";
    _13_6__KidneyTubular____UrineExternal_k1 = 1.6;
  _03_6__IntestineLumen____IntestineEnterocytes__Diffusion: mIntestineLumen -> mIntestineEnterocytes; _03_6__IntestineLumen____IntestineEnterocytes__Diffusion_k1*(mIntestineLumen/IntestineLumen) - _03_6__IntestineLumen____IntestineEnterocytes__Diffusion_k2*(mIntestineEnterocytes/IntestineEnterocytes); _03_6__IntestineLumen____IntestineEnterocytes__Diffusion is "03.6. IntestineLumen -> IntestineEnterocytes (Diffusion)";
    _03_6__IntestineLumen____IntestineEnterocytes__Diffusion_k1 = 0.14; _03_6__IntestineLumen____IntestineEnterocytes__Diffusion_k2 = 0.14;
  _03_7__IntestineLumen____IntestineVascular__Diffusion: mIntestineLumen -> mIntestineVascular; _03_7__IntestineLumen____IntestineVascular__Diffusion_k1*(mIntestineLumen/IntestineLumen) - _03_7__IntestineLumen____IntestineVascular__Diffusion_k2*(mIntestineVascular/IntestineVascular); _03_7__IntestineLumen____IntestineVascular__Diffusion is "03.7. IntestineLumen -> IntestineVascular (Diffusion)";
    _03_7__IntestineLumen____IntestineVascular__Diffusion_k1 = 0.26; _03_7__IntestineLumen____IntestineVascular__Diffusion_k2 = 0.26;

  // Events:
  Oral_at_0_001: at (time > 0.001): mStomachLumen = (1000000*ModelValue_0/(129.16*Initial_for_StomachLumen) + mStomachLumen/StomachLumen)*StomachLumen; Oral_at_0_001 is "Oral at 0.001";

  // Unit definitions:
  unit volume = 1e-3 litre;
  unit time = 3600 second;
  unit substance = 1e-9 mole;
  unit unit_0 = 1e-3 gram; unit_0 is "mg";
  unit unit_1 = 1e-3 litre; unit_1 is "ml";
  unit unit_2 = 1e-3 litre / (360000 second); unit_2 is "ml/h";
end
