// SBML level 2 version 4
// dcterms:bibliographicCitation: urn:miriam:doi:10.1016/j.jtbi.2004.11.011

function Constant_flux__irreversible(v)
  v;
end
Constant_flux__irreversible is "Constant flux (irreversible)";

function lysis(k3, iapc3, n, H, c3)
  k3*iapc3^n/(H^n + iapc3^n)*c3;
end

function function_1(k, modifier)
  k*modifier;
end

model Stucki2005___caspase_3_metabolism()
  // Stucki2005 - caspase-3 metabolism
  // biomodels.db:MODEL2205200001 biomodels.db:BIOMD0000001059
  // occursIn GO:0005737
  // hasTaxon taxonomy:10088
  // isDescribedBy doi:10.1016/j.jtbi.2004.11.011
  // hasProperty ncit:C17557 mamo:MAMO_0000046
  // isDescribedBy doi:10.1016/j.jtbi.2004.11.011

  // Compartments:
  compartment Cytoplasm = 1;  // GO:0005737

  // Species:
  species pc3 in Cytoplasm = 0.1;  // isVersionOf uniprot:P70677
  species c3 in Cytoplasm = 0.710362;  // isVersionOf uniprot:P70677
  species iap in Cytoplasm = 0.3;  // isVersionOf CHEBI:68494
  species survivin in Cytoplasm = 0;  // isVersionOf uniprot:O70201
  species cascade in Cytoplasm = 0;  // isVersionOf ncit:C18153
  species iapc3 in Cytoplasm = 0.44919;  // hasPart CHEBI:68494; hasPart uniprot:P70677; GO:0032991
  species iapsmac in Cytoplasm = 0.00483757;  // hasPart CHEBI:68494; hasPart uniprot:Q9JIQ3; GO:0032991
  species sursmac in Cytoplasm = 0;  // hasPart uniprot:Q9JIQ3; hasPart uniprot:O70201; GO:0032991
  species smacmit in Cytoplasm = 10;  // isVersionOf uniprot:Q9JIQ3
  species smac in Cytoplasm = 0.0076907;  // isVersionOf uniprot:Q9JIQ3

  // Parameters:
  k1 = 0.01;
  k2 = 0.1;
  k3 = 0.001;
  k4 = 0;
  k5 = 1;
  km5 = 1;
  k6 = 1;
  km6 = 1;
  k7 = 0;
  k8 = 1;
  km8 = 1;
  k9 = 0;
  k10 = 0.001;
  k11 = 0.002;
  k12 = 0.001;
  k13 = 0.002;
  k14 = 0.01;
  k15 = 0.002;
  k16 = 0.001;
  k17 = 0;
  n = 4;
  H = 2;
  k10_cascade = 0;

  // Reactions:
  Production_of_procaspase_3: => pc3; Cytoplasm*Constant_flux__irreversible(k1); Production_of_procaspase_3 is "Production of procaspase-3";
  cleavage_of_procaspase_3_into_caspase_3: pc3 => c3; Cytoplasm*k2*pc3; cleavage_of_procaspase_3_into_caspase_3 is "cleavage of procaspase-3 into caspase-3";
  caspase_3_proteolysis: c3 => ; Cytoplasm*lysis(k3, iapc3, n, H, c3); caspase_3_proteolysis is "caspase-3 proteolysis";  // modifiers: iapc3; isVersionOf ncit:C18105
  IAP_caspas_3_complex_formation: c3 + iap => iapc3; Cytoplasm*k5*c3*iap; IAP_caspas_3_complex_formation is "IAP caspas-3 complex formation";  // isVersionOf ncit:C25513
  Separation_of_caspase_3_and_iap: iapc3 => c3 + iap; Cytoplasm*km5*iapc3; Separation_of_caspase_3_and_iap is "Separation of caspase-3 and iap";
  Degradation_of_caspas_3: c3 => ; Cytoplasm*k10*c3; Degradation_of_caspas_3 is "Degradation of caspas-3";
  Formation_of_iap_smac_complex: iap + smac => iapsmac; Cytoplasm*k6*iap*smac; Formation_of_iap_smac_complex is "Formation of iap-smac complex";  // isVersionOf ncit:C25513
  Separation_of_iap_and_smac: iapsmac => iap + smac; Cytoplasm*km6*iapsmac;
  Production_of_iap: => iap; Cytoplasm*Constant_flux__irreversible(k11);
  Degradation_of_iap: iap => ; Cytoplasm*k13*iap;
  release_of_smac_in_cytoplasm: smacmit => smac; Cytoplasm*k7*smacmit;  // isVersionOf ncit:C42882
  Formation_of_smac_survivin_complex: smac + survivin => sursmac; Cytoplasm*k8*smac*survivin; Formation_of_smac_survivin_complex is "Formation of smac-survivin complex";  // isVersionOf ncit:C25513
  cleavage_of_smac_survivin_complex: sursmac => survivin + smac; Cytoplasm*km8*sursmac;
  Productio_of_survivin: => survivin; Cytoplasm*Constant_flux__irreversible(k9);
  Degradation_of_survivin: survivin => ; Cytoplasm*k16*survivin;
  Degradation_of_iap_caspase_3_complex: iapc3 => ; Cytoplasm*k12*iapc3; Degradation_of_iap_caspase_3_complex is "Degradation of iap-caspase-3 complex";
  Degradation_of_iapsmac: iapsmac => ; Cytoplasm*k14*iapsmac;
  Degradation_of_sursmac: sursmac => ; Cytoplasm*k15*sursmac;
  activation_of_cascade_controled_by_caspase_3: => cascade; Cytoplasm*function_1(k4, c3); activation_of_cascade_controled_by_caspase_3 is "activation of cascade controled by caspase-3";  // modifiers: c3
  Auto_amplification_of_cascade: => cascade; Cytoplasm*function_1(k17, cascade); Auto_amplification_of_cascade is "Auto-amplification of cascade";
  Degradation_of_cascade: cascade => ; Cytoplasm*k10_cascade*cascade;

  // Events:
  Release_of_SMAC: at (time == 2000): k7 = 0.025;
  cascade__1: at ((cascade <= 20) && (c3 >= 4.5)): k4 = 0.001, k10_cascade = 0.001, k17 = 0.01; cascade__1 is "cascade (1)";
  cascade__2: at (cascade > 20): k10_cascade = 0, k17 = 0, k4 = 0; cascade__2 is "cascade (2)";

  // Unit definitions:
  unit length = metre;
  unit area = metre^2;
  unit volume = litre;
  unit time = second;
  unit substance = mole;
end
