// SBML level 2 version 4

model MODEL1409240001()
  // Puri2010 - Mathematical Modeling for the Pathogenesis of Alzheimer's Disease
  // Puri2010 - Mathematical Modeling for the Pathogenesis of Alzheimer's Disease
  // Encoded non-curated model. Issues:
  // - Confusing replacement of α16 when t = 3 years
  // - Confusing 4th rate equation
  // This model is described in the article:
  // Mathematical modeling for the pathogenesis of Alzheimer's disease.
  // Puri IK, Li L.
  // PLoS ONE 2010; 5(12): e15176
  // Abstract:
  // Despite extensive research, the pathogenesis of neurodegenerative Alzheimer's disease (AD) still eludes our comprehension. This is largely due to complex and dynamic cross-talks that occur among multiple cell types throughout the aging process. We present a mathematical model that helps define critical components of AD pathogenesis based on differential rate equations that represent the known cross-talks involving microglia, astroglia, neurons, and amyloid-? (A?). We demonstrate that the inflammatory activation of microglia serves as a key node for progressive neurodegeneration. Our analysis reveals that targeting microglia may hold potential promise in the prevention and treatment of AD.
  // This model is hosted on BioModels Database and identified by: MODEL1409240001.
  // To cite BioModels Database, please use: BioModels Database: An enhanced, curated and annotated resource for published quantitative kinetic models.
  // To the extent possible under law, all copyright and related or neighbouring rights to this encoded model have been dedicated to the public domain worldwide. Please refer to CC0 Public Domain Dedication for more information.
  // isDescribedBy pubmed:21179474
  // biomodels.db:MODEL1409240001
  // isVersionOf GO:0050729 GO:0014008
  // hasProperty DOID:10652
  // hasTaxon taxonomy:9606

  // Compartments:
  compartment Brain = 1;

  // Species:
  // Surviving neurons
  species $Ns in Brain = 10000;  // isVersionOf CL:0000540
  // Dead neurons
  species $Nd in Brain = 100;  // isVersionOf CL:0000540
  // Quiescent astroglia
  species $Aq in Brain = 100000;  // isVersionOf CL:0000127
  // Ploriferating astroglia
  species $Ap in Brain = 1000;  // isVersionOf CL:0000127
  // Normal microglia
  species $M2 in Brain = 100000;  // isVersionOf CL:0000129
  // Reactive microglia
  species $M1 in Brain = 1000;  // isVersionOf CL:0000129
  // Amyloid beta
  species $Abeta in Brain = 1000;  // isVersionOf uniprot:P05067

  // Parameters:
  a1 = 1e-5;
  a2 = 0.001;
  a3 = 0.01;
  a4 = 0.0001;
  a5 = 0.01;
  a6 = 0.01;
  a7 = 0.0001;
  a8 = 0.01;
  a9 = 0.01;
  a10 = 0.01;
  a11 = 0.01;
  a12 = 0.0001;
  a13 = 0.01;
  a14 = 0.0001;
  a15 = 1;
  a16 = 0.01;
  ar = 1;

  // Rate rules:
  Ns' = a1*Aq - a2*Ap - a3*M1;
  Nd' = -Ns;
  Aq' = a4*M2 - a5*M1;
  Ap' = -Ap;
  M2' = (a6 + a11)*Ns - a10*Nd + (a7 + a12)*Aq - a9*M1 + a14*M2 - (a8 + a13)*Abeta;
  M1' = -M2;
  Abeta' = a15*Ns - a16*M2;

  // Events:
  _3_years: at (time >= 3): a16 = ar;

  // Unit definitions:
  unit volume = 1e-3 litre;
  unit time = 86400 second;
  unit substance = dimensionless;
end
