// SBML level 2 version 4

function Constant_flux__irreversible(v)
  v;
end
Constant_flux__irreversible is "Constant flux (irreversible)";

function Henri_Michaelis_Menten__irreversible(substrate, Km, V)
  V*substrate/(Km + substrate);
end
Henri_Michaelis_Menten__irreversible is "Henri-Michaelis-Menten (irreversible)";

function Ping_Pong_Bi_Bi(substratea, substrateb, productp, productq, Keq, Vf, Vr, Kma, Kmb, Kmp, Kmq, Kia, Kiq)
  Vf*(substratea*substrateb - productp*productq/Keq)/(substratea*substrateb + Kmb*substratea + Kma*substrateb*(1 + productq/Kiq) + Vf/(Vr*Keq)*(Kmq*productp*(1 + substratea/Kia) + productq*(Kmp + productp)));
end

function Reversible_Michaelis_Menten(substrate, product, Kms, Kmp, Vf, Vr)
  (Vf*substrate/Kms - Vr*product/Kmp)/(1 + substrate/Kms + product/Kmp);
end
Reversible_Michaelis_Menten is "Reversible Michaelis-Menten";

// enzymatic rate law for irreversible non-modulated non-interacting bireactant enzymes
function Bi__irreversible(vmax, A, B, Kma, Kmb)
  vmax*A*B/(Kma*Kmb + A*Kmb + B*Kma + A*B);
end
Bi__irreversible is "Bi (irreversible)";

function Rate_Law_for_jejunocyte_absorption_of_FC(Kabs, LFC, LCBA, LUBA, NPC1L1)
  Kabs*LFC*LCBA*LUBA*NPC1L1;
end

function Rate_Law_for_Chylomicron_FC_uptake_by_liver__LRP(Kch4, HCH, LRP)
  Kch4*HCH*LRP;
end
Rate_Law_for_Chylomicron_FC_uptake_by_liver__LRP is "Rate Law for Chylomicron FC uptake by liver (LRP)";

function Rate_Law_for_Chylomicron_CE_uptake_by_liver__LRP(Kch2, HCH, LRP)
  Kch2*HCH*LRP;
end
Rate_Law_for_Chylomicron_CE_uptake_by_liver__LRP is "Rate Law for Chylomicron CE uptake by liver (LRP)";

function Rate_Law_for_Chylomicron_FC_uptake_by_liver__HLDLR(Kch3, HCH, HLDLR)
  Kch3*HCH*HLDLR;
end
Rate_Law_for_Chylomicron_FC_uptake_by_liver__HLDLR is "Rate Law for Chylomicron FC uptake by liver (HLDLR)";

function Rate_Law_for_Chylomicron_CE_uptake_by_liver__HLDLR(Kch1, HCH, HLDLR)
  Kch1*HCH*HLDLR;
end
Rate_Law_for_Chylomicron_CE_uptake_by_liver__HLDLR is "Rate Law for Chylomicron CE uptake by liver (HLDLR)";

function Rate_Law_for_Biliary_Cholesterol_release(BCRmax, BCRt, HFC, BS)
  BCRmax/(1 + (BCRt/HFC)^BS);
end

function Rate_Law_for_Excreted_Cholesterol(Kefc, LFC, LCBA, LUBA)
  Kefc*LFC*LCBA*LUBA;
end

function Rate_Law_for_IDLC_formation(Kidlf, VLDLC, LPL)
  Kidlf*VLDLC*LPL;
end

function Rate_Law_for_IDLC_reuptake(Kidlu, IDLC, HLDLR)
  Kidlu*IDLC*HLDLR;
end

function Rate_Law_for_LDLC_formation(Kldl, IDLC, HSL)
  Kldl*IDLC*HSL;
end

function Rate_Law_for_Receptor_dependent_hepatic_LDLC_uptake(Khldlu, HLDLR, LDLC)
  Khldlu*HLDLR*LDLC;
end

function Rate_Law_for_Receptor_dependent_peripheral_LDLC_uptake(Kpldlu, LDLC, PLDLR)
  Kpldlu*LDLC*PLDLR;
end

function Rate_Law_for_ABCA1_release_of_PFC(Ka1e, PFC, ndHDL, ABCA1)
  Ka1e*PFC*ndHDL*ABCA1;
end

function Rate_Law_for_HDL3_formation(Khdl3, LCAT, ndHDLC, PFC)
  Khdl3*PFC*LCAT*ndHDLC;
end

function Rate_Law_for_CETP_mediated_transfer_to_VLDL(Kcetp2, CETP, HDL2)
  Kcetp2*HDL2*CETP;
end

function Rate_Law_for_CETP_mediated_transfer_to_LDL(Kcetp1, HDL2, CETP)
  Kcetp1*HDL2*CETP;
end

function Rate_Law_for_Reverse_cholesterol_transport(Krct, HDL2, HSRB1)
  Krct*HDL2*HSRB1;
end

function Rate_Law_for_ASBT_synthesis(Kasbts, ASBTS, IUBA, ICBA)
  Kasbts*ASBTS/(ICBA + IUBA);
end

function Rate_Law_for_OSTalphabeta_synthesis(Kosts, OSTS, ICBA, IUBA)
  Kosts*OSTS/(ICBA + IUBA);
end

function Rate_Law_for_LRP_synthesis(Klrps, LRPS, HFC)
  Klrps*LRPS/HFC;
end

function Rate_Law_for_HLDLR_synthesis(Khldlrs, HLDLRS, HFC)
  Khldlrs*HLDLRS/HFC;
end

function Rate_Law_for_HSRB1_synthesis(Khsrb1s, HSRB1S, HCE)
  Khsrb1s*HSRB1S/HCE;
end

function Rate_Law_for_ABCG5G8_synthesis(Kg5g8s, ABCG5G8S, HFC)
  Kg5g8s*ABCG5G8S/HFC;
end

function Rate_Law_for_BSEP_synthesis(Kbseps, BSEPS, HCBA)
  Kbseps*BSEPS/HCBA;
end

function Rate_Law_for_PSRB1_synthesis(Kpsrb1s, PSRB1S, PFC)
  Kpsrb1s*PSRB1S/PFC;
end

function Rate_Law_for_PLDLR_synthesis(Kpldlrs, PLDLRS, PFC)
  Kpldlrs*PLDLRS/PFC;
end

function Rate_Law_for_ABCA1_synthesis(Ka1s, ABCA1S, PFC)
  Ka1s*ABCA1S/PFC;
end

function Rate_Law_for_NTCP_synthesis(Kntcps, NTCPS, HUBA, HCBA)
  Kntcps*NTCPS/(HUBA + HCBA);
end

function Rate_Law_for_NPC1L1_synthesis(Knpc1l1s, NPC1L1S, JFC)
  Knpc1l1s*NPC1L1S/JFC;
end

function Rate_Law_for_SRB1_release_of_PFC(PFC, ndHDL, Kpsrb1, PSRB1)
  Kpsrb1*PFC*ndHDL*PSRB1;
end

function Rate_Law_for_VLDLC_reuptake(Kvldl, VLDLC, HLDLR)
  Kvldl*VLDLC*HLDLR;
end

model MODEL1508170000()
  // Morgan2016 - Dynamics of cholesterol metabolism and ageing
  // This model is described in the article:
  // Mathematically modelling the dynamics of cholesterol metabolism and ageing.
  // Morgan AE, Mooney KM, Wilkinson SJ, Pickles NA, Mc Auley MT.
  // BioSystems 2016 Jul; 145: 19-32
  // Abstract:
  // Cardiovascular disease (CVD) is the leading cause of morbidity and mortality in the UK. This condition becomes increasingly prevalent during ageing; 34.1% and 29.8% of males and females respectively, over 75 years of age have an underlying cardiovascular problem. The dysregulation of cholesterol metabolism is inextricably correlated with cardiovascular health and for this reason low density lipoprotein cholesterol (LDL-C) and high density lipoprotein cholesterol (HDL-C) are routinely used as biomarkers of CVD risk. The aim of this work was to use mathematical modelling to explore how cholesterol metabolism is affected by the ageing process. To do this we updated a previously published whole-body mathematical model of cholesterol metabolism to include an additional 96 mechanisms that are fundamental to this biological system. Additional mechanisms were added to cholesterol absorption, cholesterol synthesis, reverse cholesterol transport (RCT), bile acid synthesis, and their enterohepatic circulation. The sensitivity of the model was explored by the use of both local and global parameter scans. In addition, acute cholesterol feeding was used to explore the effectiveness of the regulatory mechanisms which are responsible for maintaining whole-body cholesterol balance. It was found that our model behaves as a hypo-responder to cholesterol feeding, while both the hepatic and intestinal pools of cholesterol increased significantly. The model was also used to explore the effects of ageing in tandem with three different cholesterol ester transfer protein (CETP) genotypes. Ageing in the presence of an atheroprotective CETP genotype, conferring low CETP activity, resulted in a 0.6% increase in LDL-C. In comparison, ageing with a genotype reflective of high CETP activity, resulted in a 1.6% increase in LDL-C. Thus, the model has illustrated the importance of CETP genotypes such as I405V, and their potential role in healthy ageing.
  // This model is hosted on BioModels Database and identified by: MODEL1508170000.
  // To cite BioModels Database, please use: BioModels Database: An enhanced, curated and annotated resource for published quantitative kinetic models.
  // To the extent possible under law, all copyright and related or neighbouring rights to this encoded model have been dedicated to the public domain worldwide. Please refer to CC0 Public Domain Dedication for more information.
  // biomodels.db:MODEL1508170000

  // Compartments:
  compartment Intestinal_Lumen = 1;
  compartment Jejunocytes = 1;
  compartment Ileocytes = 1;
  compartment Hepatic_Tissue = 1;
  compartment Dietary_Intake = 1;
  compartment Blood = 1;
  compartment Peripheral_Tissue = 1;
  compartment Excreted = 1;

  // Species:
  species LFC in Intestinal_Lumen = 0;
  species LCE in Intestinal_Lumen = 0;
  species $counter3 in Intestinal_Lumen = 1;
  species counter4 in Intestinal_Lumen = 0;
  species LCBA in Intestinal_Lumen = 200;
  species LUBA in Intestinal_Lumen = 50;
  species NPC1L1D in Jejunocytes = 0;
  species JIPP in Jejunocytes = 210;
  species JACoA in Jejunocytes = 210;
  species JCoASH in Jejunocytes = 210;
  species JDES in Jejunocytes = 210;
  species JACoAS in Jejunocytes = 210;
  species JMV in Jejunocytes = 210;
  species JAACoA in Jejunocytes = 210;
  species JMV5PP in Jejunocytes = 210;
  species JDMAPP in Jejunocytes = 210;
  species JHMGCoA in Jejunocytes = 210;
  species JSQ in Jejunocytes = 210;
  species JGPP in Jejunocytes = 210;
  species JSQE in Jejunocytes = 210;
  species J7DHDES in Jejunocytes = 210;
  species JFPP in Jejunocytes = 210;
  species J7DHC in Jejunocytes = 210;
  species JLAN in Jejunocytes = 210;
  species JCE in Jejunocytes = 1575;
  species JFC in Jejunocytes = 1575;
  species NPC1L1S in Jejunocytes = 1;
  species NPC1L1 in Jejunocytes = 100;
  species IAPOAIS in Ileocytes = 1657;
  species IUBA in Ileocytes = 50;
  species ICBA in Ileocytes = 50;
  species OST in Ileocytes = 100;
  species ASBTS in Ileocytes = 1;
  species OSTD in Ileocytes = 0;
  species OSTS in Ileocytes = 1;
  species ASBTD in Ileocytes = 0;
  species ASBT in Ileocytes = 100;
  species JMV5P in Ileocytes = 210;
  species JCH in Ileocytes = 948;
  species HCH in Hepatic_Tissue = 200;
  species LRP in Hepatic_Tissue = 100;
  species HLDLR in Hepatic_Tissue = 1000;
  species HFC in Hepatic_Tissue = 38917;
  species HCE in Hepatic_Tissue = 18012;
  species HAPOAIS in Hepatic_Tissue = 1657;
  species HUBA in Hepatic_Tissue = 180;
  species NTCP in Hepatic_Tissue = 100;
  species LRPD in Hepatic_Tissue = 0;
  species LRPS in Hepatic_Tissue = 1;
  species HLDLRD in Hepatic_Tissue = 0;
  species HLDLRS in Hepatic_Tissue = 1;
  species HSRB1 in Hepatic_Tissue = 100;
  species HSRB1D in Hepatic_Tissue = 0;
  species HSRB1S in Hepatic_Tissue = 1;
  species ABCG5G8D in Hepatic_Tissue = 0;
  species ABCG5G8S in Hepatic_Tissue = 1;
  species ABCG5G8 in Hepatic_Tissue = 100;
  species NTCPS in Hepatic_Tissue = 1;
  species NTCPD in Hepatic_Tissue = 0;
  species BSEPD in Hepatic_Tissue = 0;
  species BSEPS in Hepatic_Tissue = 1;
  species BSEP in Hepatic_Tissue = 100;
  species HACoAS in Hepatic_Tissue = 303;
  species HACoA in Hepatic_Tissue = 303;
  species HAACoA in Hepatic_Tissue = 303;
  species HHMGCoA in Hepatic_Tissue = 303;
  species HMV in Hepatic_Tissue = 303;
  species HMV5PP in Hepatic_Tissue = 303;
  species HMV5P in Hepatic_Tissue = 303;
  species HIPP in Hepatic_Tissue = 303;
  species HDMAPP in Hepatic_Tissue = 303;
  species HFPP in Hepatic_Tissue = 303;
  species HGPP in Hepatic_Tissue = 303;
  species HSQ in Hepatic_Tissue = 303;
  species H7DHDES in Hepatic_Tissue = 303;
  species H7DHC in Hepatic_Tissue = 303;
  species HDES in Hepatic_Tissue = 303;
  species HLAN in Hepatic_Tissue = 303;
  species HSQE in Hepatic_Tissue = 303;
  species HCBA in Hepatic_Tissue = 220;
  species HCoASH in Hepatic_Tissue = 1;
  species C3 in Hepatic_Tissue = 200;
  species C1 in Hepatic_Tissue = 200;
  species C5 in Hepatic_Tissue = 200;
  species C2 in Hepatic_Tissue = 200;
  species C6 in Hepatic_Tissue = 200;
  species C4 in Hepatic_Tissue = 200;
  species C9 in Hepatic_Tissue = 200;
  species C7 in Hepatic_Tissue = 200;
  species C10 in Hepatic_Tissue = 200;
  species C8 in Hepatic_Tissue = 200;
  species HUBACoA in Hepatic_Tissue = 200;
  species DFC in Dietary_Intake = 0;
  species $counter1 in Dietary_Intake = 1;
  species counter2 in Dietary_Intake = 0;
  species DCE in Dietary_Intake = 0;
  species VLDLC in Blood = 948;
  species LPL in Blood = 100;
  species IDLC in Blood = 949;
  species LDLC in Blood = 3209;
  species HSL in Blood = 100;
  species $APOAI in Blood = 8286;
  species $PL in Blood = 1657;
  species LCAT in Blood = 100;
  species HDL2 in Blood = 409;
  species HDL3 in Blood = 409;
  species PLS in Blood = 10;
  species BCBA in Blood = 1;
  species BUBA in Blood = 1;
  species CETP in Blood = 100;
  species ndHDL in Blood = 1657;
  species ndHDLC in Blood = 1228;
  species PCE in Peripheral_Tissue = 4218;
  species PLDLR in Peripheral_Tissue = 100;
  species PFC in Peripheral_Tissue = 25914;
  species ABCA1 in Peripheral_Tissue = 100;
  species PSS in Peripheral_Tissue = 1;
  species ABCA1S in Peripheral_Tissue = 1;
  species PSRB1 in Peripheral_Tissue = 100;
  species PSRB1D in Peripheral_Tissue = 0;
  species PSRB1S in Peripheral_Tissue = 1;
  species PLDLRD in Peripheral_Tissue = 0;
  species PLDLRS in Peripheral_Tissue = 1;
  species ABCA1D in Peripheral_Tissue = 0;
  species P7DHC in Peripheral_Tissue = 21;
  species P7DHDES in Peripheral_Tissue = 21;
  species PDES in Peripheral_Tissue = 21;
  species PAACoA in Peripheral_Tissue = 21;
  species PCoASH in Peripheral_Tissue = 21;
  species PACoA in Peripheral_Tissue = 21;
  species PACoAS in Peripheral_Tissue = 21;
  species PFPP in Peripheral_Tissue = 21;
  species PGPP in Peripheral_Tissue = 21;
  species PHMGCoA in Peripheral_Tissue = 21;
  species PIPP in Peripheral_Tissue = 21;
  species PDMAPP in Peripheral_Tissue = 21;
  species PMV in Peripheral_Tissue = 21;
  species PMV5PP in Peripheral_Tissue = 21;
  species PMV5P in Peripheral_Tissue = 21;
  species PSQE in Peripheral_Tissue = 21;
  species PSQ in Peripheral_Tissue = 21;
  species PLAN in Peripheral_Tissue = 21;
  species EFC in Excreted = 0;
  species EUBA in Excreted = 0;

  // Reactions:
  Ingestion_of_DFC: DFC => LFC; Ingestion_of_DFC_k1*DFC;
    Ingestion_of_DFC_k1 = 1;
  Counter_for_DFC_ingestion: $counter1 => counter2; Dietary_Intake*Constant_flux__irreversible(Counter_for_DFC_ingestion_v);
    Counter_for_DFC_ingestion_v = 1;
  Ingestion_of_DCE: DCE => LCE; Ingestion_of_DCE_k1*DCE;
    Ingestion_of_DCE_k1 = 1;
  Counter_for_DCE_ingestion: $counter3 => counter4; Intestinal_Lumen*Constant_flux__irreversible(Counter_for_DCE_ingestion_v);
    Counter_for_DCE_ingestion_v = 1;
  CEH_conversion_of_dietary_esters: LCE => LFC; Intestinal_Lumen*Henri_Michaelis_Menten__irreversible(LCE, CEH_conversion_of_dietary_esters_Km, CEH_conversion_of_dietary_esters_V);
    CEH_conversion_of_dietary_esters_Km = 9.216936; CEH_conversion_of_dietary_esters_V = 0.2141964;
  Jejunocyte_absorption_of_FC: LFC => JFC; Rate_Law_for_jejunocyte_absorption_of_FC(Kabs, LFC, LCBA, LUBA, NPC1L1);  // modifiers: LCBA, LUBA, NPC1L1
    Kabs = 10;
  Esterification_of_Jejunocyte_FC: JFC => JCE; Jejunocytes*Henri_Michaelis_Menten__irreversible(JFC, Esterification_of_Jejunocyte_FC_Km, Esterification_of_Jejunocyte_FC_V);
    Esterification_of_Jejunocyte_FC_Km = 3.6827334; Esterification_of_Jejunocyte_FC_V = 0.00154664;
  CE_uptake_into_Chylomicron: JCE => JCH; CE_uptake_into_Chylomicron_k1*JCE;
    CE_uptake_into_Chylomicron_k1 = 4e-5;
  FC_uptake_into_chylomicron: JFC => JCH; FC_uptake_into_chylomicron_k1*JFC;
    FC_uptake_into_chylomicron_k1 = 0.0012;
  Chylomicron_FC_uptake_by_liver__LRP: HCH => HFC; Hepatic_Tissue*Rate_Law_for_Chylomicron_FC_uptake_by_liver__LRP(Kch4, HCH, LRP); Chylomicron_FC_uptake_by_liver__LRP is "Chylomicron FC uptake by liver (LRP)";  // modifiers: LRP
    Kch4 = 5;
  Chylomicron_transport_to_liver: JCH => HCH; Chylomicron_transport_to_liver_k1*JCH;
    Chylomicron_transport_to_liver_k1 = 0.001;
  Chylomicron_CE_uptake_by_liver__LRP: HCH => HCE; Hepatic_Tissue*Rate_Law_for_Chylomicron_CE_uptake_by_liver__LRP(Kch2, HCH, LRP); Chylomicron_CE_uptake_by_liver__LRP is "Chylomicron CE uptake by liver (LRP)";  // modifiers: LRP
    Kch2 = 0.0001;
  Chylomicron_FC_uptake_by_liver__HLDLR: HCH => HFC; Hepatic_Tissue*Rate_Law_for_Chylomicron_FC_uptake_by_liver__HLDLR(Kch3, HCH, HLDLR); Chylomicron_FC_uptake_by_liver__HLDLR is "Chylomicron FC uptake by liver (HLDLR)";  // modifiers: HLDLR
    Kch3 = 5;
  Chylomicron_CE_uptake_by_liver__HLDLR: HCH => HCE; Hepatic_Tissue*Rate_Law_for_Chylomicron_CE_uptake_by_liver__HLDLR(Kch1, HCH, HLDLR); Chylomicron_CE_uptake_by_liver__HLDLR is "Chylomicron CE uptake by liver (HLDLR)";  // modifiers: HLDLR
    Kch1 = 0.0001;
  Biliary_Cholesterol_release: HFC => LFC; Rate_Law_for_Biliary_Cholesterol_release(BCRmax, BCRt, HFC, BS);
    BCRmax = 1.7; BCRt = 1; BS = 1;
  Conversion_of_hepatic_FC_to_CE: HFC => HCE; Hepatic_Tissue*Henri_Michaelis_Menten__irreversible(HFC, Conversion_of_hepatic_FC_to_CE_Km, Conversion_of_hepatic_FC_to_CE_V);
    Conversion_of_hepatic_FC_to_CE_Km = 3.8627334; Conversion_of_hepatic_FC_to_CE_V = 0.0154664;
  Conversion_of_hepatic_CE_to_FC: HCE => HFC; Hepatic_Tissue*Henri_Michaelis_Menten__irreversible(HCE, Conversion_of_hepatic_CE_to_FC_Km, Conversion_of_hepatic_CE_to_FC_V);
    Conversion_of_hepatic_CE_to_FC_Km = 9.216936; Conversion_of_hepatic_CE_to_FC_V = 0.00214196;
  VLDLC_formation: HCE => VLDLC; VLDLC_formation_k1*HCE;
    VLDLC_formation_k1 = 0.4;
  Excreted_Cholesterol: LFC => EFC; Rate_Law_for_Excreted_Cholesterol(Kefc, LFC, LCBA, LUBA);  // modifiers: LCBA, LUBA
    Kefc = 0.9;
  VLDLC_reuptake: VLDLC => HCE; Rate_Law_for_VLDLC_reuptake(Kvldl, VLDLC, HLDLR);  // modifiers: HLDLR
    Kvldl = 0.0026;
  IDLC_formation: VLDLC => IDLC; Blood*Rate_Law_for_IDLC_formation(Kidlf, VLDLC, LPL);  // modifiers: LPL
    Kidlf = 0.04;
  IDLC_reuptake: IDLC => HCE; Rate_Law_for_IDLC_reuptake(Kidlu, IDLC, HLDLR);  // modifiers: HLDLR
    Kidlu = 0.0045;
  LDLC_formation: IDLC => LDLC; Blood*Rate_Law_for_LDLC_formation(Kldl, IDLC, HSL);  // modifiers: HSL
    Kldl = 1.01e-5;
  Receptor_dependent_hepatic_LDLC_uptake: LDLC => HCE; Rate_Law_for_Receptor_dependent_hepatic_LDLC_uptake(Khldlu, HLDLR, LDLC);  // modifiers: HLDLR
    Khldlu = 2.9e-7;
  Receptor_independent_hepatic_LDLC_uptake: LDLC => HCE; Receptor_independent_hepatic_LDLC_uptake_k1*LDLC;
    Receptor_independent_hepatic_LDLC_uptake_k1 = 5e-9;
  Receptor_dependent_peripheral_LDLC_uptake: LDLC => PCE; Rate_Law_for_Receptor_dependent_peripheral_LDLC_uptake(Kpldlu, LDLC, PLDLR);  // modifiers: PLDLR
    Kpldlu = 7e-8;
  Receptor_independent_peripheral_LDLC_uptake: LDLC => PCE; Receptor_independent_peripheral_LDLC_uptake_k1*LDLC;
    Receptor_independent_peripheral_LDLC_uptake_k1 = 5e-8;
  Peripheral_CE_conversion_to_FC: PCE => PFC; Peripheral_Tissue*Henri_Michaelis_Menten__irreversible(PCE, Peripheral_CE_conversion_to_FC_Km, Peripheral_CE_conversion_to_FC_V);
    Peripheral_CE_conversion_to_FC_Km = 9.216936; Peripheral_CE_conversion_to_FC_V = 0.0214196;
  Peripheral_FC_conversion_to_CE: PFC => PCE; Peripheral_Tissue*Henri_Michaelis_Menten__irreversible(PFC, Peripheral_FC_conversion_to_CE_Km, Peripheral_FC_conversion_to_CE_V);
    Peripheral_FC_conversion_to_CE_Km = 1.7863692; Peripheral_FC_conversion_to_CE_V = 0.00842919;
  Hepatic_APOAI_synthesis: HAPOAIS => $APOAI; Hepatic_APOAI_synthesis_k1*HAPOAIS;
    Hepatic_APOAI_synthesis_k1 = 1e14;
  Intestinal_APOAI_synthesis: IAPOAIS => $APOAI; Intestinal_APOAI_synthesis_k1*IAPOAIS;
    Intestinal_APOAI_synthesis_k1 = 1e10;
  ndHDL_formation: $APOAI + $PL => ndHDL; Blood*ndHDL_formation_k1*APOAI*PL;
    ndHDL_formation_k1 = 5e-15;
  ABCA1_release_of_PFC: PFC + ndHDL => ndHDLC; Rate_Law_for_ABCA1_release_of_PFC(Ka1e, PFC, ndHDL, ABCA1);  // modifiers: ABCA1
    Ka1e = 0.1;
  SRB1_release_of_PFC: PFC + ndHDL => ndHDLC; Rate_Law_for_SRB1_release_of_PFC(PFC, ndHDL, Kpsrb1, PSRB1);  // modifiers: PSRB1
    Kpsrb1 = 0.1;
  Receptor_independent_release_of_PFC: PFC + ndHDL => ndHDLC; Receptor_independent_release_of_PFC_k1*PFC*ndHDL;
    Receptor_independent_release_of_PFC_k1 = 1;
  HDL3_formation: ndHDL + PFC => HDL3; Rate_Law_for_HDL3_formation(Khdl3, LCAT, ndHDL, PFC);  // modifiers: LCAT
    Khdl3 = 0.0004;
  HDL3_to_HDL2: HDL3 => HDL2; Blood*Henri_Michaelis_Menten__irreversible(HDL3, HDL3_to_HDL2_Km, HDL3_to_HDL2_V);
    HDL3_to_HDL2_Km = 0.504; HDL3_to_HDL2_V = 0.504;
  HDL2_to_HDL3: HDL2 => HDL3; Blood*Henri_Michaelis_Menten__irreversible(HDL2, HDL2_to_HDL3_Km, HDL2_to_HDL3_V);
    HDL2_to_HDL3_Km = 0.5; HDL2_to_HDL3_V = 0.5;
  CETP_mediated_transfer_to_VLDL: HDL2 => VLDLC; Blood*Rate_Law_for_CETP_mediated_transfer_to_VLDL(Kcetp2, CETP, HDL2);  // modifiers: CETP
    Kcetp2 = 1e-7;
  CETP_mediated_transfer_to_LDL: HDL2 => LDLC; Blood*Rate_Law_for_CETP_mediated_transfer_to_LDL(Kcetp1, HDL2, CETP);  // modifiers: CETP
    Kcetp1 = 1e-7;
  Reverse_cholesterol_transport: HDL2 => HCE; Rate_Law_for_Reverse_cholesterol_transport(Krct, HDL2, HSRB1);  // modifiers: HSRB1
    Krct = 1e-12;
  Peripheral_steroid_production: PFC => PSS; Peripheral_Tissue*Peripheral_steroid_production_k1*PFC;
    Peripheral_steroid_production_k1 = 9e-7;
  Phospholipid_source: PLS => $PL; Blood*Phospholipid_source_k1*PLS;
    Phospholipid_source_k1 = 0.1;
  Bile_acid_release: HCBA => LCBA; Henri_Michaelis_Menten__irreversible(HCBA, Bile_acid_release_Km, Bile_acid_release_V);
    Bile_acid_release_Km = 1e-5; Bile_acid_release_V = 0.001;
  Deconjugation_of_CBA: LCBA => LUBA; Intestinal_Lumen*Henri_Michaelis_Menten__irreversible(LCBA, Deconjugation_of_CBA_Km, Deconjugation_of_CBA_V);
    Deconjugation_of_CBA_Km = 0.001; Deconjugation_of_CBA_V = 5e-6;
  Excretion_of_UBA: LUBA => EUBA; Excretion_of_UBA_k1*LUBA;
    Excretion_of_UBA_k1 = 2e-5;
  Receptor_dependent_UBA_uptake: LUBA => IUBA; Henri_Michaelis_Menten__irreversible(LUBA, Receptor_dependent_UBA_uptake_Km, Receptor_dependent_UBA_uptake_V);
    Receptor_dependent_UBA_uptake_Km = 1e-6; Receptor_dependent_UBA_uptake_V = 1e-15;
  Receptor_independent_UBA_uptake: LUBA => IUBA; Receptor_independent_UBA_uptake_k1*LUBA;
    Receptor_independent_UBA_uptake_k1 = 1e-20;
  CBA_uptake: LCBA => ICBA; Henri_Michaelis_Menten__irreversible(LCBA, CBA_uptake_Km, CBA_uptake_V);
    CBA_uptake_Km = 6.80724e-6; CBA_uptake_V = 2.63007e-15;
  Efflux_of_UBA_out_of_ileocyte: IUBA => BUBA; Henri_Michaelis_Menten__irreversible(IUBA, Efflux_of_UBA_out_of_ileocyte_Km, Efflux_of_UBA_out_of_ileocyte_V);
    Efflux_of_UBA_out_of_ileocyte_Km = 0.0001; Efflux_of_UBA_out_of_ileocyte_V = 0.0001;
  Efflux_of_CBA_out_of_ileocyte: ICBA => BCBA; Henri_Michaelis_Menten__irreversible(ICBA, Efflux_of_CBA_out_of_ileocyte_Km, Efflux_of_CBA_out_of_ileocyte_V);
    Efflux_of_CBA_out_of_ileocyte_Km = 0.0001; Efflux_of_CBA_out_of_ileocyte_V = 0.0001;
  Hepatic_uptake_of_UBA: BUBA => HUBA; Henri_Michaelis_Menten__irreversible(BUBA, Hepatic_uptake_of_UBA_Km, Hepatic_uptake_of_UBA_V);
    Hepatic_uptake_of_UBA_Km = 9.478824; Hepatic_uptake_of_UBA_V = 2.18994e-5;
  Hepatic_uptake_of_CBA: BCBA => HCBA; Henri_Michaelis_Menten__irreversible(BCBA, Hepatic_uptake_of_CBA_Km, Hepatic_uptake_of_CBA_V);
    Hepatic_uptake_of_CBA_Km = 0.010314; Hepatic_uptake_of_CBA_V = 0.000196997;
  NPC1L1_degradation: NPC1L1 => NPC1L1D; Jejunocytes*NPC1L1_degradation_k1*NPC1L1;
    NPC1L1_degradation_k1 = 1e-7;
  ASBT_degradation: ASBT => ASBTD; Ileocytes*ASBT_degradation_k1*ASBT;
    ASBT_degradation_k1 = 1e-7;
  OSTalphabeta_degradation: OST => OSTD; Ileocytes*OSTalphabeta_degradation_k1*OST;
    OSTalphabeta_degradation_k1 = 1e-7;
  LRP_synthesis: LRPS => LRP; Hepatic_Tissue*Rate_Law_for_LRP_synthesis(Klrps, LRPS, HFC);  // modifiers: HFC
    Klrps = 100;
  LRP_degradation: LRP => LRPD; Hepatic_Tissue*LRP_degradation_k1*LRP;
    LRP_degradation_k1 = 1e-7;
  HLDLR_synthesis: HLDLRS => HLDLR; Hepatic_Tissue*Rate_Law_for_HLDLR_synthesis(Khldlrs, HLDLRS, HFC);  // modifiers: HFC
    Khldlrs = 100;
  HLDLR_degradation: HLDLR => HLDLRD; Hepatic_Tissue*HLDLR_degradation_k1*HLDLR;
    HLDLR_degradation_k1 = 1e-7;
  HSRB1_synthesis: HSRB1S => HSRB1; Hepatic_Tissue*Rate_Law_for_HSRB1_synthesis(Khsrb1s, HSRB1S, HCE);  // modifiers: HCE
    Khsrb1s = 0.001;
  HSRB1_degradation: HSRB1 => HSRB1D; Hepatic_Tissue*HSRB1_degradation_k1*HSRB1;
    HSRB1_degradation_k1 = 1e-8;
  ABCG5G8_degradation: ABCG5G8 => ABCG5G8D; Hepatic_Tissue*ABCG5G8_degradation_k1*ABCG5G8;
    ABCG5G8_degradation_k1 = 1e-6;
  NTCP_degradation: NTCP => NTCPD; Hepatic_Tissue*NTCP_degradation_k1*NTCP;
    NTCP_degradation_k1 = 1e-7;
  BSEP_synthesis: BSEPS => BSEP; Hepatic_Tissue*Rate_Law_for_BSEP_synthesis(Kbseps, BSEPS, HCBA);  // modifiers: HCBA
    Kbseps = 1;
  BSEP_degradation: BSEP => BSEPD; Hepatic_Tissue*BSEP_degradation_k1*BSEP;
    BSEP_degradation_k1 = 1e-7;
  ABCA1_degradation: ABCA1 => ABCA1D; Peripheral_Tissue*ABCA1_degradation_k1*ABCA1;
    ABCA1_degradation_k1 = 1e-6;
  PSRB1_synthesis: PSRB1S => PSRB1; Peripheral_Tissue*Rate_Law_for_PSRB1_synthesis(Kpsrb1s, PSRB1S, PFC);  // modifiers: PFC
    Kpsrb1s = 100;
  PSRB1_degradation: PSRB1 => PSRB1D; Peripheral_Tissue*PSRB1_degradation_k1*PSRB1;
    PSRB1_degradation_k1 = 1e-7;
  PLDLR_synthesis: PLDLRS => PLDLR; Peripheral_Tissue*Rate_Law_for_PLDLR_synthesis(Kpldlrs, PLDLRS, PFC);  // modifiers: PFC
    Kpldlrs = 1;
  PLDLR_degradation: PLDLR => PLDLRD; Peripheral_Tissue*PLDLR_degradation_k1*PLDLR;
    PLDLR_degradation_k1 = 1e-6;
  OSTalphabeta_synthesis: OSTS => OST; Ileocytes*Rate_Law_for_OSTalphabeta_synthesis(Kosts, OSTS, ICBA, IUBA);  // modifiers: ICBA, IUBA
    Kosts = 1;
  ABCG5G8_synthesis: ABCG5G8S => ABCG5G8; Hepatic_Tissue*Rate_Law_for_ABCG5G8_synthesis(Kg5g8s, ABCG5G8S, HFC);  // modifiers: HFC
    Kg5g8s = 10;
  ABCA1_synthesis: ABCA1S => ABCA1; Peripheral_Tissue*Rate_Law_for_ABCA1_synthesis(Ka1s, ABCA1S, PFC);  // modifiers: PFC
    Ka1s = 1;
  NTCP_synthesis: NTCPS => NTCP; Hepatic_Tissue*Rate_Law_for_NTCP_synthesis(Kntcps, NTCPS, HUBA, HCBA);  // modifiers: HUBA, HCBA
    Kntcps = 1;
  ASBT_synthesis: ASBTS => ASBT; Ileocytes*Rate_Law_for_ASBT_synthesis(Kasbts, ASBTS, IUBA, ICBA);  // modifiers: IUBA, ICBA
    Kasbts = 1;
  NPC1L1_synthesis: NPC1L1S => NPC1L1; Jejunocytes*Rate_Law_for_NPC1L1_synthesis(Knpc1l1s, NPC1L1S, JFC);  // modifiers: JFC
    Knpc1l1s = 1;
  Hep_Acetyl_CoA_synthesis: HACoAS => HACoA; Hepatic_Tissue*Hep_Acetyl_CoA_synthesis_k1*HACoAS;
    Hep_Acetyl_CoA_synthesis_k1 = 1;
  Hep_Interconversion_of_Acetyl_CoA_and_Acetoacetyl_CoA: 2 HACoA -> HAACoA + HCoASH; Hepatic_Tissue*Ping_Pong_Bi_Bi(HACoA, HACoA, HAACoA, HCoASH, Hep_Interconversion_of_Acetyl_CoA_and_Acetoacetyl_CoA_Keq, Hep_Interconversion_of_Acetyl_CoA_and_Acetoacetyl_CoA_Vf, Hep_Interconversion_of_Acetyl_CoA_and_Acetoacetyl_CoA_Vr, Hep_Interconversion_of_Acetyl_CoA_and_Acetoacetyl_CoA_Kma, Hep_Interconversion_of_Acetyl_CoA_and_Acetoacetyl_CoA_Kmb, Hep_Interconversion_of_Acetyl_CoA_and_Acetoacetyl_CoA_Kmp, Hep_Interconversion_of_Acetyl_CoA_and_Acetoacetyl_CoA_Kmq, Hep_Interconversion_of_Acetyl_CoA_and_Acetoacetyl_CoA_Kia, Hep_Interconversion_of_Acetyl_CoA_and_Acetoacetyl_CoA_Kiq);
    Hep_Interconversion_of_Acetyl_CoA_and_Acetoacetyl_CoA_Keq = 0.1; Hep_Interconversion_of_Acetyl_CoA_and_Acetoacetyl_CoA_Vf = 0.469551; Hep_Interconversion_of_Acetyl_CoA_and_Acetoacetyl_CoA_Vr = 0.469551; Hep_Interconversion_of_Acetyl_CoA_and_Acetoacetyl_CoA_Kma = 22.668; Hep_Interconversion_of_Acetyl_CoA_and_Acetoacetyl_CoA_Kmb = 22.668; Hep_Interconversion_of_Acetyl_CoA_and_Acetoacetyl_CoA_Kmp = 4.25805; Hep_Interconversion_of_Acetyl_CoA_and_Acetoacetyl_CoA_Kmq = 4.91226; Hep_Interconversion_of_Acetyl_CoA_and_Acetoacetyl_CoA_Kia = 0.1; Hep_Interconversion_of_Acetyl_CoA_and_Acetoacetyl_CoA_Kiq = 0.1;
  Hep_HMG_CoA_formation: HACoA + HAACoA => HHMGCoA; Hepatic_Tissue*Bi__irreversible(Hep_HMG_CoA_formation_vmax, HACoA, HAACoA, Hep_HMG_CoA_formation_Kma, Hep_HMG_CoA_formation_Kmb);
    Hep_HMG_CoA_formation_vmax = 0.542412; Hep_HMG_CoA_formation_Kma = 59.0986; Hep_HMG_CoA_formation_Kmb = 4.25805;
  Hep_Mevalonate_formation: HHMGCoA => HMV; Hepatic_Tissue*Henri_Michaelis_Menten__irreversible(HHMGCoA, Hep_Mevalonate_formation_Km, Hep_Mevalonate_formation_V);
    Hep_Mevalonate_formation_Km = 22.0622; Hep_Mevalonate_formation_V = 0.000284894;
  Hep_Mevalonate5P_formation: HMV => HMV5P; Hepatic_Tissue*Henri_Michaelis_Menten__irreversible(HMV, Hep_Mevalonate5P_formation_Km, Hep_Mevalonate5P_formation_V);
    Hep_Mevalonate5P_formation_Km = 3.5316; Hep_Mevalonate5P_formation_V = 5.44455;
  Hep_IPP_formation: HMV5PP => HIPP; Hepatic_Tissue*Henri_Michaelis_Menten__irreversible(HMV5PP, Hep_IPP_formation_Km, Hep_IPP_formation_V);
    Hep_IPP_formation_Km = 0.00890467; Hep_IPP_formation_V = 1.87953;
  Hep_Mevalonate5PP_formation: HMV5P -> HMV5PP; Hepatic_Tissue*Reversible_Michaelis_Menten(HMV5P, HMV5PP, Hep_Mevalonate5PP_formation_Kms, Hep_Mevalonate5PP_formation_Kmp, Hep_Mevalonate5PP_formation_Vf, Hep_Mevalonate5PP_formation_Vr);
    Hep_Mevalonate5PP_formation_Kms = 7.75676; Hep_Mevalonate5PP_formation_Kmp = 12.6329; Hep_Mevalonate5PP_formation_Vf = 10.5857; Hep_Mevalonate5PP_formation_Vr = 3.48176;
  Hep_DMAPP_interconversion: HIPP -> HDMAPP; Hepatic_Tissue*Reversible_Michaelis_Menten(HIPP, HDMAPP, Hep_DMAPP_interconversion_Kms, Hep_DMAPP_interconversion_Kmp, Hep_DMAPP_interconversion_Vf, Hep_DMAPP_interconversion_Vr);
    Hep_DMAPP_interconversion_Kms = 68.1177; Hep_DMAPP_interconversion_Kmp = 68.1177; Hep_DMAPP_interconversion_Vf = 0.147654; Hep_DMAPP_interconversion_Vr = 0.147654;
  Hep_GeranylPP_formation: HDMAPP + HIPP => HGPP; Hepatic_Tissue*Bi__irreversible(Hep_GeranylPP_formation_vmax, HDMAPP, HIPP, Hep_GeranylPP_formation_Kma, Hep_GeranylPP_formation_Kmb);
    Hep_GeranylPP_formation_vmax = 4700.32; Hep_GeranylPP_formation_Kma = 7.80105; Hep_GeranylPP_formation_Kmb = 13.0674;
  Hep_FarnesylPP_formation: HGPP + HIPP => HFPP; Hepatic_Tissue*Bi__irreversible(Hep_FarnesylPP_formation_vmax, HGPP, HIPP, Hep_FarnesylPP_formation_Kma, Hep_FarnesylPP_formation_Kmb);
    Hep_FarnesylPP_formation_vmax = 0.339347; Hep_FarnesylPP_formation_Kma = 0.13511; Hep_FarnesylPP_formation_Kmb = 0.00470032;
  Hep_Squalene_formation: HFPP => HSQ; Hepatic_Tissue*Henri_Michaelis_Menten__irreversible(HFPP, Hep_Squalene_formation_Km, Hep_Squalene_formation_V);
    Hep_Squalene_formation_Km = 0.879359; Hep_Squalene_formation_V = 1.83518;
  Hep_squalene_epoxide_formation: HSQ => HSQE; Hepatic_Tissue*Henri_Michaelis_Menten__irreversible(HSQ, Hep_squalene_epoxide_formation_Km, Hep_squalene_epoxide_formation_V);
    Hep_squalene_epoxide_formation_Km = 5.46244; Hep_squalene_epoxide_formation_V = 4.8587e-6;
  Hep_Lansterol_formation: HSQE => HLAN; Hepatic_Tissue*Henri_Michaelis_Menten__irreversible(HSQE, Hep_Lansterol_formation_Km, Hep_Lansterol_formation_V);
    Hep_Lansterol_formation_Km = 32.004; Hep_Lansterol_formation_V = 0.140818;
  Hep_7_dehydrodesmosterol_formation: HLAN => H7DHDES; Hepatic_Tissue*Hep_7_dehydrodesmosterol_formation_k1*HLAN;
    Hep_7_dehydrodesmosterol_formation_k1 = 1000;
  Hep_7_DHC_formation: H7DHDES => H7DHC; Hepatic_Tissue*Henri_Michaelis_Menten__irreversible(H7DHDES, Hep_7_DHC_formation_Km, Hep_7_DHC_formation_V);
    Hep_7_DHC_formation_Km = 62.6963; Hep_7_DHC_formation_V = 0.000553882;
  Hep_desmosterol_formation: H7DHDES => HDES; Hepatic_Tissue*Henri_Michaelis_Menten__irreversible(H7DHDES, Hep_desmosterol_formation_Km, Hep_desmosterol_formation_V);
    Hep_desmosterol_formation_Km = 11.5389; Hep_desmosterol_formation_V = 0.000326936;
  Hep_FC_formation_from_7DHC: H7DHC => HFC; Hepatic_Tissue*Henri_Michaelis_Menten__irreversible(H7DHC, Hep_FC_formation_from_7DHC_Km, Hep_FC_formation_from_7DHC_V);
    Hep_FC_formation_from_7DHC_Km = 11.5389; Hep_FC_formation_from_7DHC_V = 0.000326936;
  Hep_FC_formation_from_desmosterol: HDES => HFC; Hepatic_Tissue*Henri_Michaelis_Menten__irreversible(HDES, Hep_FC_formation_from_desmosterol_Km, Hep_FC_formation_from_desmosterol_V);
    Hep_FC_formation_from_desmosterol_Km = 62.6963; Hep_FC_formation_from_desmosterol_V = 0.000553882;
  Per_Acetyl_CoA_synthesis: PACoAS => PACoA; Peripheral_Tissue*Per_Acetyl_CoA_synthesis_k1*PACoAS;
    Per_Acetyl_CoA_synthesis_k1 = 1e-5;
  Per_interconversion_of_Acetyl_CoA_and_Acetoacetyl_CoA: 2 PACoA -> PAACoA + PCoASH; Peripheral_Tissue*Ping_Pong_Bi_Bi(PACoA, PACoA, PAACoA, PCoASH, Per_interconversion_of_Acetyl_CoA_and_Acetoacetyl_CoA_Keq, Per_interconversion_of_Acetyl_CoA_and_Acetoacetyl_CoA_Vf, Per_interconversion_of_Acetyl_CoA_and_Acetoacetyl_CoA_Vr, Per_interconversion_of_Acetyl_CoA_and_Acetoacetyl_CoA_Kma, Per_interconversion_of_Acetyl_CoA_and_Acetoacetyl_CoA_Kmb, Per_interconversion_of_Acetyl_CoA_and_Acetoacetyl_CoA_Kmp, Per_interconversion_of_Acetyl_CoA_and_Acetoacetyl_CoA_Kmq, Per_interconversion_of_Acetyl_CoA_and_Acetoacetyl_CoA_Kia, Per_interconversion_of_Acetyl_CoA_and_Acetoacetyl_CoA_Kiq);
    Per_interconversion_of_Acetyl_CoA_and_Acetoacetyl_CoA_Keq = 0.1; Per_interconversion_of_Acetyl_CoA_and_Acetoacetyl_CoA_Vf = 0.469551; Per_interconversion_of_Acetyl_CoA_and_Acetoacetyl_CoA_Vr = 0.469551; Per_interconversion_of_Acetyl_CoA_and_Acetoacetyl_CoA_Kma = 22.668; Per_interconversion_of_Acetyl_CoA_and_Acetoacetyl_CoA_Kmb = 22.668; Per_interconversion_of_Acetyl_CoA_and_Acetoacetyl_CoA_Kmp = 4.25805; Per_interconversion_of_Acetyl_CoA_and_Acetoacetyl_CoA_Kmq = 4.91226; Per_interconversion_of_Acetyl_CoA_and_Acetoacetyl_CoA_Kia = 0.1; Per_interconversion_of_Acetyl_CoA_and_Acetoacetyl_CoA_Kiq = 0.1;
  Per_HMG_CoA_formation: PACoA + PAACoA => PHMGCoA; Peripheral_Tissue*Bi__irreversible(Per_HMG_CoA_formation_vmax, PACoA, PAACoA, Per_HMG_CoA_formation_Kma, Per_HMG_CoA_formation_Kmb);
    Per_HMG_CoA_formation_vmax = 0.542412; Per_HMG_CoA_formation_Kma = 59.0986; Per_HMG_CoA_formation_Kmb = 4.25805;
  Per_Mevalonate_formation: PHMGCoA => PMV; Peripheral_Tissue*Henri_Michaelis_Menten__irreversible(PHMGCoA, Per_Mevalonate_formation_Km, Per_Mevalonate_formation_V);
    Per_Mevalonate_formation_Km = 22.6217; Per_Mevalonate_formation_V = 0.000569788;
  Per_Mevalonate5P_formation: PMV => PMV5P; Peripheral_Tissue*Henri_Michaelis_Menten__irreversible(PMV, Per_Mevalonate5P_formation_Km, Per_Mevalonate5P_formation_V);
    Per_Mevalonate5P_formation_Km = 3.5316; Per_Mevalonate5P_formation_V = 5.44455;
  Per_Mevalonate_5PP_formation: PMV5P -> PMV5PP; Peripheral_Tissue*Reversible_Michaelis_Menten(PMV5P, PMV5PP, Per_Mevalonate_5PP_formation_Kms, Per_Mevalonate_5PP_formation_Kmp, Per_Mevalonate_5PP_formation_Vf, Per_Mevalonate_5PP_formation_Vr);
    Per_Mevalonate_5PP_formation_Kms = 7.75676; Per_Mevalonate_5PP_formation_Kmp = 12.6329; Per_Mevalonate_5PP_formation_Vf = 10.5857; Per_Mevalonate_5PP_formation_Vr = 3.48176;
  Per_IPP_formation: PMV5PP => PIPP; Peripheral_Tissue*Henri_Michaelis_Menten__irreversible(PMV5PP, Per_IPP_formation_Km, Per_IPP_formation_V);
    Per_IPP_formation_Km = 0.00890467; Per_IPP_formation_V = 1.87953;
  Per_DMAPP_interconversion: PIPP -> PDMAPP; Peripheral_Tissue*Reversible_Michaelis_Menten(PIPP, PDMAPP, Per_DMAPP_interconversion_Kms, Per_DMAPP_interconversion_Kmp, Per_DMAPP_interconversion_Vf, Per_DMAPP_interconversion_Vr);
    Per_DMAPP_interconversion_Kms = 68.1177; Per_DMAPP_interconversion_Kmp = 68.1177; Per_DMAPP_interconversion_Vf = 0.147654; Per_DMAPP_interconversion_Vr = 0.147654;
  Per_Geranyl_formation: PDMAPP + PIPP => PGPP; Peripheral_Tissue*Bi__irreversible(Per_Geranyl_formation_vmax, PDMAPP, PIPP, Per_Geranyl_formation_Kma, Per_Geranyl_formation_Kmb);
    Per_Geranyl_formation_vmax = 4700.32; Per_Geranyl_formation_Kma = 7.80105; Per_Geranyl_formation_Kmb = 13.0674;
  Per_FarnesylPP_formation: PGPP + PIPP => PFPP; Peripheral_Tissue*Bi__irreversible(Per_FarnesylPP_formation_vmax, PGPP, PIPP, Per_FarnesylPP_formation_Kma, Per_FarnesylPP_formation_Kmb);
    Per_FarnesylPP_formation_vmax = 0.339347; Per_FarnesylPP_formation_Kma = 0.13511; Per_FarnesylPP_formation_Kmb = 0.00470032;
  Per_Squalene_formation: PFPP => PSQ; Peripheral_Tissue*Henri_Michaelis_Menten__irreversible(PFPP, Per_Squalene_formation_Km, Per_Squalene_formation_V);
    Per_Squalene_formation_Km = 0.879359; Per_Squalene_formation_V = 1.83518;
  Per_Squalene_epoxide_formation: PSQ => PSQE; Peripheral_Tissue*Henri_Michaelis_Menten__irreversible(PSQ, Per_Squalene_epoxide_formation_Km, Per_Squalene_epoxide_formation_V);
    Per_Squalene_epoxide_formation_Km = 5.46244; Per_Squalene_epoxide_formation_V = 4.8587e-6;
  Per_Lansterol_formation: PSQE => PLAN; Peripheral_Tissue*Henri_Michaelis_Menten__irreversible(PSQE, Per_Lansterol_formation_Km, Per_Lansterol_formation_V);
    Per_Lansterol_formation_Km = 32.004; Per_Lansterol_formation_V = 0.140818;
  Per_7_Dehydrodesmosterol_formation: PLAN => P7DHDES; Peripheral_Tissue*Per_7_Dehydrodesmosterol_formation_k1*PLAN;
    Per_7_Dehydrodesmosterol_formation_k1 = 1;
  Per_7DHC_formation: P7DHDES => P7DHC; Peripheral_Tissue*Henri_Michaelis_Menten__irreversible(P7DHDES, Per_7DHC_formation_Km, Per_7DHC_formation_V);
    Per_7DHC_formation_Km = 62.6963; Per_7DHC_formation_V = 0.000553882;
  Per_Desmosterol_formation: P7DHDES => PDES; Peripheral_Tissue*Henri_Michaelis_Menten__irreversible(P7DHDES, Per_Desmosterol_formation_Km, Per_Desmosterol_formation_V);
    Per_Desmosterol_formation_Km = 11.5389; Per_Desmosterol_formation_V = 0.000326936;
  Per_FC_formation_from_7_DHC: P7DHC => PFC; Peripheral_Tissue*Henri_Michaelis_Menten__irreversible(P7DHC, Per_FC_formation_from_7_DHC_Km, Per_FC_formation_from_7_DHC_V);
    Per_FC_formation_from_7_DHC_Km = 11.5389; Per_FC_formation_from_7_DHC_V = 0.000326936;
  Per_FC_formation_from_desmosterol: PDES => PFC; Peripheral_Tissue*Henri_Michaelis_Menten__irreversible(PDES, Per_FC_formation_from_desmosterol_Km, Per_FC_formation_from_desmosterol_V);
    Per_FC_formation_from_desmosterol_Km = 62.6963; Per_FC_formation_from_desmosterol_V = 0.000553882;
  Int_Acetyl_CoA_synthesis: JACoAS => JACoA; Jejunocytes*Int_Acetyl_CoA_synthesis_k1*JACoAS;
    Int_Acetyl_CoA_synthesis_k1 = 1;
  Int_Interconversion_of_Acetyl_CoA_and_Acetoacetyl_CoA: 2 JACoA -> JAACoA + JCoASH; Jejunocytes*Ping_Pong_Bi_Bi(JACoA, JACoA, JAACoA, JCoASH, Int_Interconversion_of_Acetyl_CoA_and_Acetoacetyl_CoA_Keq, Int_Interconversion_of_Acetyl_CoA_and_Acetoacetyl_CoA_Vf, Int_Interconversion_of_Acetyl_CoA_and_Acetoacetyl_CoA_Vr, Int_Interconversion_of_Acetyl_CoA_and_Acetoacetyl_CoA_Kma, Int_Interconversion_of_Acetyl_CoA_and_Acetoacetyl_CoA_Kmb, Int_Interconversion_of_Acetyl_CoA_and_Acetoacetyl_CoA_Kmp, Int_Interconversion_of_Acetyl_CoA_and_Acetoacetyl_CoA_Kmq, Int_Interconversion_of_Acetyl_CoA_and_Acetoacetyl_CoA_Kia, Int_Interconversion_of_Acetyl_CoA_and_Acetoacetyl_CoA_Kiq);
    Int_Interconversion_of_Acetyl_CoA_and_Acetoacetyl_CoA_Keq = 0.1; Int_Interconversion_of_Acetyl_CoA_and_Acetoacetyl_CoA_Vf = 4.69551; Int_Interconversion_of_Acetyl_CoA_and_Acetoacetyl_CoA_Vr = 4.69551; Int_Interconversion_of_Acetyl_CoA_and_Acetoacetyl_CoA_Kma = 22.668; Int_Interconversion_of_Acetyl_CoA_and_Acetoacetyl_CoA_Kmb = 22.668; Int_Interconversion_of_Acetyl_CoA_and_Acetoacetyl_CoA_Kmp = 4.25805; Int_Interconversion_of_Acetyl_CoA_and_Acetoacetyl_CoA_Kmq = 4.91226; Int_Interconversion_of_Acetyl_CoA_and_Acetoacetyl_CoA_Kia = 0.1; Int_Interconversion_of_Acetyl_CoA_and_Acetoacetyl_CoA_Kiq = 0.1;
  Int_HMG_CoA_formation: JACoA + JAACoA => JHMGCoA; Jejunocytes*Bi__irreversible(Int_HMG_CoA_formation_vmax, JACoA, JAACoA, Int_HMG_CoA_formation_Kma, Int_HMG_CoA_formation_Kmb);
    Int_HMG_CoA_formation_vmax = 0.542412; Int_HMG_CoA_formation_Kma = 59.0986; Int_HMG_CoA_formation_Kmb = 4.25805;
  Int_Mevalonate_formation: JHMGCoA => JMV; Jejunocytes*Henri_Michaelis_Menten__irreversible(JHMGCoA, Int_Mevalonate_formation_Km, Int_Mevalonate_formation_V);
    Int_Mevalonate_formation_Km = 22.0617; Int_Mevalonate_formation_V = 0.000569788;
  Int_Mevalonate_5P: JMV => JMV5P; Henri_Michaelis_Menten__irreversible(JMV, Int_Mevalonate_5P_Km, Int_Mevalonate_5P_V);
    Int_Mevalonate_5P_Km = 3.5316; Int_Mevalonate_5P_V = 5.44455;
  Int_Mevalonate_5PP_formation: JMV5P -> JMV5PP; Reversible_Michaelis_Menten(JMV5P, JMV5PP, Int_Mevalonate_5PP_formation_Kms, Int_Mevalonate_5PP_formation_Kmp, Int_Mevalonate_5PP_formation_Vf, Int_Mevalonate_5PP_formation_Vr);
    Int_Mevalonate_5PP_formation_Kms = 7.75676; Int_Mevalonate_5PP_formation_Kmp = 12.6329; Int_Mevalonate_5PP_formation_Vf = 10.5857; Int_Mevalonate_5PP_formation_Vr = 3.48176;
  Int_IPP_formation: JMV5PP => JIPP; Jejunocytes*Henri_Michaelis_Menten__irreversible(JMV5PP, Int_IPP_formation_Km, Int_IPP_formation_V);
    Int_IPP_formation_Km = 0.00890467; Int_IPP_formation_V = 1.87953;
  Int_DMAPP_interconversion: JIPP -> JDMAPP; Jejunocytes*Reversible_Michaelis_Menten(JIPP, JDMAPP, Int_DMAPP_interconversion_Kms, Int_DMAPP_interconversion_Kmp, Int_DMAPP_interconversion_Vf, Int_DMAPP_interconversion_Vr);
    Int_DMAPP_interconversion_Kms = 68.1177; Int_DMAPP_interconversion_Kmp = 68.1177; Int_DMAPP_interconversion_Vf = 0.147654; Int_DMAPP_interconversion_Vr = 0.147654;
  Int_GeranylPP_formation: JDMAPP + JIPP => JGPP; Jejunocytes*Bi__irreversible(Int_GeranylPP_formation_vmax, JDMAPP, JIPP, Int_GeranylPP_formation_Kma, Int_GeranylPP_formation_Kmb);
    Int_GeranylPP_formation_vmax = 4700.32; Int_GeranylPP_formation_Kma = 7.80105; Int_GeranylPP_formation_Kmb = 13.0674;
  Int_FarnesylPP_formation: JGPP + JIPP => JFPP; Jejunocytes*Bi__irreversible(Int_FarnesylPP_formation_vmax, JGPP, JIPP, Int_FarnesylPP_formation_Kma, Int_FarnesylPP_formation_Kmb);
    Int_FarnesylPP_formation_vmax = 0.339347; Int_FarnesylPP_formation_Kma = 0.13511; Int_FarnesylPP_formation_Kmb = 0.00470032;
  Int_Squalene_formation: JFPP => JSQ; Jejunocytes*Henri_Michaelis_Menten__irreversible(JFPP, Int_Squalene_formation_Km, Int_Squalene_formation_V);
    Int_Squalene_formation_Km = 0.879359; Int_Squalene_formation_V = 1.83518;
  Int_Squalene_epoxide_formation: JSQ => JSQE; Jejunocytes*Henri_Michaelis_Menten__irreversible(JSQ, Int_Squalene_epoxide_formation_Km, Int_Squalene_epoxide_formation_V);
    Int_Squalene_epoxide_formation_Km = 5.46244; Int_Squalene_epoxide_formation_V = 4.8587e-6;
  Int_Lansterol_formation: JSQE => JLAN; Jejunocytes*Henri_Michaelis_Menten__irreversible(JSQE, Int_Lansterol_formation_Km, Int_Lansterol_formation_V);
    Int_Lansterol_formation_Km = 32.004; Int_Lansterol_formation_V = 0.140818;
  Int_7_Dehydrodesmosterol_formation: JLAN => J7DHDES; Jejunocytes*Int_7_Dehydrodesmosterol_formation_k1*JLAN;
    Int_7_Dehydrodesmosterol_formation_k1 = 0.1;
  Int_7DHC_formation: J7DHDES => J7DHC; Jejunocytes*Henri_Michaelis_Menten__irreversible(J7DHDES, Int_7DHC_formation_Km, Int_7DHC_formation_V);
    Int_7DHC_formation_Km = 62.69636; Int_7DHC_formation_V = 0.000553882;
  Int_Desmosterol_formation: J7DHDES => JDES; Jejunocytes*Henri_Michaelis_Menten__irreversible(J7DHDES, Int_Desmosterol_formation_Km, Int_Desmosterol_formation_V);
    Int_Desmosterol_formation_Km = 11.5389; Int_Desmosterol_formation_V = 62.6963;
  Int_FC_formation_from_7_DHC: J7DHC => JFC; Jejunocytes*Henri_Michaelis_Menten__irreversible(J7DHC, Int_FC_formation_from_7_DHC_Km, Int_FC_formation_from_7_DHC_V);
    Int_FC_formation_from_7_DHC_Km = 11.5389; Int_FC_formation_from_7_DHC_V = 0.000326936;
  Int_FC_formation_from_desmosterol: JDES => JFC; Jejunocytes*Henri_Michaelis_Menten__irreversible(JDES, Int_FC_formation_from_desmosterol_Km, Int_FC_formation_from_desmosterol_V);
    Int_FC_formation_from_desmosterol_Km = 62.6963; Int_FC_formation_from_desmosterol_V = 0.000553882;
  BASC_C1_formation_CYP7A1: HFC => C1; Hepatic_Tissue*Henri_Michaelis_Menten__irreversible(HFC, BASC_C1_formation_CYP7A1_Km, BASC_C1_formation_CYP7A1_V);
    BASC_C1_formation_CYP7A1_Km = 5.7999; BASC_C1_formation_CYP7A1_V = 0.00055679;
  BASC_C2_formation_HSD3B7: C1 => C2; Hepatic_Tissue*Henri_Michaelis_Menten__irreversible(C1, BASC_C2_formation_HSD3B7_Km, BASC_C2_formation_HSD3B7_V);
    BASC_C2_formation_HSD3B7_Km = 0.5; BASC_C2_formation_HSD3B7_V = 0.0005;
  BASC_C3_formation_AKR1D1: C2 => C3; Hepatic_Tissue*Henri_Michaelis_Menten__irreversible(C2, BASC_C3_formation_AKR1D1_Km, BASC_C3_formation_AKR1D1_V);
    BASC_C3_formation_AKR1D1_Km = 4.9595; BASC_C3_formation_AKR1D1_V = 0.0004;
  BASC_C4_formation_CYP27A1: C3 => C4; Hepatic_Tissue*Henri_Michaelis_Menten__irreversible(C3, BASC_C4_formation_CYP27A1_Km, BASC_C4_formation_CYP27A1_V);
    BASC_C4_formation_CYP27A1_Km = 4.0265; BASC_C4_formation_CYP27A1_V = 0.0004;
  BASC_C5_formation_CYP8B1: C2 => C5; Hepatic_Tissue*Henri_Michaelis_Menten__irreversible(C2, BASC_C5_formation_CYP8B1_Km, BASC_C5_formation_CYP8B1_V);
    BASC_C5_formation_CYP8B1_Km = 14.715; BASC_C5_formation_CYP8B1_V = 7.63305e-6;
  BASC_C6_formation_AKR1D1: C5 => C6; Hepatic_Tissue*Henri_Michaelis_Menten__irreversible(C5, BASC_C6_formation_AKR1D1_Km, BASC_C6_formation_AKR1D1_V);
    BASC_C6_formation_AKR1D1_Km = 5.08289; BASC_C6_formation_AKR1D1_V = 5e-5;
  BASC_C7_formation_CYP27A1: C6 => C7; Hepatic_Tissue*Henri_Michaelis_Menten__irreversible(C6, BASC_C7_formation_CYP27A1_Km, BASC_C7_formation_CYP27A1_V);
    BASC_C7_formation_CYP27A1_Km = 1.87488; BASC_C7_formation_CYP27A1_V = 2.24986e-5;
  BASA_C8_formation_CYP27A1: HFC => C8; Hepatic_Tissue*Henri_Michaelis_Menten__irreversible(HFC, BASA_C8_formation_CYP27A1_Km, BASA_C8_formation_CYP27A1_V);
    BASA_C8_formation_CYP27A1_Km = 154.664; BASA_C8_formation_CYP27A1_V = 0.000502658;
  BASA_C9_formation_CYP7B1: C8 => C9; Hepatic_Tissue*Henri_Michaelis_Menten__irreversible(C8, BASA_C9_formation_CYP7B1_Km, BASA_C9_formation_CYP7B1_V);
    BASA_C9_formation_CYP7B1_Km = 5; BASA_C9_formation_CYP7B1_V = 0.0005;
  BASA_C10_formation_HSD4B7: C9 => C10; Hepatic_Tissue*Henri_Michaelis_Menten__irreversible(C9, BASA_C10_formation_HSD4B7_Km, BASA_C10_formation_HSD4B7_V);
    BASA_C10_formation_HSD4B7_Km = 5; BASA_C10_formation_HSD4B7_V = 0.0005;
  BASC_HUBA_formation_C4: C4 => HUBA; Hepatic_Tissue*BASC_HUBA_formation_C4_k1*C4;
    BASC_HUBA_formation_C4_k1 = 1.9e-6;
  BASC_HUBA_formation_C7: C7 => HUBA; Hepatic_Tissue*BASC_HUBA_formation_C7_k1*C7;
    BASC_HUBA_formation_C7_k1 = 1e-7;
  BAS_UBA_CoA_formation: HUBA => HUBACoA; Hepatic_Tissue*Henri_Michaelis_Menten__irreversible(HUBA, BAS_UBA_CoA_formation_Km, BAS_UBA_CoA_formation_V); BAS_UBA_CoA_formation is "BAS UBA-CoA formation";
    BAS_UBA_CoA_formation_Km = 4.0857; BAS_UBA_CoA_formation_V = 0.000902;
  BAS_CBA_formation: HUBACoA => HCBA; Hepatic_Tissue*Henri_Michaelis_Menten__irreversible(HUBACoA, BAS_CBA_formation_Km, BAS_CBA_formation_V);
    BAS_CBA_formation_Km = 3.70589; BAS_CBA_formation_V = 0.0009;
  BASA_HUBA_formation_C10: C10 => HUBA; Hepatic_Tissue*BASA_HUBA_formation_C10_k1*C10;
    BASA_HUBA_formation_C10_k1 = 2.4e-6;

  // Events:
  event_1_DFC: at (counter2 > 482): DFC = DFC + 88.667;
  event_2_DFC: at (counter2 > 483): counter2 = counter2 - 483;
  event_1_DCE: at (counter4 > 480): DCE = DCE + 12.667;
  event_2_DCE: at (counter4 > 481): counter4 = counter4 - 481;

  // Unit definitions:
  unit volume = dimensionless;
  unit time = 60 second;
  unit substance = dimensionless;
end
