// SBML level 2 version 4

function function_6(cytoplasm, k1, tIkBa)
  k1*tIkBa*cytoplasm/cytoplasm;
end
function_6 is "Function for R06_IkBa_protein_synthesis";

function function_5(Shalve, V, cytoplasm, h, nNF_kB)
  cytoplasm*V*nNF_kB^h/(Shalve^h + nNF_kB^h);
end
function_5 is "Hill Cooperativity across compartments_1";

function function_4(nucleus, k1, nIkBa_nNF_kB)
  k1*nIkBa_nNF_kB*nucleus/nucleus;
end
function_4 is "Function for R04_complex_dissociation";

function function_3(cytoplasm, k1, IkBa_NF_kB)
  k1*IkBa_NF_kB*cytoplasm/cytoplasm;
end
function_3 is "Function for R03_complex_dissociation";

function function_2(nucleus, k1, nIkBa, nNF_kB)
  k1*nIkBa*nucleus*nNF_kB/nucleus;
end
function_2 is "Function for R02_complex_formation";

function function_8(cytoplasm, k1, IkBa)
  k1*IkBa*cytoplasm/cytoplasm;
end
function_8 is "Function for R08_IkBa_protein_degradation";

function function_7(cytoplasm, k1, tIkBa)
  k1*tIkBa*cytoplasm/cytoplasm;
end
function_7 is "Function for R07_tIkBa_degradation";

function function_9(cytoplasm, k1, IkBa_NF_kB)
  k1*IkBa_NF_kB*cytoplasm/cytoplasm;
end
function_9 is "Function for R10_IkBa_protein_degradation";

function function_10(nucleus, k1, nIkBa_nNF_kB)
  k1*nIkBa_nNF_kB*nucleus/nucleus;
end
function_10 is "Function for R11_nIkBa_protein_degradation";

function function_11(cytoplasm, k, NF_kB)
  k*cytoplasm*NF_kB;
end
function_11 is "Rate Law for Transport Reactions_1";

function function_1(cytoplasm, k1, IkBa, NF_kB)
  k1*IkBa*cytoplasm*NF_kB/cytoplasm;
end
function_1 is "Function for R01_complex_formation";

function function_12(nucleus, k, nNF_kB)
  k*nucleus*nNF_kB;
end
function_12 is "Rate Law for Transport Reactions_2";

function function_13(nucleus, k, nIkBa_nNF_kB)
  k*nucleus*nIkBa_nNF_kB;
end
function_13 is "Rate Law for Transport Reactions_3";

function function_14(cytoplasm, k, IkBa)
  k*cytoplasm*IkBa;
end
function_14 is "Rate Law for Transport Reactions_4";

function function_15(nucleus, k, nIkBa)
  k*nucleus*nIkBa;
end
function_15 is "Rate Law for Transport Reactions_5";

function function_16(cytoplasm, k1, IkBa, IKKa)
  k1*IKKa*cytoplasm*IkBa/cytoplasm;
end
function_16 is "Function for R17_IkBa_phosphorylation";

function function_17(cytoplasm, k1, IkBa_NF_kB, IKKa)
  k1*IKKa*cytoplasm*IkBa_NF_kB/cytoplasm;
end
function_17 is "Function for R18_IkBa_NF-kB_phosphorylation";

function function_18(cytoplasm, k1, pIkBa)
  k1*pIkBa*cytoplasm/cytoplasm;
end
function_18 is "Function for R19_pIkBa_degradation";

function function_19(cytoplasm, k1, pIkBa_NF_kB)
  k1*pIkBa_NF_kB*cytoplasm/cytoplasm;
end
function_19 is "Function for R20_pIkBa_NF-kB_degradation";

function function_20(k, TNFa, IKKn)
  k*IKKn*TNFa;
end
function_20 is "Rate Law for R32_IKKa_formation_1";

function Function_for_R33_IKKi_formation(cytoplasm, k1, IKKa)
  k1*IKKa*cytoplasm/cytoplasm;
end

function function_22(cytoplasm, k1, tA20)
  k1*tA20*cytoplasm/cytoplasm;
end
function_22 is "Function for R29_A20_protein_synthesis";

function function_23(cytoplasm, k1, tA20)
  k1*tA20*cytoplasm/cytoplasm;
end
function_23 is "Function for R30_tA20_degradation";

function Function_for_R31_A20_degradation(cytoplasm, k1, A20)
  k1*A20*cytoplasm/cytoplasm;
end

function function_25(nucleus, k1, nIkBa)
  k1*nIkBa*nucleus/nucleus;
end
function_25 is "Function for R09_nIkBa_protein_degradation";

function function_26(k, kb, TNFa, A20, IKKi)
  k*IKKi*(kb/(kb + A20*TNFa));
end
function_26 is "Rate Law for R34_IKKn_regeneration_1";

model MODEL1509020000()
  // Ashall2009 - NFkappaB dependent transcription
  // Model taken from Ashall et al., Science, 2009 (http://www.sciencemag.org/content/324/5924/242.long).
  // Contact: mike.white@manchester.ac.uk.
  // Simulation set for continuous treatment. For pulsing treatment, set 'pulse_b' events to zero.
  // biomodels.db:MODEL1509020000

  // Compartments:
  compartment cytoplasm = Total_Cell_Volume*kv/(kv + 1);
  compartment nucleus = Total_Cell_Volume/(kv + 1);

  // Species:
  substanceOnly species IkBa in cytoplasm = 0;
  substanceOnly species IkBa_NF_kB in cytoplasm = 1.660539e-13; IkBa_NF_kB is "IkBa_NF-kB";
  substanceOnly species NF_kB in cytoplasm = 0; NF_kB is "NF-kB";
  substanceOnly species tIkBa in cytoplasm = 0;
  substanceOnly species IKKa in cytoplasm = 0;
  substanceOnly species pIkBa in cytoplasm = 0;
  substanceOnly species pIkBa_NF_kB in cytoplasm = 0; pIkBa_NF_kB is "pIkBa_NF-kB";
  substanceOnly species IKKn in cytoplasm = 1.660539e-13;
  substanceOnly species IKKi in cytoplasm = 0;
  substanceOnly species A20 in cytoplasm = 0;
  substanceOnly species tA20 in cytoplasm = 0;
  substanceOnly species nIkBa in nucleus = 0;
  substanceOnly species nIkBa_nNF_kB in nucleus = 0; nIkBa_nNF_kB is "nIkBa_nNF-kB";
  substanceOnly species nNF_kB in nucleus = 0; nNF_kB is "nNF-kB";

  // Parameters:
  Total_Cell_Volume = 2.7e-12;
  kv = 3.3;
  var N_C_Nf_kB; N_C_Nf_kB is "N:C_Nf-kB";
  TNFa = 0;
  var parameter_5; parameter_5 is "min";
  quantity_to_number_factor = 6.02214179e17;

  // Assignment rules:
  N_C_Nf_kB := (nNF_kB*quantity_to_number_factor + nIkBa_nNF_kB*quantity_to_number_factor)/(NF_kB*quantity_to_number_factor + IkBa_NF_kB*quantity_to_number_factor + pIkBa_NF_kB*quantity_to_number_factor);
  parameter_5 := time/60 - 4000;

  // Reactions:
  NF_kB_IkBa_association: IkBa + NF_kB => IkBa_NF_kB; cytoplasm*function_1(cytoplasm, NF_kB_IkBa_association_k1, IkBa/cytoplasm, NF_kB/cytoplasm); NF_kB_IkBa_association is "NF-kB IkBa association";
    NF_kB_IkBa_association_k1 = 0.5;
  NF_kB_IkBa_association_nuclear: nIkBa + nNF_kB => nIkBa_nNF_kB; nucleus*function_2(nucleus, NF_kB_IkBa_association_nuclear_k1, nIkBa/nucleus, nNF_kB/nucleus); NF_kB_IkBa_association_nuclear is "NF-kB IkBa association (nuclear)";
    NF_kB_IkBa_association_nuclear_k1 = 0.5;
  IkBa_NF_kB_dissociation: IkBa_NF_kB => IkBa + NF_kB; cytoplasm*function_3(cytoplasm, IkBa_NF_kB_dissociation_k1, IkBa_NF_kB/cytoplasm); IkBa_NF_kB_dissociation is "IkBa:NF-kB dissociation";
    IkBa_NF_kB_dissociation_k1 = 0.0005;
  IkBa_NF_kB_dissociation_nuclear: nIkBa_nNF_kB => nIkBa + nNF_kB; nucleus*function_4(nucleus, IkBa_NF_kB_dissociation_nuclear_k1, nIkBa_nNF_kB/nucleus); IkBa_NF_kB_dissociation_nuclear is "IkBa:NF-kB dissociation (nuclear)";
    IkBa_NF_kB_dissociation_nuclear_k1 = 0.0005;
  IkBa_transcription: nNF_kB => nNF_kB + tIkBa; function_5(IkBa_transcription_Shalve, IkBa_transcription_V, cytoplasm, IkBa_transcription_h, nNF_kB/nucleus);
    IkBa_transcription_Shalve = 0.065; IkBa_transcription_V = 1.4e-7; IkBa_transcription_h = 2;
  IkBa_translation: tIkBa => tIkBa + IkBa; cytoplasm*function_6(cytoplasm, IkBa_translation_k1, tIkBa/cytoplasm);
    IkBa_translation_k1 = 0.5;
  IkBa_transcription_degradation: tIkBa => ; cytoplasm*function_7(cytoplasm, IkBa_transcription_degradation_k1, tIkBa/cytoplasm);
    IkBa_transcription_degradation_k1 = 0.0003;
  IkBa_degradation: IkBa => ; cytoplasm*function_8(cytoplasm, IkBa_degradation_k1, IkBa/cytoplasm);
    IkBa_degradation_k1 = 0.0005;
  IkBa_degradation_in_complex: IkBa_NF_kB => NF_kB; cytoplasm*function_9(cytoplasm, IkBa_degradation_in_complex_k1, IkBa_NF_kB/cytoplasm);
    IkBa_degradation_in_complex_k1 = 2.2e-5;
  reaction_10: nIkBa_nNF_kB => nNF_kB; nucleus*function_10(nucleus, reaction_10_k1, nIkBa_nNF_kB/nucleus); reaction_10 is "IkBa degradation in complex (nuclear)";
    reaction_10_k1 = 0;
  NF_kB_nuclear_import: NF_kB => nNF_kB; function_11(cytoplasm, NF_kB_nuclear_import_k, NF_kB/cytoplasm); NF_kB_nuclear_import is "NF-kB nuclear import";
    NF_kB_nuclear_import_k = 0.0026;
  NF_kB_nuclear_export: nNF_kB => NF_kB; function_12(nucleus, NF_kB_nuclear_export_k, nNF_kB/nucleus); NF_kB_nuclear_export is "NF-kB nuclear export";
    NF_kB_nuclear_export_k = 0.0001716;
  IkBa_NF_kB_nuclear_export: nIkBa_nNF_kB => IkBa_NF_kB; function_13(nucleus, IkBa_NF_kB_nuclear_export_k, nIkBa_nNF_kB/nucleus); IkBa_NF_kB_nuclear_export is "IkBa:NF-kB nuclear export";
    IkBa_NF_kB_nuclear_export_k = 0.033;
  IkBa_nuclear_import: IkBa => nIkBa; function_14(cytoplasm, IkBa_nuclear_import_k, IkBa/cytoplasm);
    IkBa_nuclear_import_k = 0.00067;
  IkBa_nuclear_export: nIkBa => IkBa; function_15(nucleus, IkBa_nuclear_export_k, nIkBa/nucleus);
    IkBa_nuclear_export_k = 0.0011055;
  IkBa_phosphorylation: IKKa + IkBa => pIkBa + IKKa; cytoplasm*function_16(cytoplasm, IkBa_phosphorylation_k1, IkBa/cytoplasm, IKKa/cytoplasm);
    IkBa_phosphorylation_k1 = 0.074;
  IkBa_NF_kB_phosphorylation: IKKa + IkBa_NF_kB => pIkBa_NF_kB + IKKa; cytoplasm*function_17(cytoplasm, IkBa_NF_kB_phosphorylation_k1, IkBa_NF_kB/cytoplasm, IKKa/cytoplasm); IkBa_NF_kB_phosphorylation is "IkBa:NF-kB phosphorylation";
    IkBa_NF_kB_phosphorylation_k1 = 0.185;
  pIkBa_degradation: pIkBa => ; cytoplasm*function_18(cytoplasm, pIkBa_degradation_k1, pIkBa/cytoplasm);
    pIkBa_degradation_k1 = 0.1;
  pIkBa_NF_kB_degradation: pIkBa_NF_kB => NF_kB; cytoplasm*function_19(cytoplasm, pIkBa_NF_kB_degradation_k1, pIkBa_NF_kB/cytoplasm); pIkBa_NF_kB_degradation is "pIkBa:NF-kB degradation";
    pIkBa_NF_kB_degradation_k1 = 0.1;
  IKK_activation: IKKn => IKKa; cytoplasm*function_20(IKK_activation_k, TNFa, IKKn/cytoplasm);
    IKK_activation_k = 0.004;
  IKK_inactivation: IKKa => IKKi; cytoplasm*Function_for_R33_IKKi_formation(cytoplasm, IKK_inactivation_k1, IKKa/cytoplasm);
    IKK_inactivation_k1 = 0.003;
  A20_transcription: nNF_kB => nNF_kB + tA20; function_5(A20_transcription_Shalve, A20_transcription_V, cytoplasm, A20_transcription_h, nNF_kB/nucleus);
    A20_transcription_Shalve = 0.065; A20_transcription_V = 1.4e-7; A20_transcription_h = 2;
  A20_translation: tA20 => tA20 + A20; cytoplasm*function_22(cytoplasm, A20_translation_k1, tA20/cytoplasm);
    A20_translation_k1 = 0.5;
  A20_transcript_degradation: tA20 => ; cytoplasm*function_23(cytoplasm, A20_transcript_degradation_k1, tA20/cytoplasm);
    A20_transcript_degradation_k1 = 0.00048;
  A20_degradation: A20 => ; cytoplasm*Function_for_R31_A20_degradation(cytoplasm, A20_degradation_k1, A20/cytoplasm);
    A20_degradation_k1 = 0.0045;
  IkBa_degradation_nuclear: nIkBa => ; nucleus*function_25(nucleus, IkBa_degradation_nuclear_k1, nIkBa/nucleus); IkBa_degradation_nuclear is "IkBa degradation (nuclear)";
    IkBa_degradation_nuclear_k1 = 0.0005;
  IKK_reset: IKKi => IKKn; cytoplasm*function_26(IKK_reset_k, kb, TNFa, A20/cytoplasm, IKKi/cytoplasm);  // modifiers: A20
    IKK_reset_k = 0.0006; kb = 0.0018;

  // Events:
  _1pulse_a: at (time > 240000): TNFa = 1;
  _1pulse_b: at (time > 240300): TNFa = 1;
  _2pulse_a: at (time > 243600): TNFa = 1;
  _2pulse_b: at (time > 243900): TNFa = 1;
  _3pulse_a: at (time > 247200): TNFa = 1;
  _3pulse_b: at (time > 247500): TNFa = 1;

  // Unit definitions:
  unit substance = 1e-6 mole;
end
