// SBML level 2 version 4

function AA_MassAction_withEnzyme(Enzyme, kmax, substrate)
  Enzyme*kmax*substrate;
end

model Phosphatase_activities_on_PI_3_4_5_P3_and_PI_3_4_P2()
  // Phosphatase activities on PI(3,4,5)P3 and PI(3,4)P2
  // This model describes the action of various phosphatases on
  // PI(3,4,5)P3 and PI(3,4)P2, in response to a stimulation by EGF. It
  // contains boolean switches to simulate knock-down and knock-out of
  // phosphatases as well as inhibition of PI3 kinase.
  // This model is described in the article:
  // PTEN Regulates PI(3,4)P2 Signaling Downstream of Class I PI3K
  // Mouhannad Malek, Anna Kielkowska, Tamara Chessa, Karen E. Anderson, David Barneda, P?nar Pir, Hiroki Nakanishi, Satoshi Eguchi, Atsushi Koizumi, Junko Sasaki, Véronique Juvin, Vladimir Y. Kiselev, Izabella Niewczas, Alexander Gray, Alexandre Valayer, Dominik Spensberger, Marine Imbert, Sergio Felisbino, Tomonori Habuchi, Soren Beinke, Sabina Cosulich, Nicolas Le Novère, Takehiko Sasaki, Jonathan Clark, Phillip T. Hawkins and Len R. Stephens
  // Molecular Cell
  // Abstract:
  // The PI3K signaling pathway regulates cell growth and movement and is heavily mutated in cancer. Class I PI3Ks synthesize the lipid messenger PI(3,4,5)P3. PI(3,4,5)P3 can be dephosphorylated by 3- or 5-phosphatases, the latter producing PI(3,4)P2. The PTEN tumor suppressor is thought to function primarily as a PI(3,4,5)P3 3-phosphatase, limiting activation of this pathway. Here we show that PTEN also functions as a PI(3,4)P2 3-phosphatase, both in vitro and in vivo. PTEN is a major PI(3,4)P2 phosphatase in Mcf10a cytosol, and loss of PTEN and INPP4B, a known PI(3,4)P2 4-phosphatase, leads to synergistic accumulation of PI(3,4)P2, which correlated with increased invadopodia in epidermal growth factor (EGF)-stimulated cells. PTEN deletion increased PI(3,4)P2 levels in a mouse model of prostate cancer, and it inversely correlated with PI(3,4)P2 levels across several EGF-stimulated prostate and breast cancer lines. These results point to a role for PI(3,4)P2 in the phenotype caused by loss-of-function mutations or deletions in PTEN.
  // This model is hosted on BioModels Database and identified by: MODEL1704190000.
  // To cite BioModels Database, please use: Chelliah V et al. BioModels: ten-year anniversary. Nucl. Acids Res. 2015, 43(Database issue):D542-8.
  // To the extent possible under law, all copyright and related or neighbouring rights to this encoded model have been dedicated to the public domain worldwide. Please refer to CC0 Public Domain Dedication for more information.
  // biomodels.db:MODEL1704190000

  // Compartments:
  compartment cell = 1;  // atcc:CRL-10317; BTO:0001939; GO:0005623

  // Species:
  // Epidermal growth factor, used to trigger the activation of PI3K
  species EGF in cell = 0;  // uniprot:P01133
  // Subunit of the Epidermal Growth Factor receptor
  species EGFR in cell = 0.15;  // isVersionOf uniprot:P00533
  // Active complex of EGF receptor
  species EGFR_P in cell = 0; EGFR_P is "EGFR-P";  // isVersionOf uniprot:P00533
  species $PI3Keff1 in cell;  // isVersionOf GO:0035004
  // phosphatidyl-inositol 4,4-bisphosphate
  species $PI_4_5_P2 in cell = 145; PI_4_5_P2 is "PI(4,5)P2";  // CHEBI:18348
  // phosphatidyl-inositol 3,4,5-trisphosphate
  species PI_3_4_5_P3 in cell = 0; PI_3_4_5_P3 is "PI(3,4,5)P3";  // CHEBI:16618
  species PI_103_ext in cell = 1; PI_103_ext is "PI-103_ext";  // CHEBI:90524
  species PI_103_int in cell = 0; PI_103_int is "PI-103_int";  // CHEBI:90524
  species $PTEN in cell;  // uniprot:P60484
  // phosphatidyl-inositol 3,4-bisphosphate
  species PI_3_4_P2 in cell = 0; PI_3_4_P2 is "PI(3,4)P2";  // CHEBI:16152
  species $SHIP2 in cell;  // uniprot:O15357
  // Type I inositol-3,4-bisphosphate 4-phosphatase (the Species cover both A and B versions)
  species $INPP4AB in cell;  // hasVersion uniprot:O15327; hasVersion uniprot:Q96PE3
  // phosphatidylinositol 3-phosphate
  species PI_3_P in cell = 0; PI_3_P is "PI(3)P";  // chebi:17283
  // phosphatidylinositol 4-phosphate
  species PI_4_P in cell = 0; PI_4_P is "PI(4)P";  // CHEBI:37530
  species $X in cell;  // isVersionOf ec-code:3.1.3.86; isVersionOf GO:0034485
  // Boolean that allows or disallows the diffusion of PI-103 (PI3K inhibitor) in the cell
  species mode_PI_103_diff in cell = 0; mode_PI_103_diff is "mode_PI-103_diff";
  species Y in cell = 1;  // isVersionOf GO:0034593
  species PI_Y_P in cell = 0; PI_Y_P is "PI(Y)P";  // CHEBI:26036

  // Parameters:
  // Apparent dissociation constant for PI3K activation by EGFR
  K_PI3KAct = 0.65605;
  // Apparent dissociation constant for PI3K inhibitor
  K_PI_103 = 0.001; K_PI_103 is "K_PI-103";
  // Code of PTEN mutants
  mode_PTEN = 1;
  // Code of INPP4 mutants
  mode_INPP4 = 1;
  // Code of SHIP2 mutants
  mode_SHIP2 = 1;
  // Code of unspecified 5-phosphatases mutants
  mode_X = 1;
  mode_PI_103 = 0; mode_PI_103 is "mode_PI-103";
  // Start of the EGF stimulation
  activation_time = 300;
  // Start of the PI3K inhibition
  inhibition_time = 365;
  // Concentration of EGF used as a signal.
  EGF_sig = 0.00157;
  // Fraction of active unidentified 5-phosphatases after silencing of SHIP1, SYNJ1-2, 5B and 5F.
  partial_X = 0.500856;
  // Background levels of PI(3,4)P2, unreachable by phosphatases and kinases
  PI_3_4_P2_BG = 0.741007; PI_3_4_P2_BG is "PI(3,4)P2_BG";
  var PI_3_4_P2_total; PI_3_4_P2_total is "PI(3,4)P2_total";
  // Background levels of PI(3,4,5)P3, unreachable by phosphatases
  PI_3_4_5_P3_BG = 0.0501727; PI_3_4_5_P3_BG is "PI(3,4,5)P3_BG";
  var PI_3_4_5_P3_total; PI_3_4_5_P3_total is "PI(3,4,5)P3_total";
  Initial_for_EGF_sig = EGF_sig;

  // Assignment rules:
  PI3Keff1 := EGFR_P/(K_PI3KAct + EGFR_P)*(K_PI_103/(K_PI_103 + PI_103_int));
  fraction_PTEN := piecewise(0, mode_PTEN < 1, 1);
  PTEN := fraction_PTEN;
  fraction_INPP4 := piecewise(0, mode_INPP4 < 1, 1);
  INPP4AB := fraction_INPP4;
  fraction_SHIP2 := piecewise(0, mode_SHIP2 < 1, 1);
  SHIP2 := fraction_SHIP2;
  fraction_X := piecewise(partial_X, mode_X < 1, 1);
  X := fraction_X;
  PI_3_4_P2_total := PI_3_4_P2_BG + PI_3_4_P2;
  PI_3_4_5_P3_total := PI_3_4_5_P3_BG + PI_3_4_5_P3;

  // Reactions:
  // Lumped reaction including EGF binding to EGFR, EGFR dimerisation, and EGFR phosphorylation.
  EGF_binding: 2 EGFR + 2 EGF -> EGFR_P; cell*(EGF_binding_k1*EGFR^2*EGF^2 - k2*EGFR_P);  // hasPart GO:0005154; isPartOf GO:0042058
    EGF_binding_k1 = 620.385; k2 = 0;
  // Removal of phosphorylated EGFR from the membrane, shutting down PI3K activation.
  EGFR_internalization: EGFR_P => ; cell*EGFR_internalization_k1*EGFR_P;  // isVersionOf GO:0042059
    EGFR_internalization_k1 = 0.13297;
  // Phosphorylation of PI(4,5)P2 in 3 by class I PI3 kinase
  PI_4_5_P2_to_PI_3_4_5_P3_by_PI3K: $PI_4_5_P2 => PI_3_4_5_P3; cell*AA_MassAction_withEnzyme(PI3Keff1, PI_4_5_P2_to_PI_3_4_5_P3_by_PI3K_kmax, PI_4_5_P2); PI_4_5_P2_to_PI_3_4_5_P3_by_PI3K is "PI(4,5)P2 to PI(3,4,5)P3 by PI3K";  // modifiers: PI3Keff1; isVersionOf GO:0046854
    PI_4_5_P2_to_PI_3_4_5_P3_by_PI3K_kmax = 1;
  // Dephosphorylation of PI(3,4,5)P3 in 3 by PTEN
  PI_3_4_5_P3_to_PI_4_5_P2_by_PTEN: PI_3_4_5_P3 => $PI_4_5_P2; cell*AA_MassAction_withEnzyme(PTEN, PI_3_4_5_P3_to_PI_4_5_P2_by_PTEN_kmax, PI_3_4_5_P3); PI_3_4_5_P3_to_PI_4_5_P2_by_PTEN is "PI(3,4,5)P3 to PI(4,5)P2 by PTEN";  // modifiers: PTEN; isVersionOf GO:0046856
    PI_3_4_5_P3_to_PI_4_5_P2_by_PTEN_kmax = 0.133003;
  // Dephosphorylation of PI(3,4,5)P3 in 5 by SHIP2
  PI_3_4_5_P3_to_PI_3_4_P2_by_SHIP2: PI_3_4_5_P3 => PI_3_4_P2; cell*AA_MassAction_withEnzyme(SHIP2, PI_3_4_5_P3_to_PI_3_4_P2_by_SHIP2_kmax, PI_3_4_5_P3); PI_3_4_5_P3_to_PI_3_4_P2_by_SHIP2 is "PI(3,4,5)P3 to PI(3,4)P2 by SHIP2";  // modifiers: SHIP2; rhea:25531; isVersionOf GO:0046856; isVersionOf kegg.reaction:R09827
    PI_3_4_5_P3_to_PI_3_4_P2_by_SHIP2_kmax = 0.11987;
  // Dephosphorylation of PI(3,4)P2 in 4 by INPP4
  PI_3_4_P2_to_PI_3_P_by_INPP4: PI_3_4_P2 => PI_3_P; cell*AA_MassAction_withEnzyme(INPP4AB, PI_3_4_P2_to_PI_3_P_by_INPP4_kmax, PI_3_4_P2); PI_3_4_P2_to_PI_3_P_by_INPP4 is "PI(3,4)P2 to PI(3)P by INPP4";  // modifiers: INPP4AB; isVersionOf CHEBI:16618
    PI_3_4_P2_to_PI_3_P_by_INPP4_kmax = 0.0687371;
  // Dephosphorylation of PI(3,4)P2 in 3 by PTEN
  PI_3_4_P2_to_PI_4_P_by__PTEN: PI_3_4_P2 => PI_4_P; cell*AA_MassAction_withEnzyme(PTEN, PI_3_4_P2_to_PI_4_P_by__PTEN_kmax, PI_3_4_P2); PI_3_4_P2_to_PI_4_P_by__PTEN is "PI(3,4)P2 to PI(4)P by PTEN";  // modifiers: PTEN; isVersionOf CHEBI:16618
    PI_3_4_P2_to_PI_4_P_by__PTEN_kmax = 0.0968116;
  // Dephosphorylation of PI(3,4,5)P3 in 5 by an unspecified 5-phosphatase, lumping activity of SHIP1, SYNJ1-2, 5F, 5B
  PI_3_4_5_P3_to__PI_3_4_P2__by_X: PI_3_4_5_P3 => PI_3_4_P2; cell*AA_MassAction_withEnzyme(X, PI_3_4_5_P3_to__PI_3_4_P2__by_X_kmax, PI_3_4_5_P3); PI_3_4_5_P3_to__PI_3_4_P2__by_X is "PI(3,4,5)P3 to PI(3,4)P2 by X";  // modifiers: X; rhea:25531; isVersionOf GO:0046856; isVersionOf kegg.reaction:R09827
    PI_3_4_5_P3_to__PI_3_4_P2__by_X_kmax = 0.0447312;
  // Diffusion of the PI3K inhibitor in the cell, enabling the inhibition.
  PI_103_diffusion: PI_103_ext => PI_103_int; cell*AA_MassAction_withEnzyme(mode_PI_103_diff, PI_103_diffusion_kmax, PI_103_ext); PI_103_diffusion is "PI-103 diffusion";  // modifiers: mode_PI_103_diff
    PI_103_diffusion_kmax = 5.56e-5;
  // Dephosphorylation of PI(3,4)P2 by an unspecified phosphatase.
  PI_3_4_P2_to_PI_Y_P_by_Y: PI_3_4_P2 => PI_Y_P; cell*AA_MassAction_withEnzyme(Y, PI_3_4_P2_to_PI_Y_P_by_Y_kmax, PI_3_4_P2); PI_3_4_P2_to_PI_Y_P_by_Y is "PI(3,4)P2 to PI(Y)P by Y";  // modifiers: Y; isVersionOf GO:0046856
    PI_3_4_P2_to_PI_Y_P_by_Y_kmax = 0.00624926;

  // Events:
  // Beginning of EGF signalling
  activation_start: at (time > activation_time): EGF = Initial_for_EGF_sig;
  // Beginning of PI3K inhibition
  inhibition_start: at ((time > inhibition_time) && (mode_PI_103 == 1)): mode_PI_103_diff = 1;

  // Unit definitions:
  unit substance = 1e-6 mole;
end
