// SBML level 3 version 1

function Function_for_v_85(AKT_activation_pEGFR, AKT_activation_pErbB12, AKT_activation_pErbB13, AKT_activation_pErbB32, AKT_activation_pIGF1R, AKT_activation_pMetEGFR, AKT_activation_pMetErbB3, AKT_activation_pMetd, AKT_internIGF1R_effect, EGFR_ErbB2_basal_act, EGFR_ErbB3_basal_act, EGFR_basal_activation, ErbB3_ErbB2_basal_act, IGF1R_basal_activation, MEK, MEK_phosphorylation_pMetErbB3, Met_EGFR_basal_act, Met_ErbB3_basal_act, Met_basal_act, feedback_pAKT, feedback_pERK, feedback_pERK_on_AKT, feedback_pS6K1, init_AKT, init_EGFR, init_ErbB2, init_ErbB3, init_IGF1R, init_Met, init_RTKph, init_pERK, init_pS6K1, pAKT_deactivation, pEGFR_internalize, pERK, pErbB12_internalize, pErbB13_internalize, pErbB32_internalize, pIGF1R_degradation, pIGF1R_internalize, pIGF1Ri_phosphatase, pMetEGFR_internalize, pMetErbB3, pMetErbB3_internalize, pMet_internalize)
  MEK*MEK_phosphorylation_pMetErbB3*pMetErbB3/(feedback_pERK*pERK + feedback_pAKT*init_AKT*(AKT_activation_pEGFR*EGFR_basal_activation*init_EGFR^2/pEGFR_internalize + AKT_activation_pIGF1R*IGF1R_basal_activation*init_IGF1R^2/pIGF1R_internalize + AKT_activation_pMetd*Met_basal_act*init_Met^2/pMet_internalize + AKT_activation_pIGF1R*AKT_internIGF1R_effect*IGF1R_basal_activation*init_IGF1R^2/(pIGF1R_degradation + init_RTKph*pIGF1Ri_phosphatase) + AKT_activation_pErbB12*EGFR_ErbB2_basal_act*init_EGFR*init_ErbB2/pErbB12_internalize + AKT_activation_pErbB13*EGFR_ErbB3_basal_act*init_EGFR*init_ErbB3/pErbB13_internalize + AKT_activation_pErbB32*ErbB3_ErbB2_basal_act*init_ErbB2*init_ErbB3/pErbB32_internalize + AKT_activation_pMetEGFR*Met_EGFR_basal_act*init_EGFR*init_Met/pMetEGFR_internalize + AKT_activation_pMetErbB3*Met_ErbB3_basal_act*init_Met*init_ErbB3/pMetErbB3_internalize)/(pAKT_deactivation*(feedback_pS6K1*init_pS6K1 + feedback_pERK_on_AKT*init_pERK + 1)) + 1);
end

function Function_for_v_12(HGF_kD, Met_HGF, Met_lig_binding)
  HGF_kD*Met_HGF*Met_lig_binding;
end

function Function_for_v_79(AKT_activation_pEGFR, AKT_activation_pErbB12, AKT_activation_pErbB13, AKT_activation_pErbB32, AKT_activation_pIGF1R, AKT_activation_pMetEGFR, AKT_activation_pMetErbB3, AKT_activation_pMetd, AKT_internIGF1R_effect, EGFR_ErbB2_basal_act, EGFR_ErbB3_basal_act, EGFR_basal_activation, ErbB3_ErbB2_basal_act, IGF1R_basal_activation, MEK, MEK_phosphorylation_pErbB12, Met_EGFR_basal_act, Met_ErbB3_basal_act, Met_basal_act, feedback_pAKT, feedback_pERK, feedback_pERK_on_AKT, feedback_pS6K1, init_AKT, init_EGFR, init_ErbB2, init_ErbB3, init_IGF1R, init_Met, init_RTKph, init_pERK, init_pS6K1, pAKT_deactivation, pEGFR_internalize, pERK, pErbB12, pErbB12_internalize, pErbB13_internalize, pErbB32_internalize, pIGF1R_degradation, pIGF1R_internalize, pIGF1Ri_phosphatase, pMetEGFR_internalize, pMetErbB3_internalize, pMet_internalize)
  MEK*MEK_phosphorylation_pErbB12*pErbB12/(feedback_pERK*pERK + feedback_pAKT*init_AKT*(AKT_activation_pEGFR*EGFR_basal_activation*init_EGFR^2/pEGFR_internalize + AKT_activation_pIGF1R*IGF1R_basal_activation*init_IGF1R^2/pIGF1R_internalize + AKT_activation_pMetd*Met_basal_act*init_Met^2/pMet_internalize + AKT_activation_pIGF1R*AKT_internIGF1R_effect*IGF1R_basal_activation*init_IGF1R^2/(pIGF1R_degradation + init_RTKph*pIGF1Ri_phosphatase) + AKT_activation_pErbB12*EGFR_ErbB2_basal_act*init_EGFR*init_ErbB2/pErbB12_internalize + AKT_activation_pErbB13*EGFR_ErbB3_basal_act*init_EGFR*init_ErbB3/pErbB13_internalize + AKT_activation_pErbB32*ErbB3_ErbB2_basal_act*init_ErbB2*init_ErbB3/pErbB32_internalize + AKT_activation_pMetEGFR*Met_EGFR_basal_act*init_EGFR*init_Met/pMetEGFR_internalize + AKT_activation_pMetErbB3*Met_ErbB3_basal_act*init_Met*init_ErbB3/pMetErbB3_internalize)/(pAKT_deactivation*(feedback_pS6K1*init_pS6K1 + feedback_pERK_on_AKT*init_pERK + 1)) + 1);
end

function Function_for_v_0(EGFR_ErbB2_basal_act, EGFR_ErbB3_basal_act, EGFR_basal_activation, Met_EGFR_basal_act, init_EGFR, init_ErbB3, init_Met, init_RTKph, pEGFR_degradation, pEGFR_phosphatase_binding, pErbB12_degradation, pErbB12i_phosphatase, pErbB13_degradation, pErbB13i_phosphatase, pMetEGFR_degradation, pMetEGFRi_phosphatase)
  2*EGFR_basal_activation*init_EGFR^2*pEGFR_degradation/(pEGFR_degradation + init_RTKph*pEGFR_phosphatase_binding) + EGFR_ErbB2_basal_act*init_EGFR*pErbB12_degradation/(pErbB12_degradation + init_RTKph*pErbB12i_phosphatase) + EGFR_ErbB3_basal_act*init_EGFR*init_ErbB3*pErbB13_degradation/(pErbB13_degradation + init_RTKph*pErbB13i_phosphatase) + Met_EGFR_basal_act*init_EGFR*init_Met*pMetEGFR_degradation/(pMetEGFR_degradation + init_RTKph*pMetEGFRi_phosphatase);
end

function Function_for_v_95(AKT, AKT_activation_pMetd, feedback_pERK_on_AKT, feedback_pS6K1, pERK, pMetd, pS6K1)
  AKT*AKT_activation_pMetd*pMetd/(feedback_pERK_on_AKT*pERK + feedback_pS6K1*pS6K1 + 1);
end

function Function_for_v_88(ERK, ERK_phosphorylation_pMEK, pMEK)
  ERK*ERK_phosphorylation_pMEK*pMEK;
end

function Function_for_v_92(AKT, AKT_activation_pErbB13, feedback_pERK_on_AKT, feedback_pS6K1, pERK, pErbB13, pS6K1)
  AKT*AKT_activation_pErbB13*pErbB13/(feedback_pERK_on_AKT*pERK + feedback_pS6K1*pS6K1 + 1);
end

function Function_for_v_96(AKT, AKT_activation_pIGF1R, feedback_pERK_on_AKT, feedback_pS6K1, pERK, pIGF1Rd, pS6K1)
  AKT*AKT_activation_pIGF1R*pIGF1Rd/(feedback_pERK_on_AKT*pERK + feedback_pS6K1*pS6K1 + 1);
end

function Function_for_v_1(EGFR_ErbB2_basal_act, ErbB2_dimerize, ErbB3_ErbB2_basal_act, init_EGFR, init_ErbB2, init_ErbB3, init_RTKph, pErbB12_degradation, pErbB12i_phosphatase, pErbB2_degradation, pErbB2i_phosphatase, pErbB32_degradation, pErbB32i_phosphatase)
  2*ErbB2_dimerize*init_ErbB2^2*pErbB2_degradation/(pErbB2_degradation + init_RTKph*pErbB2i_phosphatase) + EGFR_ErbB2_basal_act*init_EGFR*init_ErbB2*pErbB12_degradation/(pErbB12_degradation + init_RTKph*pErbB12i_phosphatase) + ErbB3_ErbB2_basal_act*init_ErbB2*init_ErbB3*pErbB32_degradation/(pErbB32_degradation + init_RTKph*pErbB32i_phosphatase);
end

function Function_for_v_83(AKT_activation_pEGFR, AKT_activation_pErbB12, AKT_activation_pErbB13, AKT_activation_pErbB32, AKT_activation_pIGF1R, AKT_activation_pMetEGFR, AKT_activation_pMetErbB3, AKT_activation_pMetd, AKT_internIGF1R_effect, EGFR_ErbB2_basal_act, EGFR_ErbB3_basal_act, EGFR_basal_activation, ErbB3_ErbB2_basal_act, IGF1R_basal_activation, MEK, MEK_phosphorylation_pMetEGFR, Met_EGFR_basal_act, Met_ErbB3_basal_act, Met_basal_act, feedback_pAKT, feedback_pERK, feedback_pERK_on_AKT, feedback_pS6K1, init_AKT, init_EGFR, init_ErbB2, init_ErbB3, init_IGF1R, init_Met, init_RTKph, init_pERK, init_pS6K1, pAKT_deactivation, pEGFR_internalize, pERK, pErbB12_internalize, pErbB13_internalize, pErbB32_internalize, pIGF1R_degradation, pIGF1R_internalize, pIGF1Ri_phosphatase, pMetEGFR, pMetEGFR_internalize, pMetErbB3_internalize, pMet_internalize)
  MEK*MEK_phosphorylation_pMetEGFR*pMetEGFR/(feedback_pERK*pERK + feedback_pAKT*init_AKT*(AKT_activation_pEGFR*EGFR_basal_activation*init_EGFR^2/pEGFR_internalize + AKT_activation_pIGF1R*IGF1R_basal_activation*init_IGF1R^2/pIGF1R_internalize + AKT_activation_pMetd*Met_basal_act*init_Met^2/pMet_internalize + AKT_activation_pIGF1R*AKT_internIGF1R_effect*IGF1R_basal_activation*init_IGF1R^2/(pIGF1R_degradation + init_RTKph*pIGF1Ri_phosphatase) + AKT_activation_pErbB12*EGFR_ErbB2_basal_act*init_EGFR*init_ErbB2/pErbB12_internalize + AKT_activation_pErbB13*EGFR_ErbB3_basal_act*init_EGFR*init_ErbB3/pErbB13_internalize + AKT_activation_pErbB32*ErbB3_ErbB2_basal_act*init_ErbB2*init_ErbB3/pErbB32_internalize + AKT_activation_pMetEGFR*Met_EGFR_basal_act*init_EGFR*init_Met/pMetEGFR_internalize + AKT_activation_pMetErbB3*Met_ErbB3_basal_act*init_Met*init_ErbB3/pMetErbB3_internalize)/(pAKT_deactivation*(feedback_pS6K1*init_pS6K1 + feedback_pERK_on_AKT*init_pERK + 1)) + 1);
end

function Function_for_v_100(S6K1, S6K1_phosphorylation_pAKT, pAKT)
  S6K1*S6K1_phosphorylation_pAKT*pAKT;
end

function Function_for_v_86(AKT_activation_pEGFR, AKT_activation_pErbB12, AKT_activation_pErbB13, AKT_activation_pErbB32, AKT_activation_pIGF1R, AKT_activation_pMetEGFR, AKT_activation_pMetErbB3, AKT_activation_pMetd, AKT_internIGF1R_effect, EGFR_ErbB2_basal_act, EGFR_ErbB3_basal_act, EGFR_basal_activation, ErbB3_ErbB2_basal_act, IGF1R_basal_activation, MEK, MEK_internIGF1R_effect, MEK_phosphorylation_pIGF1R, Met_EGFR_basal_act, Met_ErbB3_basal_act, Met_basal_act, feedback_pAKT, feedback_pERK, feedback_pERK_on_AKT, feedback_pS6K1, init_AKT, init_EGFR, init_ErbB2, init_ErbB3, init_IGF1R, init_Met, init_RTKph, init_pERK, init_pS6K1, pAKT_deactivation, pEGFR_internalize, pERK, pErbB12_internalize, pErbB13_internalize, pErbB32_internalize, pIGF1R_degradation, pIGF1R_internalize, pIGF1Ri, pIGF1Ri_phosphatase, pMetEGFR_internalize, pMetErbB3_internalize, pMet_internalize)
  MEK*MEK_internIGF1R_effect*MEK_phosphorylation_pIGF1R*pIGF1Ri/(feedback_pERK*pERK + feedback_pAKT*init_AKT*(AKT_activation_pEGFR*EGFR_basal_activation*init_EGFR^2/pEGFR_internalize + AKT_activation_pIGF1R*IGF1R_basal_activation*init_IGF1R^2/pIGF1R_internalize + AKT_activation_pMetd*Met_basal_act*init_Met^2/pMet_internalize + AKT_activation_pIGF1R*AKT_internIGF1R_effect*IGF1R_basal_activation*init_IGF1R^2/(pIGF1R_degradation + init_RTKph*pIGF1Ri_phosphatase) + AKT_activation_pErbB12*EGFR_ErbB2_basal_act*init_EGFR*init_ErbB2/pErbB12_internalize + AKT_activation_pErbB13*EGFR_ErbB3_basal_act*init_EGFR*init_ErbB3/pErbB13_internalize + AKT_activation_pErbB32*ErbB3_ErbB2_basal_act*init_ErbB2*init_ErbB3/pErbB32_internalize + AKT_activation_pMetEGFR*Met_EGFR_basal_act*init_EGFR*init_Met/pMetEGFR_internalize + AKT_activation_pMetErbB3*Met_ErbB3_basal_act*init_Met*init_ErbB3/pMetErbB3_internalize)/(pAKT_deactivation*(feedback_pS6K1*init_pS6K1 + feedback_pERK_on_AKT*init_pERK + 1)) + 1);
end

function Function_for_v_90(AKT, AKT_activation_pEGFR, feedback_pERK_on_AKT, feedback_pS6K1, pEGFRd, pERK, pS6K1)
  AKT*AKT_activation_pEGFR*pEGFRd/(feedback_pERK_on_AKT*pERK + feedback_pS6K1*pS6K1 + 1);
end

function Function_for_v_97(AKT, AKT_activation_pMetErbB3, feedback_pERK_on_AKT, feedback_pS6K1, pERK, pMetErbB3, pS6K1)
  AKT*AKT_activation_pMetErbB3*pMetErbB3/(feedback_pERK_on_AKT*pERK + feedback_pS6K1*pS6K1 + 1);
end

function Function_for_v_6(EGFR_EGF, EGFR_lig_binding, EGF_kD)
  EGF_kD*EGFR_EGF*EGFR_lig_binding;
end

function Function_for_v_8(ErbB3_HRG, ErbB3_lig_binding, HRG_kD)
  ErbB3_HRG*ErbB3_lig_binding*HRG_kD;
end

function Function_for_v_10(IGF1R_IGF1, IGF1R_lig_binding, IGF1_kD)
  IGF1_kD*IGF1R_IGF1*IGF1R_lig_binding;
end

function Function_for_v_78(AKT_activation_pEGFR, AKT_activation_pErbB12, AKT_activation_pErbB13, AKT_activation_pErbB32, AKT_activation_pIGF1R, AKT_activation_pMetEGFR, AKT_activation_pMetErbB3, AKT_activation_pMetd, AKT_internIGF1R_effect, EGFR_ErbB2_basal_act, EGFR_ErbB3_basal_act, EGFR_basal_activation, ErbB3_ErbB2_basal_act, IGF1R_basal_activation, MEK, MEK_phosphorylation_pEGFR, Met_EGFR_basal_act, Met_ErbB3_basal_act, Met_basal_act, feedback_pAKT, feedback_pERK, feedback_pERK_on_AKT, feedback_pS6K1, init_AKT, init_EGFR, init_ErbB2, init_ErbB3, init_IGF1R, init_Met, init_RTKph, init_pERK, init_pS6K1, pAKT_deactivation, pEGFR_internalize, pEGFRd, pERK, pErbB12_internalize, pErbB13_internalize, pErbB32_internalize, pIGF1R_degradation, pIGF1R_internalize, pIGF1Ri_phosphatase, pMetEGFR_internalize, pMetErbB3_internalize, pMet_internalize)
  MEK*MEK_phosphorylation_pEGFR*pEGFRd/(feedback_pERK*pERK + feedback_pAKT*init_AKT*(AKT_activation_pEGFR*EGFR_basal_activation*init_EGFR^2/pEGFR_internalize + AKT_activation_pIGF1R*IGF1R_basal_activation*init_IGF1R^2/pIGF1R_internalize + AKT_activation_pMetd*Met_basal_act*init_Met^2/pMet_internalize + AKT_activation_pIGF1R*AKT_internIGF1R_effect*IGF1R_basal_activation*init_IGF1R^2/(pIGF1R_degradation + init_RTKph*pIGF1Ri_phosphatase) + AKT_activation_pErbB12*EGFR_ErbB2_basal_act*init_EGFR*init_ErbB2/pErbB12_internalize + AKT_activation_pErbB13*EGFR_ErbB3_basal_act*init_EGFR*init_ErbB3/pErbB13_internalize + AKT_activation_pErbB32*ErbB3_ErbB2_basal_act*init_ErbB2*init_ErbB3/pErbB32_internalize + AKT_activation_pMetEGFR*Met_EGFR_basal_act*init_EGFR*init_Met/pMetEGFR_internalize + AKT_activation_pMetErbB3*Met_ErbB3_basal_act*init_Met*init_ErbB3/pMetErbB3_internalize)/(pAKT_deactivation*(feedback_pS6K1*init_pS6K1 + feedback_pERK_on_AKT*init_pERK + 1)) + 1);
end

function Function_for_v_81(AKT_activation_pEGFR, AKT_activation_pErbB12, AKT_activation_pErbB13, AKT_activation_pErbB32, AKT_activation_pIGF1R, AKT_activation_pMetEGFR, AKT_activation_pMetErbB3, AKT_activation_pMetd, AKT_internIGF1R_effect, EGFR_ErbB2_basal_act, EGFR_ErbB3_basal_act, EGFR_basal_activation, ErbB3_ErbB2_basal_act, IGF1R_basal_activation, MEK, MEK_phosphorylation_pErbB32, Met_EGFR_basal_act, Met_ErbB3_basal_act, Met_basal_act, feedback_pAKT, feedback_pERK, feedback_pERK_on_AKT, feedback_pS6K1, init_AKT, init_EGFR, init_ErbB2, init_ErbB3, init_IGF1R, init_Met, init_RTKph, init_pERK, init_pS6K1, pAKT_deactivation, pEGFR_internalize, pERK, pErbB12_internalize, pErbB13_internalize, pErbB32, pErbB32_internalize, pIGF1R_degradation, pIGF1R_internalize, pIGF1Ri_phosphatase, pMetEGFR_internalize, pMetErbB3_internalize, pMet_internalize)
  MEK*MEK_phosphorylation_pErbB32*pErbB32/(feedback_pERK*pERK + feedback_pAKT*init_AKT*(AKT_activation_pEGFR*EGFR_basal_activation*init_EGFR^2/pEGFR_internalize + AKT_activation_pIGF1R*IGF1R_basal_activation*init_IGF1R^2/pIGF1R_internalize + AKT_activation_pMetd*Met_basal_act*init_Met^2/pMet_internalize + AKT_activation_pIGF1R*AKT_internIGF1R_effect*IGF1R_basal_activation*init_IGF1R^2/(pIGF1R_degradation + init_RTKph*pIGF1Ri_phosphatase) + AKT_activation_pErbB12*EGFR_ErbB2_basal_act*init_EGFR*init_ErbB2/pErbB12_internalize + AKT_activation_pErbB13*EGFR_ErbB3_basal_act*init_EGFR*init_ErbB3/pErbB13_internalize + AKT_activation_pErbB32*ErbB3_ErbB2_basal_act*init_ErbB2*init_ErbB3/pErbB32_internalize + AKT_activation_pMetEGFR*Met_EGFR_basal_act*init_EGFR*init_Met/pMetEGFR_internalize + AKT_activation_pMetErbB3*Met_ErbB3_basal_act*init_Met*init_ErbB3/pMetErbB3_internalize)/(pAKT_deactivation*(feedback_pS6K1*init_pS6K1 + feedback_pERK_on_AKT*init_pERK + 1)) + 1);
end

function Function_for_v_2(EGFR_ErbB3_basal_act, ErbB3_ErbB2_basal_act, ErbB3_basal_activation, Met_ErbB3_basal_act, init_EGFR, init_ErbB2, init_ErbB3, init_Met, init_RTKph, pErbB13_degradation, pErbB13i_phosphatase, pErbB32_degradation, pErbB32i_phosphatase, pErbB3_degradation, pErbB3i_phosphatase, pMetErbB3_degradation, pMetErbB3i_phosphatase)
  2*ErbB3_basal_activation*init_ErbB3^2*pErbB3_degradation/(pErbB3_degradation + init_RTKph*pErbB3i_phosphatase) + EGFR_ErbB3_basal_act*init_EGFR*init_ErbB3*pErbB13_degradation/(pErbB13_degradation + init_RTKph*pErbB13i_phosphatase) + ErbB3_ErbB2_basal_act*init_ErbB2*init_ErbB3*pErbB32_degradation/(pErbB32_degradation + init_RTKph*pErbB32i_phosphatase) + Met_ErbB3_basal_act*init_Met*init_ErbB3*pMetErbB3_degradation/(pMetErbB3_degradation + init_RTKph*pMetErbB3i_phosphatase);
end

function Function_for_v_3(IGF1R_basal_activation, init_IGF1R, init_RTKph, pIGF1R_degradation, pIGF1Ri_phosphatase)
  2*IGF1R_basal_activation*init_IGF1R^2*pIGF1R_degradation/(pIGF1R_degradation + init_RTKph*pIGF1Ri_phosphatase);
end

function Function_for_v_103(S6, S6_phosphorylation_pS6K1, pS6K1)
  S6*S6_phosphorylation_pS6K1*pS6K1;
end

function Function_for_v_104(S6, S6_phosphorylation_pERK, pERK)
  S6*S6_phosphorylation_pERK*pERK;
end

function Function_for_v_84(AKT_activation_pEGFR, AKT_activation_pErbB12, AKT_activation_pErbB13, AKT_activation_pErbB32, AKT_activation_pIGF1R, AKT_activation_pMetEGFR, AKT_activation_pMetErbB3, AKT_activation_pMetd, AKT_internIGF1R_effect, EGFR_ErbB2_basal_act, EGFR_ErbB3_basal_act, EGFR_basal_activation, ErbB3_ErbB2_basal_act, IGF1R_basal_activation, MEK, MEK_phosphorylation_pIGF1R, Met_EGFR_basal_act, Met_ErbB3_basal_act, Met_basal_act, feedback_pAKT, feedback_pERK, feedback_pERK_on_AKT, feedback_pS6K1, init_AKT, init_EGFR, init_ErbB2, init_ErbB3, init_IGF1R, init_Met, init_RTKph, init_pERK, init_pS6K1, pAKT_deactivation, pEGFR_internalize, pERK, pErbB12_internalize, pErbB13_internalize, pErbB32_internalize, pIGF1R_degradation, pIGF1R_internalize, pIGF1Rd, pIGF1Ri_phosphatase, pMetEGFR_internalize, pMetErbB3_internalize, pMet_internalize)
  MEK*MEK_phosphorylation_pIGF1R*pIGF1Rd/(feedback_pERK*pERK + feedback_pAKT*init_AKT*(AKT_activation_pEGFR*EGFR_basal_activation*init_EGFR^2/pEGFR_internalize + AKT_activation_pIGF1R*IGF1R_basal_activation*init_IGF1R^2/pIGF1R_internalize + AKT_activation_pMetd*Met_basal_act*init_Met^2/pMet_internalize + AKT_activation_pIGF1R*AKT_internIGF1R_effect*IGF1R_basal_activation*init_IGF1R^2/(pIGF1R_degradation + init_RTKph*pIGF1Ri_phosphatase) + AKT_activation_pErbB12*EGFR_ErbB2_basal_act*init_EGFR*init_ErbB2/pErbB12_internalize + AKT_activation_pErbB13*EGFR_ErbB3_basal_act*init_EGFR*init_ErbB3/pErbB13_internalize + AKT_activation_pErbB32*ErbB3_ErbB2_basal_act*init_ErbB2*init_ErbB3/pErbB32_internalize + AKT_activation_pMetEGFR*Met_EGFR_basal_act*init_EGFR*init_Met/pMetEGFR_internalize + AKT_activation_pMetErbB3*Met_ErbB3_basal_act*init_Met*init_ErbB3/pMetErbB3_internalize)/(pAKT_deactivation*(feedback_pS6K1*init_pS6K1 + feedback_pERK_on_AKT*init_pERK + 1)) + 1);
end

function Function_for_v_4(Met_EGFR_basal_act, Met_ErbB3_basal_act, Met_basal_act, init_EGFR, init_ErbB3, init_Met, init_RTKph, pMetEGFR_degradation, pMetEGFRi_phosphatase, pMetErbB3_degradation, pMetErbB3i_phosphatase, pMet_degradation, pMeti_phosphatase)
  2*Met_basal_act*init_Met^2*pMet_degradation/(pMet_degradation + init_RTKph*pMeti_phosphatase) + Met_EGFR_basal_act*init_EGFR*init_Met*pMetEGFR_degradation/(pMetEGFR_degradation + init_RTKph*pMetEGFRi_phosphatase) + Met_ErbB3_basal_act*init_Met*init_ErbB3*pMetErbB3_degradation/(pMetErbB3_degradation + init_RTKph*pMetErbB3i_phosphatase);
end

function Function_for_v_91(AKT, AKT_activation_pErbB12, feedback_pERK_on_AKT, feedback_pS6K1, pERK, pErbB12, pS6K1)
  AKT*AKT_activation_pErbB12*pErbB12/(feedback_pERK_on_AKT*pERK + feedback_pS6K1*pS6K1 + 1);
end

function Function_for_v_101(S6K1, S6K1_phosphorylation_pERK, pERK)
  S6K1*S6K1_phosphorylation_pERK*pERK;
end

function Function_for_v_94(AKT, AKT_activation_pMetEGFR, feedback_pERK_on_AKT, feedback_pS6K1, pERK, pMetEGFR, pS6K1)
  AKT*AKT_activation_pMetEGFR*pMetEGFR/(feedback_pERK_on_AKT*pERK + feedback_pS6K1*pS6K1 + 1);
end

function Function_for_v_98(AKT, AKT_activation_pIGF1R, AKT_internIGF1R_effect, feedback_pERK_on_AKT, feedback_pS6K1, pERK, pIGF1Ri, pS6K1)
  AKT*AKT_activation_pIGF1R*AKT_internIGF1R_effect*pIGF1Ri/(feedback_pERK_on_AKT*pERK + feedback_pS6K1*pS6K1 + 1);
end

function Function_for_v_93(AKT, AKT_activation_pErbB32, feedback_pERK_on_AKT, feedback_pS6K1, pERK, pErbB32, pS6K1)
  AKT*AKT_activation_pErbB32*pErbB32/(feedback_pERK_on_AKT*pERK + feedback_pS6K1*pS6K1 + 1);
end

function Function_for_v_82(AKT_activation_pEGFR, AKT_activation_pErbB12, AKT_activation_pErbB13, AKT_activation_pErbB32, AKT_activation_pIGF1R, AKT_activation_pMetEGFR, AKT_activation_pMetErbB3, AKT_activation_pMetd, AKT_internIGF1R_effect, EGFR_ErbB2_basal_act, EGFR_ErbB3_basal_act, EGFR_basal_activation, ErbB3_ErbB2_basal_act, IGF1R_basal_activation, MEK, MEK_phosphorylation_pMetd, Met_EGFR_basal_act, Met_ErbB3_basal_act, Met_basal_act, feedback_pAKT, feedback_pERK, feedback_pERK_on_AKT, feedback_pS6K1, init_AKT, init_EGFR, init_ErbB2, init_ErbB3, init_IGF1R, init_Met, init_RTKph, init_pERK, init_pS6K1, pAKT_deactivation, pEGFR_internalize, pERK, pErbB12_internalize, pErbB13_internalize, pErbB32_internalize, pIGF1R_degradation, pIGF1R_internalize, pIGF1Ri_phosphatase, pMetEGFR_internalize, pMetErbB3_internalize, pMet_internalize, pMetd)
  MEK*MEK_phosphorylation_pMetd*pMetd/(feedback_pERK*pERK + feedback_pAKT*init_AKT*(AKT_activation_pEGFR*EGFR_basal_activation*init_EGFR^2/pEGFR_internalize + AKT_activation_pIGF1R*IGF1R_basal_activation*init_IGF1R^2/pIGF1R_internalize + AKT_activation_pMetd*Met_basal_act*init_Met^2/pMet_internalize + AKT_activation_pIGF1R*AKT_internIGF1R_effect*IGF1R_basal_activation*init_IGF1R^2/(pIGF1R_degradation + init_RTKph*pIGF1Ri_phosphatase) + AKT_activation_pErbB12*EGFR_ErbB2_basal_act*init_EGFR*init_ErbB2/pErbB12_internalize + AKT_activation_pErbB13*EGFR_ErbB3_basal_act*init_EGFR*init_ErbB3/pErbB13_internalize + AKT_activation_pErbB32*ErbB3_ErbB2_basal_act*init_ErbB2*init_ErbB3/pErbB32_internalize + AKT_activation_pMetEGFR*Met_EGFR_basal_act*init_EGFR*init_Met/pMetEGFR_internalize + AKT_activation_pMetErbB3*Met_ErbB3_basal_act*init_Met*init_ErbB3/pMetErbB3_internalize)/(pAKT_deactivation*(feedback_pS6K1*init_pS6K1 + feedback_pERK_on_AKT*init_pERK + 1)) + 1);
end

function Function_for_v_80(AKT_activation_pEGFR, AKT_activation_pErbB12, AKT_activation_pErbB13, AKT_activation_pErbB32, AKT_activation_pIGF1R, AKT_activation_pMetEGFR, AKT_activation_pMetErbB3, AKT_activation_pMetd, AKT_internIGF1R_effect, EGFR_ErbB2_basal_act, EGFR_ErbB3_basal_act, EGFR_basal_activation, ErbB3_ErbB2_basal_act, IGF1R_basal_activation, MEK, MEK_phosphorylation_pErbB13, Met_EGFR_basal_act, Met_ErbB3_basal_act, Met_basal_act, feedback_pAKT, feedback_pERK, feedback_pERK_on_AKT, feedback_pS6K1, init_AKT, init_EGFR, init_ErbB2, init_ErbB3, init_IGF1R, init_Met, init_RTKph, init_pERK, init_pS6K1, pAKT_deactivation, pEGFR_internalize, pERK, pErbB12_internalize, pErbB13, pErbB13_internalize, pErbB32_internalize, pIGF1R_degradation, pIGF1R_internalize, pIGF1Ri_phosphatase, pMetEGFR_internalize, pMetErbB3_internalize, pMet_internalize)
  MEK*MEK_phosphorylation_pErbB13*pErbB13/(feedback_pERK*pERK + feedback_pAKT*init_AKT*(AKT_activation_pEGFR*EGFR_basal_activation*init_EGFR^2/pEGFR_internalize + AKT_activation_pIGF1R*IGF1R_basal_activation*init_IGF1R^2/pIGF1R_internalize + AKT_activation_pMetd*Met_basal_act*init_Met^2/pMet_internalize + AKT_activation_pIGF1R*AKT_internIGF1R_effect*IGF1R_basal_activation*init_IGF1R^2/(pIGF1R_degradation + init_RTKph*pIGF1Ri_phosphatase) + AKT_activation_pErbB12*EGFR_ErbB2_basal_act*init_EGFR*init_ErbB2/pErbB12_internalize + AKT_activation_pErbB13*EGFR_ErbB3_basal_act*init_EGFR*init_ErbB3/pErbB13_internalize + AKT_activation_pErbB32*ErbB3_ErbB2_basal_act*init_ErbB2*init_ErbB3/pErbB32_internalize + AKT_activation_pMetEGFR*Met_EGFR_basal_act*init_EGFR*init_Met/pMetEGFR_internalize + AKT_activation_pMetErbB3*Met_ErbB3_basal_act*init_Met*init_ErbB3/pMetErbB3_internalize)/(pAKT_deactivation*(feedback_pS6K1*init_pS6K1 + feedback_pERK_on_AKT*init_pERK + 1)) + 1);
end

model RTKmodel_Met_qFACS_322M()
  // PanRTK model for single cell line
  // Hass2017-PanRTK model for single cell line
  // The model structure comprises heterodimerization and receptor trafficking as described in detail in the article below. For ligand input, set a respective event. The illustrated event sets the EGF concentration to 2.5 nMol in the model file.
  // This model is described in the article:
  // Predicting ligand-dependent tumors from multi-dimensional signaling features.
  // Hass H, Masson K, Wohlgemuth S, Paragas V, Allen JE, Sevecka M, Pace E, Timmer J, Stelling J, MacBeath G, Schoeberl B, Raue A.
  // NPJ Syst Biol Appl 2017; 3: 27
  // Abstract:
  // Targeted therapies have shown significant patient benefit in about 5-10% of solid tumors that are addicted to a single oncogene. Here, we explore the idea of ligand addiction as a driver of tumor growth. High ligand levels in tumors have been shown to be associated with impaired patient survival, but targeted therapies have not yet shown great benefit in unselected patient populations. Using an approach of applying Bagged Decision Trees (BDT) to high-dimensional signaling features derived from a computational model, we can predict ligand dependent proliferation across a set of 58 cell lines. This mechanistic, multi-pathway model that features receptor heterodimerization, was trained on seven cancer cell lines and can predict signaling across two independent cell lines by adjusting only the receptor expression levels for each cell line. Interestingly, for patient samples the predicted tumor growth response correlates with high growth factor expression in the tumor microenvironment, which argues for a co-evolution of both factors in vivo.
  // This model is hosted on BioModels Database and identified by: MODEL1708210000.
  // To cite BioModels Database, please use: Chelliah V et al. BioModels: ten-year anniversary. Nucl. Acids Res. 2015, 43(Database issue):D542-8.
  // To the extent possible under law, all copyright and related or neighbouring rights to this encoded model have been dedicated to the public domain worldwide. Please refer to CC0 Public Domain Dedication for more information.
  // biomodels.db:MODEL1708210000
  // hasProperty mamo:MAMO_0000046
  // hasTaxon taxonomy:9606
  // hasProperty ncit:C91436
  // model units - substance: substance, time: time, volume: volume, area: area, length: length, extent: substance

  // Compartments:
  compartment cyt = 1 volume;

  // Species:
  species dose_EGF in cyt = 0;
  species dose_HGF in cyt = 0;
  species RTKph in cyt = init_RTKph;
  species dose_IGF1 in cyt = 0;
  species dose_HRG in cyt = 0;
  species EGFR in cyt = init_EGFR;
  species EGFR_EGF in cyt = init_EGFR_EGF;
  species pEGFRd in cyt = EGFR_basal_activation*init_EGFR^2/pEGFR_internalize;
  species pEGFRi in cyt = EGFR_basal_activation*init_EGFR^2/(pEGFR_degradation + init_RTKph*pEGFR_phosphatase_binding);
  species pEGFRi_ph in cyt = EGFR_basal_activation*init_EGFR^2*init_RTKph*pEGFR_phosphatase_binding/(pEGFRi_dephosph*(pEGFR_degradation + init_RTKph*pEGFR_phosphatase_binding));
  species EGFRi in cyt = init_EGFR*init_RTKph*(EGFR_ErbB2_basal_act*init_ErbB2*pEGFR_degradation*pErbB13_degradation*pErbB12i_phosphatase*pMetEGFR_degradation + EGFR_ErbB3_basal_act*init_ErbB3*pEGFR_degradation*pErbB12_degradation*pErbB13i_phosphatase*pMetEGFR_degradation + 2*EGFR_basal_activation*init_EGFR*pEGFR_phosphatase_binding*pErbB12_degradation*pErbB13_degradation*pMetEGFR_degradation + Met_EGFR_basal_act*init_Met*pEGFR_degradation*pErbB12_degradation*pErbB13_degradation*pMetEGFRi_phosphatase + EGFR_ErbB2_basal_act*init_ErbB2*init_RTKph*pEGFR_degradation*pErbB13_degradation*pErbB12i_phosphatase*pMetEGFRi_phosphatase + EGFR_ErbB2_basal_act*init_ErbB2*init_RTKph*pEGFR_degradation*pErbB12i_phosphatase*pErbB13i_phosphatase*pMetEGFR_degradation + EGFR_ErbB3_basal_act*init_ErbB3*init_RTKph*pEGFR_degradation*pErbB12_degradation*pErbB13i_phosphatase*pMetEGFRi_phosphatase + EGFR_ErbB3_basal_act*init_ErbB3*init_RTKph*pEGFR_degradation*pErbB12i_phosphatase*pErbB13i_phosphatase*pMetEGFR_degradation + EGFR_ErbB2_basal_act*init_ErbB2*init_RTKph*pEGFR_phosphatase_binding*pErbB13_degradation*pErbB12i_phosphatase*pMetEGFR_degradation + EGFR_ErbB3_basal_act*init_ErbB3*init_RTKph*pEGFR_phosphatase_binding*pErbB12_degradation*pErbB13i_phosphatase*pMetEGFR_degradation + 2*EGFR_basal_activation*init_EGFR*init_RTKph*pEGFR_phosphatase_binding*pErbB12_degradation*pErbB13_degradation*pMetEGFRi_phosphatase + 2*EGFR_basal_activation*init_EGFR*init_RTKph*pEGFR_phosphatase_binding*pErbB12_degradation*pErbB13i_phosphatase*pMetEGFR_degradation + 2*EGFR_basal_activation*init_EGFR*init_RTKph*pEGFR_phosphatase_binding*pErbB13_degradation*pErbB12i_phosphatase*pMetEGFR_degradation + Met_EGFR_basal_act*init_Met*init_RTKph*pEGFR_degradation*pErbB12_degradation*pErbB13i_phosphatase*pMetEGFRi_phosphatase + Met_EGFR_basal_act*init_Met*init_RTKph*pEGFR_degradation*pErbB13_degradation*pErbB12i_phosphatase*pMetEGFRi_phosphatase + Met_EGFR_basal_act*init_Met*init_RTKph*pEGFR_phosphatase_binding*pErbB12_degradation*pErbB13_degradation*pMetEGFRi_phosphatase + EGFR_ErbB2_basal_act*init_ErbB2*init_RTKph^2*pEGFR_degradation*pErbB12i_phosphatase*pErbB13i_phosphatase*pMetEGFRi_phosphatase + EGFR_ErbB3_basal_act*init_ErbB3*init_RTKph^2*pEGFR_degradation*pErbB12i_phosphatase*pErbB13i_phosphatase*pMetEGFRi_phosphatase + EGFR_ErbB2_basal_act*init_ErbB2*init_RTKph^2*pEGFR_phosphatase_binding*pErbB13_degradation*pErbB12i_phosphatase*pMetEGFRi_phosphatase + EGFR_ErbB2_basal_act*init_ErbB2*init_RTKph^2*pEGFR_phosphatase_binding*pErbB12i_phosphatase*pErbB13i_phosphatase*pMetEGFR_degradation + EGFR_ErbB3_basal_act*init_ErbB3*init_RTKph^2*pEGFR_phosphatase_binding*pErbB12_degradation*pErbB13i_phosphatase*pMetEGFRi_phosphatase + EGFR_ErbB3_basal_act*init_ErbB3*init_RTKph^2*pEGFR_phosphatase_binding*pErbB12i_phosphatase*pErbB13i_phosphatase*pMetEGFR_degradation + EGFR_ErbB2_basal_act*init_ErbB2*init_RTKph^3*pEGFR_phosphatase_binding*pErbB12i_phosphatase*pErbB13i_phosphatase*pMetEGFRi_phosphatase + EGFR_ErbB3_basal_act*init_ErbB3*init_RTKph^3*pEGFR_phosphatase_binding*pErbB12i_phosphatase*pErbB13i_phosphatase*pMetEGFRi_phosphatase + 2*EGFR_basal_activation*init_EGFR*init_RTKph^2*pEGFR_phosphatase_binding*pErbB12_degradation*pErbB13i_phosphatase*pMetEGFRi_phosphatase + 2*EGFR_basal_activation*init_EGFR*init_RTKph^2*pEGFR_phosphatase_binding*pErbB13_degradation*pErbB12i_phosphatase*pMetEGFRi_phosphatase + 2*EGFR_basal_activation*init_EGFR*init_RTKph^2*pEGFR_phosphatase_binding*pErbB12i_phosphatase*pErbB13i_phosphatase*pMetEGFR_degradation + 2*EGFR_basal_activation*init_EGFR*init_RTKph^3*pEGFR_phosphatase_binding*pErbB12i_phosphatase*pErbB13i_phosphatase*pMetEGFRi_phosphatase + Met_EGFR_basal_act*init_Met*init_RTKph^2*pEGFR_degradation*pErbB12i_phosphatase*pErbB13i_phosphatase*pMetEGFRi_phosphatase + Met_EGFR_basal_act*init_Met*init_RTKph^2*pEGFR_phosphatase_binding*pErbB12_degradation*pErbB13i_phosphatase*pMetEGFRi_phosphatase + Met_EGFR_basal_act*init_Met*init_RTKph^2*pEGFR_phosphatase_binding*pErbB13_degradation*pErbB12i_phosphatase*pMetEGFRi_phosphatase + Met_EGFR_basal_act*init_Met*init_RTKph^3*pEGFR_phosphatase_binding*pErbB12i_phosphatase*pErbB13i_phosphatase*pMetEGFRi_phosphatase)/(EGFR_basal_recycle*(pEGFR_degradation*pErbB12_degradation*pErbB13_degradation*pMetEGFR_degradation + init_RTKph*pEGFR_degradation*pErbB12_degradation*pErbB13_degradation*pMetEGFRi_phosphatase + init_RTKph*pEGFR_degradation*pErbB12_degradation*pErbB13i_phosphatase*pMetEGFR_degradation + init_RTKph*pEGFR_degradation*pErbB13_degradation*pErbB12i_phosphatase*pMetEGFR_degradation + init_RTKph*pEGFR_phosphatase_binding*pErbB12_degradation*pErbB13_degradation*pMetEGFR_degradation + init_RTKph^2*pEGFR_degradation*pErbB12_degradation*pErbB13i_phosphatase*pMetEGFRi_phosphatase + init_RTKph^2*pEGFR_degradation*pErbB13_degradation*pErbB12i_phosphatase*pMetEGFRi_phosphatase + init_RTKph^2*pEGFR_degradation*pErbB12i_phosphatase*pErbB13i_phosphatase*pMetEGFR_degradation + init_RTKph^3*pEGFR_degradation*pErbB12i_phosphatase*pErbB13i_phosphatase*pMetEGFRi_phosphatase + init_RTKph^2*pEGFR_phosphatase_binding*pErbB12_degradation*pErbB13_degradation*pMetEGFRi_phosphatase + init_RTKph^2*pEGFR_phosphatase_binding*pErbB12_degradation*pErbB13i_phosphatase*pMetEGFR_degradation + init_RTKph^2*pEGFR_phosphatase_binding*pErbB13_degradation*pErbB12i_phosphatase*pMetEGFR_degradation + init_RTKph^3*pEGFR_phosphatase_binding*pErbB12_degradation*pErbB13i_phosphatase*pMetEGFRi_phosphatase + init_RTKph^3*pEGFR_phosphatase_binding*pErbB13_degradation*pErbB12i_phosphatase*pMetEGFRi_phosphatase + init_RTKph^3*pEGFR_phosphatase_binding*pErbB12i_phosphatase*pErbB13i_phosphatase*pMetEGFR_degradation + init_RTKph^4*pEGFR_phosphatase_binding*pErbB12i_phosphatase*pErbB13i_phosphatase*pMetEGFRi_phosphatase));
  species ErbB2 in cyt = init_ErbB2;
  species pErbB2 in cyt = ErbB2_dimerize*init_ErbB2^2/pErbB2_internalize;
  species pErbB2i in cyt = ErbB2_dimerize*init_ErbB2^2/(pErbB2_degradation + init_RTKph*pErbB2i_phosphatase);
  species ErbB2i in cyt = init_ErbB2*init_RTKph*(EGFR_ErbB2_basal_act*init_EGFR*pErbB2_degradation*pErbB32_degradation*pErbB12i_phosphatase + 2*ErbB2_dimerize*init_ErbB2*pErbB12_degradation*pErbB32_degradation*pErbB2i_phosphatase + ErbB3_ErbB2_basal_act*init_ErbB3*pErbB2_degradation*pErbB12_degradation*pErbB32i_phosphatase + EGFR_ErbB2_basal_act*init_EGFR*init_RTKph^2*pErbB2i_phosphatase*pErbB12i_phosphatase*pErbB32i_phosphatase + 2*ErbB2_dimerize*init_ErbB2*init_RTKph^2*pErbB2i_phosphatase*pErbB12i_phosphatase*pErbB32i_phosphatase + ErbB3_ErbB2_basal_act*init_ErbB3*init_RTKph^2*pErbB2i_phosphatase*pErbB12i_phosphatase*pErbB32i_phosphatase + EGFR_ErbB2_basal_act*init_EGFR*init_RTKph*pErbB2_degradation*pErbB12i_phosphatase*pErbB32i_phosphatase + EGFR_ErbB2_basal_act*init_EGFR*init_RTKph*pErbB32_degradation*pErbB2i_phosphatase*pErbB12i_phosphatase + 2*ErbB2_dimerize*init_ErbB2*init_RTKph*pErbB12_degradation*pErbB2i_phosphatase*pErbB32i_phosphatase + 2*ErbB2_dimerize*init_ErbB2*init_RTKph*pErbB32_degradation*pErbB2i_phosphatase*pErbB12i_phosphatase + ErbB3_ErbB2_basal_act*init_ErbB3*init_RTKph*pErbB2_degradation*pErbB12i_phosphatase*pErbB32i_phosphatase + ErbB3_ErbB2_basal_act*init_ErbB3*init_RTKph*pErbB12_degradation*pErbB2i_phosphatase*pErbB32i_phosphatase)/(ErbB2_recycle*(pErbB2_degradation*pErbB12_degradation*pErbB32_degradation + init_RTKph*pErbB2_degradation*pErbB12_degradation*pErbB32i_phosphatase + init_RTKph*pErbB2_degradation*pErbB32_degradation*pErbB12i_phosphatase + init_RTKph*pErbB12_degradation*pErbB32_degradation*pErbB2i_phosphatase + init_RTKph^2*pErbB2_degradation*pErbB12i_phosphatase*pErbB32i_phosphatase + init_RTKph^2*pErbB12_degradation*pErbB2i_phosphatase*pErbB32i_phosphatase + init_RTKph^2*pErbB32_degradation*pErbB2i_phosphatase*pErbB12i_phosphatase + init_RTKph^3*pErbB2i_phosphatase*pErbB12i_phosphatase*pErbB32i_phosphatase));
  species pErbB2i_ph in cyt = ErbB2_dimerize*init_ErbB2^2*init_RTKph*pErbB2i_phosphatase/(pErbB2i_dephosph*(pErbB2_degradation + init_RTKph*pErbB2i_phosphatase));
  species pErbB12 in cyt = EGFR_ErbB2_basal_act*init_EGFR*init_ErbB2/pErbB12_internalize;
  species pErbB12i in cyt = EGFR_ErbB2_basal_act*init_EGFR*init_ErbB2/(pErbB12_degradation + init_RTKph*pErbB12i_phosphatase);
  species pErbB12i_ph in cyt = EGFR_ErbB2_basal_act*init_EGFR*init_ErbB2*init_RTKph*pErbB12i_phosphatase/(pErbB12i_dephosph*(pErbB12_degradation + init_RTKph*pErbB12i_phosphatase));
  species ErbB3 in cyt = init_ErbB3;
  species ErbB3_HRG in cyt = init_ErbB3_HRG;
  species pErbB3d in cyt = ErbB3_basal_activation*init_ErbB3^2/pErbB3_internalize;
  species pErbB3i in cyt = ErbB3_basal_activation*init_ErbB3^2/(pErbB3_degradation + init_RTKph*pErbB3i_phosphatase);
  species pErbB3i_ph in cyt = ErbB3_basal_activation*init_ErbB3^2*init_RTKph*pErbB3i_phosphatase/(pErbB3i_dephosph*(pErbB3_degradation + init_RTKph*pErbB3i_phosphatase));
  species ErbB3i in cyt = init_ErbB3*init_RTKph*(EGFR_ErbB3_basal_act*init_EGFR*pErbB3_degradation*pErbB32_degradation*pErbB13i_phosphatase*pMetErbB3_degradation + ErbB3_ErbB2_basal_act*init_ErbB2*pErbB3_degradation*pErbB13_degradation*pErbB32i_phosphatase*pMetErbB3_degradation + 2*ErbB3_basal_activation*init_ErbB3*pErbB13_degradation*pErbB32_degradation*pErbB3i_phosphatase*pMetErbB3_degradation + Met_ErbB3_basal_act*init_Met*pErbB3_degradation*pErbB13_degradation*pErbB32_degradation*pMetErbB3i_phosphatase + EGFR_ErbB3_basal_act*init_EGFR*init_RTKph*pErbB3_degradation*pErbB32_degradation*pErbB13i_phosphatase*pMetErbB3i_phosphatase + EGFR_ErbB3_basal_act*init_EGFR*init_RTKph*pErbB3_degradation*pErbB13i_phosphatase*pErbB32i_phosphatase*pMetErbB3_degradation + EGFR_ErbB3_basal_act*init_EGFR*init_RTKph*pErbB32_degradation*pErbB3i_phosphatase*pErbB13i_phosphatase*pMetErbB3_degradation + ErbB3_ErbB2_basal_act*init_ErbB2*init_RTKph*pErbB3_degradation*pErbB13_degradation*pErbB32i_phosphatase*pMetErbB3i_phosphatase + ErbB3_ErbB2_basal_act*init_ErbB2*init_RTKph*pErbB3_degradation*pErbB13i_phosphatase*pErbB32i_phosphatase*pMetErbB3_degradation + ErbB3_ErbB2_basal_act*init_ErbB2*init_RTKph*pErbB13_degradation*pErbB3i_phosphatase*pErbB32i_phosphatase*pMetErbB3_degradation + 2*ErbB3_basal_activation*init_ErbB3*init_RTKph*pErbB13_degradation*pErbB32_degradation*pErbB3i_phosphatase*pMetErbB3i_phosphatase + 2*ErbB3_basal_activation*init_ErbB3*init_RTKph*pErbB13_degradation*pErbB3i_phosphatase*pErbB32i_phosphatase*pMetErbB3_degradation + 2*ErbB3_basal_activation*init_ErbB3*init_RTKph*pErbB32_degradation*pErbB3i_phosphatase*pErbB13i_phosphatase*pMetErbB3_degradation + Met_ErbB3_basal_act*init_Met*init_RTKph*pErbB3_degradation*pErbB13_degradation*pErbB32i_phosphatase*pMetErbB3i_phosphatase + Met_ErbB3_basal_act*init_Met*init_RTKph*pErbB3_degradation*pErbB32_degradation*pErbB13i_phosphatase*pMetErbB3i_phosphatase + Met_ErbB3_basal_act*init_Met*init_RTKph*pErbB13_degradation*pErbB32_degradation*pErbB3i_phosphatase*pMetErbB3i_phosphatase + EGFR_ErbB3_basal_act*init_EGFR*init_RTKph^2*pErbB3_degradation*pErbB13i_phosphatase*pErbB32i_phosphatase*pMetErbB3i_phosphatase + EGFR_ErbB3_basal_act*init_EGFR*init_RTKph^2*pErbB32_degradation*pErbB3i_phosphatase*pErbB13i_phosphatase*pMetErbB3i_phosphatase + EGFR_ErbB3_basal_act*init_EGFR*init_RTKph^2*pErbB3i_phosphatase*pErbB13i_phosphatase*pErbB32i_phosphatase*pMetErbB3_degradation + EGFR_ErbB3_basal_act*init_EGFR*init_RTKph^3*pErbB3i_phosphatase*pErbB13i_phosphatase*pErbB32i_phosphatase*pMetErbB3i_phosphatase + ErbB3_ErbB2_basal_act*init_ErbB2*init_RTKph^2*pErbB3_degradation*pErbB13i_phosphatase*pErbB32i_phosphatase*pMetErbB3i_phosphatase + ErbB3_ErbB2_basal_act*init_ErbB2*init_RTKph^2*pErbB13_degradation*pErbB3i_phosphatase*pErbB32i_phosphatase*pMetErbB3i_phosphatase + ErbB3_ErbB2_basal_act*init_ErbB2*init_RTKph^2*pErbB3i_phosphatase*pErbB13i_phosphatase*pErbB32i_phosphatase*pMetErbB3_degradation + ErbB3_ErbB2_basal_act*init_ErbB2*init_RTKph^3*pErbB3i_phosphatase*pErbB13i_phosphatase*pErbB32i_phosphatase*pMetErbB3i_phosphatase + 2*ErbB3_basal_activation*init_ErbB3*init_RTKph^2*pErbB13_degradation*pErbB3i_phosphatase*pErbB32i_phosphatase*pMetErbB3i_phosphatase + 2*ErbB3_basal_activation*init_ErbB3*init_RTKph^2*pErbB32_degradation*pErbB3i_phosphatase*pErbB13i_phosphatase*pMetErbB3i_phosphatase + 2*ErbB3_basal_activation*init_ErbB3*init_RTKph^2*pErbB3i_phosphatase*pErbB13i_phosphatase*pErbB32i_phosphatase*pMetErbB3_degradation + 2*ErbB3_basal_activation*init_ErbB3*init_RTKph^3*pErbB3i_phosphatase*pErbB13i_phosphatase*pErbB32i_phosphatase*pMetErbB3i_phosphatase + Met_ErbB3_basal_act*init_Met*init_RTKph^2*pErbB3_degradation*pErbB13i_phosphatase*pErbB32i_phosphatase*pMetErbB3i_phosphatase + Met_ErbB3_basal_act*init_Met*init_RTKph^2*pErbB13_degradation*pErbB3i_phosphatase*pErbB32i_phosphatase*pMetErbB3i_phosphatase + Met_ErbB3_basal_act*init_Met*init_RTKph^2*pErbB32_degradation*pErbB3i_phosphatase*pErbB13i_phosphatase*pMetErbB3i_phosphatase + Met_ErbB3_basal_act*init_Met*init_RTKph^3*pErbB3i_phosphatase*pErbB13i_phosphatase*pErbB32i_phosphatase*pMetErbB3i_phosphatase)/(ErbB3_basal_recycle*(pErbB3_degradation*pErbB13_degradation*pErbB32_degradation*pMetErbB3_degradation + init_RTKph*pErbB3_degradation*pErbB13_degradation*pErbB32_degradation*pMetErbB3i_phosphatase + init_RTKph*pErbB3_degradation*pErbB13_degradation*pErbB32i_phosphatase*pMetErbB3_degradation + init_RTKph*pErbB3_degradation*pErbB32_degradation*pErbB13i_phosphatase*pMetErbB3_degradation + init_RTKph*pErbB13_degradation*pErbB32_degradation*pErbB3i_phosphatase*pMetErbB3_degradation + init_RTKph^2*pErbB3_degradation*pErbB13_degradation*pErbB32i_phosphatase*pMetErbB3i_phosphatase + init_RTKph^2*pErbB3_degradation*pErbB32_degradation*pErbB13i_phosphatase*pMetErbB3i_phosphatase + init_RTKph^2*pErbB3_degradation*pErbB13i_phosphatase*pErbB32i_phosphatase*pMetErbB3_degradation + init_RTKph^2*pErbB13_degradation*pErbB32_degradation*pErbB3i_phosphatase*pMetErbB3i_phosphatase + init_RTKph^2*pErbB13_degradation*pErbB3i_phosphatase*pErbB32i_phosphatase*pMetErbB3_degradation + init_RTKph^2*pErbB32_degradation*pErbB3i_phosphatase*pErbB13i_phosphatase*pMetErbB3_degradation + init_RTKph^3*pErbB3_degradation*pErbB13i_phosphatase*pErbB32i_phosphatase*pMetErbB3i_phosphatase + init_RTKph^3*pErbB13_degradation*pErbB3i_phosphatase*pErbB32i_phosphatase*pMetErbB3i_phosphatase + init_RTKph^3*pErbB32_degradation*pErbB3i_phosphatase*pErbB13i_phosphatase*pMetErbB3i_phosphatase + init_RTKph^3*pErbB3i_phosphatase*pErbB13i_phosphatase*pErbB32i_phosphatase*pMetErbB3_degradation + init_RTKph^4*pErbB3i_phosphatase*pErbB13i_phosphatase*pErbB32i_phosphatase*pMetErbB3i_phosphatase));
  species pErbB13 in cyt = EGFR_ErbB3_basal_act*init_EGFR*init_ErbB3/pErbB13_internalize;
  species pErbB13i in cyt = EGFR_ErbB3_basal_act*init_EGFR*init_ErbB3/(pErbB13_degradation + init_RTKph*pErbB13i_phosphatase);
  species pErbB13i_ph in cyt = EGFR_ErbB3_basal_act*init_EGFR*init_ErbB3*init_RTKph*pErbB13i_phosphatase/(pErbB13i_dephosph*(pErbB13_degradation + init_RTKph*pErbB13i_phosphatase));
  species pErbB32 in cyt = ErbB3_ErbB2_basal_act*init_ErbB2*init_ErbB3/pErbB32_internalize;
  species pErbB32i in cyt = ErbB3_ErbB2_basal_act*init_ErbB2*init_ErbB3/(pErbB32_degradation + init_RTKph*pErbB32i_phosphatase);
  species pErbB32i_ph in cyt = ErbB3_ErbB2_basal_act*init_ErbB2*init_ErbB3*init_RTKph*pErbB32i_phosphatase/(pErbB32i_dephosph*(pErbB32_degradation + init_RTKph*pErbB32i_phosphatase));
  species IGF1R in cyt = init_IGF1R;
  species IGF1R_IGF1 in cyt = init_IGF1R_IGF1;
  species pIGF1Rd in cyt = IGF1R_basal_activation*init_IGF1R^2/pIGF1R_internalize;
  species pIGF1Ri in cyt = IGF1R_basal_activation*init_IGF1R^2/(pIGF1R_degradation + init_RTKph*pIGF1Ri_phosphatase);
  species pIGF1Ri_ph in cyt = IGF1R_basal_activation*init_IGF1R^2*init_RTKph*pIGF1Ri_phosphatase/(pIGF1Ri_dephosph*(pIGF1R_degradation + init_RTKph*pIGF1Ri_phosphatase));
  species IGF1Ri in cyt = 2*IGF1R_basal_activation*init_IGF1R^2*init_RTKph*pIGF1Ri_phosphatase/(IGF1R_basal_recycle*(pIGF1R_degradation + init_RTKph*pIGF1Ri_phosphatase));
  species Met in cyt = init_Met;
  species Met_HGF in cyt = init_Met_HGF;
  species pMetd in cyt = Met_basal_act*init_Met^2/pMet_internalize;
  species pMeti in cyt = Met_basal_act*init_Met^2/(pMet_degradation + init_RTKph*pMeti_phosphatase);
  species pMeti_ph in cyt = Met_basal_act*init_Met^2*init_RTKph*pMeti_phosphatase/(pMeti_dephosph*(pMet_degradation + init_RTKph*pMeti_phosphatase));
  species Meti in cyt = init_Met*init_RTKph*(2*Met_basal_act*init_Met*pMeti_phosphatase*pMetEGFR_degradation*pMetErbB3_degradation + Met_EGFR_basal_act*init_EGFR*pMet_degradation*pMetErbB3_degradation*pMetEGFRi_phosphatase + Met_ErbB3_basal_act*init_ErbB3*pMet_degradation*pMetEGFR_degradation*pMetErbB3i_phosphatase + 2*Met_basal_act*init_Met*init_RTKph^2*pMeti_phosphatase*pMetEGFRi_phosphatase*pMetErbB3i_phosphatase + Met_EGFR_basal_act*init_EGFR*init_RTKph^2*pMeti_phosphatase*pMetEGFRi_phosphatase*pMetErbB3i_phosphatase + Met_ErbB3_basal_act*init_ErbB3*init_RTKph^2*pMeti_phosphatase*pMetEGFRi_phosphatase*pMetErbB3i_phosphatase + 2*Met_basal_act*init_Met*init_RTKph*pMeti_phosphatase*pMetEGFR_degradation*pMetErbB3i_phosphatase + 2*Met_basal_act*init_Met*init_RTKph*pMeti_phosphatase*pMetErbB3_degradation*pMetEGFRi_phosphatase + Met_EGFR_basal_act*init_EGFR*init_RTKph*pMet_degradation*pMetEGFRi_phosphatase*pMetErbB3i_phosphatase + Met_EGFR_basal_act*init_EGFR*init_RTKph*pMeti_phosphatase*pMetErbB3_degradation*pMetEGFRi_phosphatase + Met_ErbB3_basal_act*init_ErbB3*init_RTKph*pMet_degradation*pMetEGFRi_phosphatase*pMetErbB3i_phosphatase + Met_ErbB3_basal_act*init_ErbB3*init_RTKph*pMeti_phosphatase*pMetEGFR_degradation*pMetErbB3i_phosphatase)/(Met_recycle*(pMet_degradation*pMetEGFR_degradation*pMetErbB3_degradation + init_RTKph*pMet_degradation*pMetEGFR_degradation*pMetErbB3i_phosphatase + init_RTKph*pMet_degradation*pMetErbB3_degradation*pMetEGFRi_phosphatase + init_RTKph*pMeti_phosphatase*pMetEGFR_degradation*pMetErbB3_degradation + init_RTKph^2*pMet_degradation*pMetEGFRi_phosphatase*pMetErbB3i_phosphatase + init_RTKph^2*pMeti_phosphatase*pMetEGFR_degradation*pMetErbB3i_phosphatase + init_RTKph^2*pMeti_phosphatase*pMetErbB3_degradation*pMetEGFRi_phosphatase + init_RTKph^3*pMeti_phosphatase*pMetEGFRi_phosphatase*pMetErbB3i_phosphatase));
  species pMetErbB3 in cyt = Met_ErbB3_basal_act*init_Met*init_ErbB3/pMetErbB3_internalize;
  species pMetErbB3i in cyt = Met_ErbB3_basal_act*init_Met*init_ErbB3/(pMetErbB3_degradation + init_RTKph*pMetErbB3i_phosphatase);
  species pMetErbB3i_ph in cyt = Met_ErbB3_basal_act*init_Met*init_ErbB3*init_RTKph*pMetErbB3i_phosphatase/(pMetErbB3i_dephosph*(pMetErbB3_degradation + init_RTKph*pMetErbB3i_phosphatase));
  species pMetEGFR in cyt = Met_EGFR_basal_act*init_EGFR*init_Met/pMetEGFR_internalize;
  species pMetEGFRi in cyt = Met_EGFR_basal_act*init_EGFR*init_Met/(pMetEGFR_degradation + init_RTKph*pMetEGFRi_phosphatase);
  species pMetEGFRi_ph in cyt = Met_EGFR_basal_act*init_EGFR*init_Met*init_RTKph*pMetEGFRi_phosphatase/(pMetEGFRi_dephosph*(pMetEGFR_degradation + init_RTKph*pMetEGFRi_phosphatase));
  species MEK in cyt = init_MEK;
  species pMEK in cyt = init_MEK*pAKT_deactivation*(EGFR_basal_activation*MEK_phosphorylation_pEGFR*init_EGFR^2/pEGFR_internalize + IGF1R_basal_activation*MEK_phosphorylation_pIGF1R*init_IGF1R^2/pIGF1R_internalize + MEK_phosphorylation_pMetd*Met_basal_act*init_Met^2/pMet_internalize + IGF1R_basal_activation*MEK_internIGF1R_effect*MEK_phosphorylation_pIGF1R*init_IGF1R^2/(pIGF1R_degradation + init_RTKph*pIGF1Ri_phosphatase) + EGFR_ErbB2_basal_act*MEK_phosphorylation_pErbB12*init_EGFR*init_ErbB2/pErbB12_internalize + EGFR_ErbB3_basal_act*MEK_phosphorylation_pErbB13*init_EGFR*init_ErbB3/pErbB13_internalize + ErbB3_ErbB2_basal_act*MEK_phosphorylation_pErbB32*init_ErbB2*init_ErbB3/pErbB32_internalize + MEK_phosphorylation_pMetEGFR*Met_EGFR_basal_act*init_EGFR*init_Met/pMetEGFR_internalize + MEK_phosphorylation_pMetErbB3*Met_ErbB3_basal_act*init_Met*init_ErbB3/pMetErbB3_internalize + EGFR_basal_activation*MEK_phosphorylation_pEGFR*feedback_pS6K1*init_EGFR^2*init_pS6K1/pEGFR_internalize + EGFR_basal_activation*MEK_phosphorylation_pEGFR*feedback_pERK_on_AKT*init_EGFR^2*init_pERK/pEGFR_internalize + IGF1R_basal_activation*MEK_phosphorylation_pIGF1R*feedback_pS6K1*init_IGF1R^2*init_pS6K1/pIGF1R_internalize + IGF1R_basal_activation*MEK_phosphorylation_pIGF1R*feedback_pERK_on_AKT*init_IGF1R^2*init_pERK/pIGF1R_internalize + MEK_phosphorylation_pMetd*Met_basal_act*feedback_pS6K1*init_Met^2*init_pS6K1/pMet_internalize + MEK_phosphorylation_pMetd*Met_basal_act*feedback_pERK_on_AKT*init_Met^2*init_pERK/pMet_internalize + IGF1R_basal_activation*MEK_internIGF1R_effect*MEK_phosphorylation_pIGF1R*feedback_pS6K1*init_IGF1R^2*init_pS6K1/(pIGF1R_degradation + init_RTKph*pIGF1Ri_phosphatase) + IGF1R_basal_activation*MEK_internIGF1R_effect*MEK_phosphorylation_pIGF1R*feedback_pERK_on_AKT*init_IGF1R^2*init_pERK/(pIGF1R_degradation + init_RTKph*pIGF1Ri_phosphatase) + EGFR_ErbB2_basal_act*MEK_phosphorylation_pErbB12*feedback_pS6K1*init_EGFR*init_pS6K1*init_ErbB2/pErbB12_internalize + EGFR_ErbB3_basal_act*MEK_phosphorylation_pErbB13*feedback_pS6K1*init_EGFR*init_pS6K1*init_ErbB3/pErbB13_internalize + EGFR_ErbB2_basal_act*MEK_phosphorylation_pErbB12*feedback_pERK_on_AKT*init_EGFR*init_pERK*init_ErbB2/pErbB12_internalize + EGFR_ErbB3_basal_act*MEK_phosphorylation_pErbB13*feedback_pERK_on_AKT*init_EGFR*init_pERK*init_ErbB3/pErbB13_internalize + ErbB3_ErbB2_basal_act*MEK_phosphorylation_pErbB32*feedback_pS6K1*init_pS6K1*init_ErbB2*init_ErbB3/pErbB32_internalize + ErbB3_ErbB2_basal_act*MEK_phosphorylation_pErbB32*feedback_pERK_on_AKT*init_pERK*init_ErbB2*init_ErbB3/pErbB32_internalize + MEK_phosphorylation_pMetEGFR*Met_EGFR_basal_act*feedback_pS6K1*init_EGFR*init_Met*init_pS6K1/pMetEGFR_internalize + MEK_phosphorylation_pMetErbB3*Met_ErbB3_basal_act*feedback_pS6K1*init_Met*init_pS6K1*init_ErbB3/pMetErbB3_internalize + MEK_phosphorylation_pMetEGFR*Met_EGFR_basal_act*feedback_pERK_on_AKT*init_EGFR*init_Met*init_pERK/pMetEGFR_internalize + MEK_phosphorylation_pMetErbB3*Met_ErbB3_basal_act*feedback_pERK_on_AKT*init_Met*init_pERK*init_ErbB3/pMetErbB3_internalize)/(pMEK_dephosphorylation*(pAKT_deactivation + feedback_pS6K1*init_pS6K1*pAKT_deactivation + feedback_pERK*init_pERK*pAKT_deactivation + feedback_pERK_on_AKT*init_pERK*pAKT_deactivation + feedback_pERK*feedback_pERK_on_AKT*init_pERK^2*pAKT_deactivation + feedback_pS6K1*feedback_pERK*init_pS6K1*init_pERK*pAKT_deactivation + AKT_activation_pEGFR*EGFR_basal_activation*feedback_pAKT*init_AKT*init_EGFR^2/pEGFR_internalize + AKT_activation_pIGF1R*IGF1R_basal_activation*feedback_pAKT*init_AKT*init_IGF1R^2/pIGF1R_internalize + AKT_activation_pMetd*Met_basal_act*feedback_pAKT*init_AKT*init_Met^2/pMet_internalize + AKT_activation_pIGF1R*AKT_internIGF1R_effect*IGF1R_basal_activation*feedback_pAKT*init_AKT*init_IGF1R^2/(pIGF1R_degradation + init_RTKph*pIGF1Ri_phosphatase) + AKT_activation_pErbB12*EGFR_ErbB2_basal_act*feedback_pAKT*init_AKT*init_EGFR*init_ErbB2/pErbB12_internalize + AKT_activation_pErbB13*EGFR_ErbB3_basal_act*feedback_pAKT*init_AKT*init_EGFR*init_ErbB3/pErbB13_internalize + AKT_activation_pErbB32*ErbB3_ErbB2_basal_act*feedback_pAKT*init_AKT*init_ErbB2*init_ErbB3/pErbB32_internalize + AKT_activation_pMetEGFR*Met_EGFR_basal_act*feedback_pAKT*init_AKT*init_EGFR*init_Met/pMetEGFR_internalize + AKT_activation_pMetErbB3*Met_ErbB3_basal_act*feedback_pAKT*init_AKT*init_Met*init_ErbB3/pMetErbB3_internalize));
  species ERK in cyt = init_pERK*pERK_dephosphorylation*pMEK_dephosphorylation*(pAKT_deactivation + feedback_pS6K1*init_pS6K1*pAKT_deactivation + feedback_pERK*init_pERK*pAKT_deactivation + feedback_pERK_on_AKT*init_pERK*pAKT_deactivation + feedback_pERK*feedback_pERK_on_AKT*init_pERK^2*pAKT_deactivation + feedback_pS6K1*feedback_pERK*init_pS6K1*init_pERK*pAKT_deactivation + AKT_activation_pEGFR*EGFR_basal_activation*feedback_pAKT*init_AKT*init_EGFR^2/pEGFR_internalize + AKT_activation_pIGF1R*IGF1R_basal_activation*feedback_pAKT*init_AKT*init_IGF1R^2/pIGF1R_internalize + AKT_activation_pMetd*Met_basal_act*feedback_pAKT*init_AKT*init_Met^2/pMet_internalize + AKT_activation_pIGF1R*AKT_internIGF1R_effect*IGF1R_basal_activation*feedback_pAKT*init_AKT*init_IGF1R^2/(pIGF1R_degradation + init_RTKph*pIGF1Ri_phosphatase) + AKT_activation_pErbB12*EGFR_ErbB2_basal_act*feedback_pAKT*init_AKT*init_EGFR*init_ErbB2/pErbB12_internalize + AKT_activation_pErbB13*EGFR_ErbB3_basal_act*feedback_pAKT*init_AKT*init_EGFR*init_ErbB3/pErbB13_internalize + AKT_activation_pErbB32*ErbB3_ErbB2_basal_act*feedback_pAKT*init_AKT*init_ErbB2*init_ErbB3/pErbB32_internalize + AKT_activation_pMetEGFR*Met_EGFR_basal_act*feedback_pAKT*init_AKT*init_EGFR*init_Met/pMetEGFR_internalize + AKT_activation_pMetErbB3*Met_ErbB3_basal_act*feedback_pAKT*init_AKT*init_Met*init_ErbB3/pMetErbB3_internalize)/(ERK_phosphorylation_pMEK*init_MEK*pAKT_deactivation*(EGFR_basal_activation*MEK_phosphorylation_pEGFR*init_EGFR^2/pEGFR_internalize + IGF1R_basal_activation*MEK_phosphorylation_pIGF1R*init_IGF1R^2/pIGF1R_internalize + MEK_phosphorylation_pMetd*Met_basal_act*init_Met^2/pMet_internalize + IGF1R_basal_activation*MEK_internIGF1R_effect*MEK_phosphorylation_pIGF1R*init_IGF1R^2/(pIGF1R_degradation + init_RTKph*pIGF1Ri_phosphatase) + EGFR_ErbB2_basal_act*MEK_phosphorylation_pErbB12*init_EGFR*init_ErbB2/pErbB12_internalize + EGFR_ErbB3_basal_act*MEK_phosphorylation_pErbB13*init_EGFR*init_ErbB3/pErbB13_internalize + ErbB3_ErbB2_basal_act*MEK_phosphorylation_pErbB32*init_ErbB2*init_ErbB3/pErbB32_internalize + MEK_phosphorylation_pMetEGFR*Met_EGFR_basal_act*init_EGFR*init_Met/pMetEGFR_internalize + MEK_phosphorylation_pMetErbB3*Met_ErbB3_basal_act*init_Met*init_ErbB3/pMetErbB3_internalize + EGFR_basal_activation*MEK_phosphorylation_pEGFR*feedback_pS6K1*init_EGFR^2*init_pS6K1/pEGFR_internalize + EGFR_basal_activation*MEK_phosphorylation_pEGFR*feedback_pERK_on_AKT*init_EGFR^2*init_pERK/pEGFR_internalize + IGF1R_basal_activation*MEK_phosphorylation_pIGF1R*feedback_pS6K1*init_IGF1R^2*init_pS6K1/pIGF1R_internalize + IGF1R_basal_activation*MEK_phosphorylation_pIGF1R*feedback_pERK_on_AKT*init_IGF1R^2*init_pERK/pIGF1R_internalize + MEK_phosphorylation_pMetd*Met_basal_act*feedback_pS6K1*init_Met^2*init_pS6K1/pMet_internalize + MEK_phosphorylation_pMetd*Met_basal_act*feedback_pERK_on_AKT*init_Met^2*init_pERK/pMet_internalize + IGF1R_basal_activation*MEK_internIGF1R_effect*MEK_phosphorylation_pIGF1R*feedback_pS6K1*init_IGF1R^2*init_pS6K1/(pIGF1R_degradation + init_RTKph*pIGF1Ri_phosphatase) + IGF1R_basal_activation*MEK_internIGF1R_effect*MEK_phosphorylation_pIGF1R*feedback_pERK_on_AKT*init_IGF1R^2*init_pERK/(pIGF1R_degradation + init_RTKph*pIGF1Ri_phosphatase) + EGFR_ErbB2_basal_act*MEK_phosphorylation_pErbB12*feedback_pS6K1*init_EGFR*init_pS6K1*init_ErbB2/pErbB12_internalize + EGFR_ErbB3_basal_act*MEK_phosphorylation_pErbB13*feedback_pS6K1*init_EGFR*init_pS6K1*init_ErbB3/pErbB13_internalize + EGFR_ErbB2_basal_act*MEK_phosphorylation_pErbB12*feedback_pERK_on_AKT*init_EGFR*init_pERK*init_ErbB2/pErbB12_internalize + EGFR_ErbB3_basal_act*MEK_phosphorylation_pErbB13*feedback_pERK_on_AKT*init_EGFR*init_pERK*init_ErbB3/pErbB13_internalize + ErbB3_ErbB2_basal_act*MEK_phosphorylation_pErbB32*feedback_pS6K1*init_pS6K1*init_ErbB2*init_ErbB3/pErbB32_internalize + ErbB3_ErbB2_basal_act*MEK_phosphorylation_pErbB32*feedback_pERK_on_AKT*init_pERK*init_ErbB2*init_ErbB3/pErbB32_internalize + MEK_phosphorylation_pMetEGFR*Met_EGFR_basal_act*feedback_pS6K1*init_EGFR*init_Met*init_pS6K1/pMetEGFR_internalize + MEK_phosphorylation_pMetErbB3*Met_ErbB3_basal_act*feedback_pS6K1*init_Met*init_pS6K1*init_ErbB3/pMetErbB3_internalize + MEK_phosphorylation_pMetEGFR*Met_EGFR_basal_act*feedback_pERK_on_AKT*init_EGFR*init_Met*init_pERK/pMetEGFR_internalize + MEK_phosphorylation_pMetErbB3*Met_ErbB3_basal_act*feedback_pERK_on_AKT*init_Met*init_pERK*init_ErbB3/pMetErbB3_internalize));
  species pERK in cyt = init_pERK;
  species AKT in cyt = init_AKT;
  species pAKT in cyt = init_AKT*(AKT_activation_pEGFR*EGFR_basal_activation*init_EGFR^2/pEGFR_internalize + AKT_activation_pIGF1R*IGF1R_basal_activation*init_IGF1R^2/pIGF1R_internalize + AKT_activation_pMetd*Met_basal_act*init_Met^2/pMet_internalize + AKT_activation_pIGF1R*AKT_internIGF1R_effect*IGF1R_basal_activation*init_IGF1R^2/(pIGF1R_degradation + init_RTKph*pIGF1Ri_phosphatase) + AKT_activation_pErbB12*EGFR_ErbB2_basal_act*init_EGFR*init_ErbB2/pErbB12_internalize + AKT_activation_pErbB13*EGFR_ErbB3_basal_act*init_EGFR*init_ErbB3/pErbB13_internalize + AKT_activation_pErbB32*ErbB3_ErbB2_basal_act*init_ErbB2*init_ErbB3/pErbB32_internalize + AKT_activation_pMetEGFR*Met_EGFR_basal_act*init_EGFR*init_Met/pMetEGFR_internalize + AKT_activation_pMetErbB3*Met_ErbB3_basal_act*init_Met*init_ErbB3/pMetErbB3_internalize)/(pAKT_deactivation*(feedback_pS6K1*init_pS6K1 + feedback_pERK_on_AKT*init_pERK + 1));
  species S6K1 in cyt = init_pS6K1*pAKT_deactivation*pS6K1_dephosphorylation*(feedback_pS6K1*init_pS6K1 + feedback_pERK_on_AKT*init_pERK + 1)/(S6K1_phosphorylation_pERK*init_pERK*pAKT_deactivation + S6K1_phosphorylation_pERK*feedback_pERK_on_AKT*init_pERK^2*pAKT_deactivation + S6K1_phosphorylation_pERK*feedback_pS6K1*init_pS6K1*init_pERK*pAKT_deactivation + AKT_activation_pEGFR*EGFR_basal_activation*S6K1_phosphorylation_pAKT*init_AKT*init_EGFR^2/pEGFR_internalize + AKT_activation_pIGF1R*IGF1R_basal_activation*S6K1_phosphorylation_pAKT*init_AKT*init_IGF1R^2/pIGF1R_internalize + AKT_activation_pMetd*Met_basal_act*S6K1_phosphorylation_pAKT*init_AKT*init_Met^2/pMet_internalize + AKT_activation_pIGF1R*AKT_internIGF1R_effect*IGF1R_basal_activation*S6K1_phosphorylation_pAKT*init_AKT*init_IGF1R^2/(pIGF1R_degradation + init_RTKph*pIGF1Ri_phosphatase) + AKT_activation_pErbB12*EGFR_ErbB2_basal_act*S6K1_phosphorylation_pAKT*init_AKT*init_EGFR*init_ErbB2/pErbB12_internalize + AKT_activation_pErbB13*EGFR_ErbB3_basal_act*S6K1_phosphorylation_pAKT*init_AKT*init_EGFR*init_ErbB3/pErbB13_internalize + AKT_activation_pErbB32*ErbB3_ErbB2_basal_act*S6K1_phosphorylation_pAKT*init_AKT*init_ErbB2*init_ErbB3/pErbB32_internalize + AKT_activation_pMetEGFR*Met_EGFR_basal_act*S6K1_phosphorylation_pAKT*init_AKT*init_EGFR*init_Met/pMetEGFR_internalize + AKT_activation_pMetErbB3*Met_ErbB3_basal_act*S6K1_phosphorylation_pAKT*init_AKT*init_Met*init_ErbB3/pMetErbB3_internalize);
  species pS6K1 in cyt = init_pS6K1;
  species S6 in cyt = init_S6;
  species pS6 in cyt = init_S6*(S6_phosphorylation_pERK*init_pERK + S6_phosphorylation_pS6K1*init_pS6K1)/pS6_dephosphorylation;

  // Parameters:
  AKT_activation_pEGFR = 1e-5;
  AKT_activation_pErbB12 = 0.06397586;
  AKT_activation_pErbB13 = 13.11448;
  AKT_activation_pErbB32 = 0.5606966;
  AKT_activation_pIGF1R = 0.6852729;
  AKT_activation_pMetEGFR = 1e-5;
  AKT_activation_pMetErbB3 = 0.03697843;
  AKT_activation_pMetd = 0.895634;
  AKT_internIGF1R_effect = 1.021586e-5;
  EGFR_BTC = 0.1;
  EGFR_ErbB2_basal_act = 1.000001e-5;
  EGFR_ErbB2_dimerize = 0.01569926;
  EGFR_ErbB3_basal_act = 0.0007510863;
  EGFR_ErbB3_dimerize = 0.001181631;
  EGFR_basal_activation = 1e-5;
  EGFR_basal_recycle = 519022.8;
  EGFR_dimerize = 0.06302023;
  EGFR_lig_binding = 1.893654e-5;
  EGF_kD = 1;
  ERK_phosphorylation_pMEK = 0.0002582737;
  ErbB2_ErbB3_dimerize = 0.03025215;
  ErbB2_dimerize = 0.006792332;
  ErbB2_recycle = 0.006570598;
  ErbB3_ErbB2_basal_act = 1e-5;
  ErbB3_basal_activation = 0.02929897;
  ErbB3_basal_recycle = 0.7366449;
  ErbB3_dimerize = 0.04458258;
  ErbB3_lig_binding = 5.714159e-5;
  HGF_kD = 0.3;
  HRG_kD = 0.05;
  IGF1R_basal_activation = 0.001170365;
  IGF1R_basal_recycle = 1000;
  IGF1R_dimerize = 17.12862;
  IGF1R_lig_binding = 0.001529195;
  IGF1_kD = 0.3;
  MEK_internIGF1R_effect = 1.00009e-5;
  MEK_phosphorylation_pEGFR = 1e-5;
  MEK_phosphorylation_pErbB12 = 0.2738311;
  MEK_phosphorylation_pErbB13 = 1e-5;
  MEK_phosphorylation_pErbB32 = 0.06056668;
  MEK_phosphorylation_pIGF1R = 0.0299477;
  MEK_phosphorylation_pMetEGFR = 1e-5;
  MEK_phosphorylation_pMetErbB3 = 0.03833732;
  MEK_phosphorylation_pMetd = 1.879827;
  Met_EGFR_basal_act = 1.745459e-5;
  Met_EGFR_dimerize = 0.000513155;
  Met_ErbB3_basal_act = 3.293708;
  Met_ErbB3_dimerize = 0.03708172;
  Met_basal_act = 1e-5;
  Met_dimerize = 0.009165789;
  Met_lig_ErbB3_dimerize = 567.0275;
  Met_lig_binding = 0.004516275;
  Met_recycle = 0.5424415;
  S6K1_phosphorylation_pAKT = 0.2497929;
  S6K1_phosphorylation_pERK = 1.06711e-5;
  S6_phosphorylation_pERK = 1.002887e-5;
  S6_phosphorylation_pS6K1 = 0.008569256;
  feedback_pAKT = 1.058389e-5;
  feedback_pERK = 1000;
  feedback_pERK_on_AKT = 1.002564e-5;
  feedback_pS6K1 = 2.091244e-5;
  init_AKT = 2.708573;
  init_EGFR = 17.86219;
  init_EGFR_EGF = 0;
  init_ErbB2 = 5.701852;
  init_ErbB3 = 2.479923;
  init_ErbB3_HRG = 0;
  init_IGF1R = 4.734946;
  init_IGF1R_IGF1 = 0;
  init_MEK = 4.241266;
  init_Met = 7.902904;
  init_Met_HGF = 0;
  init_RTKph = 0.6189115;
  init_S6 = 145.5008;
  init_pERK = 0.3342748;
  init_pS6K1 = 0.001243278;
  pAKT_deactivation = 0.3029533;
  pEGFR_degradation = 1e-5;
  pEGFR_internalize = 6.231465;
  pEGFR_phosphatase_binding = 184.6242;
  pEGFRi_dephosph = 21.72257;
  pERK_dephosphorylation = 0.542612;
  pErbB12_degradation = 0.1818296;
  pErbB12_internalize = 1.895521;
  pErbB12i_dephosph = 1000;
  pErbB12i_phosphatase = 0.8452576;
  pErbB13_degradation = 49.72152;
  pErbB13_internalize = 999.9858;
  pErbB13i_dephosph = 58.41843;
  pErbB13i_phosphatase = 1.595021e-5;
  pErbB2_degradation = 318.7364;
  pErbB2_internalize = 1000;
  pErbB2i_dephosph = 8.244009;
  pErbB2i_phosphatase = 999.9964;
  pErbB32_degradation = 0.5735453;
  pErbB32_internalize = 1.087203;
  pErbB32i_dephosph = 0.0119216;
  pErbB32i_phosphatase = 0.0487902;
  pErbB3_degradation = 0.9084586;
  pErbB3_internalize = 1000;
  pErbB3i_dephosph = 16.31373;
  pErbB3i_phosphatase = 82.18636;
  pIGF1R_degradation = 1e-5;
  pIGF1R_internalize = 1000;
  pIGF1Ri_dephosph = 331.6869;
  pIGF1Ri_phosphatase = 1000;
  pMEK_dephosphorylation = 0.3281465;
  pMetEGFR_degradation = 1.425349;
  pMetEGFR_internalize = 1.327;
  pMetEGFRi_dephosph = 0.5037835;
  pMetEGFRi_phosphatase = 3.573082e-5;
  pMetErbB3_degradation = 983.6964;
  pMetErbB3_internalize = 1000;
  pMetErbB3i_dephosph = 1000;
  pMetErbB3i_phosphatase = 1000;
  pMet_degradation = 1.906541;
  pMet_internalize = 999.9973;
  pMeti_dephosph = 12.98499;
  pMeti_phosphatase = 1000;
  pS6K1_dephosphorylation = 0.01033044;
  pS6_dephosphorylation = 0.1188068;
  Ligand_on = 0;
  scale_Ligand = 37810;
  ModelValue_122_0 = scale_Ligand; ModelValue_122_0 is "Initial for scale_Ligand";

  // Reactions:
  v_0: => EGFR; cyt*Function_for_v_0(EGFR_ErbB2_basal_act, EGFR_ErbB3_basal_act, EGFR_basal_activation, Met_EGFR_basal_act, init_EGFR, init_ErbB3, init_Met, init_RTKph, pEGFR_degradation, pEGFR_phosphatase_binding, pErbB12_degradation, pErbB12i_phosphatase, pErbB13_degradation, pErbB13i_phosphatase, pMetEGFR_degradation, pMetEGFRi_phosphatase);
  v_1: => ErbB2; cyt*Function_for_v_1(EGFR_ErbB2_basal_act, ErbB2_dimerize, ErbB3_ErbB2_basal_act, init_EGFR, init_ErbB2, init_ErbB3, init_RTKph, pErbB12_degradation, pErbB12i_phosphatase, pErbB2_degradation, pErbB2i_phosphatase, pErbB32_degradation, pErbB32i_phosphatase);
  v_2: => ErbB3; cyt*Function_for_v_2(EGFR_ErbB3_basal_act, ErbB3_ErbB2_basal_act, ErbB3_basal_activation, Met_ErbB3_basal_act, init_EGFR, init_ErbB2, init_ErbB3, init_Met, init_RTKph, pErbB13_degradation, pErbB13i_phosphatase, pErbB32_degradation, pErbB32i_phosphatase, pErbB3_degradation, pErbB3i_phosphatase, pMetErbB3_degradation, pMetErbB3i_phosphatase);
  v_3: => IGF1R; cyt*Function_for_v_3(IGF1R_basal_activation, init_IGF1R, init_RTKph, pIGF1R_degradation, pIGF1Ri_phosphatase);
  v_4: => Met; cyt*Function_for_v_4(Met_EGFR_basal_act, Met_ErbB3_basal_act, Met_basal_act, init_EGFR, init_ErbB3, init_Met, init_RTKph, pMetEGFR_degradation, pMetEGFRi_phosphatase, pMetErbB3_degradation, pMetErbB3i_phosphatase, pMet_degradation, pMeti_phosphatase);
  v_5: dose_EGF + EGFR => EGFR_EGF; cyt*EGFR_lig_binding*dose_EGF*EGFR;
  v_6: EGFR_EGF => dose_EGF + EGFR; cyt*Function_for_v_6(EGFR_EGF, EGFR_lig_binding, EGF_kD);
  v_7: dose_HRG + ErbB3 => ErbB3_HRG; cyt*ErbB3_lig_binding*dose_HRG*ErbB3;
  v_8: ErbB3_HRG => dose_HRG + ErbB3; cyt*Function_for_v_8(ErbB3_HRG, ErbB3_lig_binding, HRG_kD);
  v_9: dose_IGF1 + IGF1R => IGF1R_IGF1; cyt*IGF1R_lig_binding*dose_IGF1*IGF1R;
  v_10: IGF1R_IGF1 => dose_IGF1 + IGF1R; cyt*Function_for_v_10(IGF1R_IGF1, IGF1R_lig_binding, IGF1_kD);
  v_11: dose_HGF + Met => Met_HGF; cyt*Met_lig_binding*dose_HGF*Met;
  v_12: Met_HGF => dose_HGF + Met; cyt*Function_for_v_12(HGF_kD, Met_HGF, Met_lig_binding);
  v_13: 2 EGFR_EGF => pEGFRd; cyt*EGFR_dimerize*EGFR_EGF^2;
  v_14: 2 ErbB2 => pErbB2; cyt*ErbB2_dimerize*ErbB2^2;
  v_15: 2 ErbB3_HRG => pErbB3d; cyt*ErbB3_dimerize*ErbB3_HRG^2;
  v_16: 2 IGF1R_IGF1 => pIGF1Rd; cyt*IGF1R_dimerize*IGF1R_IGF1^2;
  v_17: EGFR_EGF + ErbB2 => pErbB12; cyt*EGFR_ErbB2_dimerize*EGFR_EGF*ErbB2;
  v_18: EGFR_EGF + ErbB3_HRG => pErbB13; cyt*EGFR_ErbB3_dimerize*EGFR_EGF*ErbB3_HRG;
  v_19: ErbB2 + ErbB3_HRG => pErbB32; cyt*ErbB2_ErbB3_dimerize*ErbB2*ErbB3_HRG;
  v_20: 2 Met_HGF => pMetd; cyt*Met_dimerize*Met_HGF^2;
  v_21: ErbB3_HRG + Met => pMetErbB3; cyt*Met_ErbB3_dimerize*ErbB3_HRG*Met;
  v_22: ErbB3_HRG + Met_HGF => pMetErbB3; cyt*Met_lig_ErbB3_dimerize*ErbB3_HRG*Met_HGF;
  v_23: EGFR_EGF + Met_HGF => pMetEGFR; cyt*Met_EGFR_dimerize*EGFR_EGF*Met_HGF;
  v_24: 2 EGFR => pEGFRd; cyt*EGFR_basal_activation*EGFR^2;
  v_25: 2 ErbB3 => pErbB3d; cyt*ErbB3_basal_activation*ErbB3^2;
  v_26: 2 IGF1R => pIGF1Rd; cyt*IGF1R_basal_activation*IGF1R^2;
  v_27: EGFR + ErbB2 => pErbB12; cyt*EGFR_ErbB2_basal_act*EGFR*ErbB2;
  v_28: EGFR + ErbB3 => pErbB13; cyt*EGFR_ErbB3_basal_act*EGFR*ErbB3;
  v_29: ErbB2 + ErbB3 => pErbB32; cyt*ErbB3_ErbB2_basal_act*ErbB2*ErbB3;
  v_30: ErbB3 + Met => pMetErbB3; cyt*Met_ErbB3_basal_act*ErbB3*Met;
  v_31: 2 Met => pMetd; cyt*Met_basal_act*Met^2;
  v_32: EGFR + Met => pMetEGFR; cyt*Met_EGFR_basal_act*EGFR*Met;
  v_33: pEGFRd => pEGFRi; cyt*pEGFR_internalize*pEGFRd;
  v_34: pEGFRi => ; cyt*pEGFR_degradation*pEGFRi;
  v_35: RTKph + pEGFRi => pEGFRi_ph; cyt*pEGFR_phosphatase_binding*RTKph*pEGFRi;
  v_36: pEGFRi_ph => RTKph + 2 EGFRi; cyt*pEGFRi_dephosph*pEGFRi_ph;
  v_37: EGFRi => EGFR; cyt*EGFR_basal_recycle*EGFRi;
  v_38: pErbB2 => pErbB2i; cyt*pErbB2_internalize*pErbB2;
  v_39: RTKph + pErbB2i => pErbB2i_ph; cyt*pErbB2i_phosphatase*RTKph*pErbB2i;
  v_40: pErbB2i_ph => RTKph + 2 ErbB2i; cyt*pErbB2i_dephosph*pErbB2i_ph;
  v_41: pErbB2i => ; cyt*pErbB2_degradation*pErbB2i;
  v_42: ErbB2i => ErbB2; cyt*ErbB2_recycle*ErbB2i;
  v_43: pErbB3d => pErbB3i; cyt*pErbB3_internalize*pErbB3d;
  v_44: pErbB3i => ; cyt*pErbB3_degradation*pErbB3i;
  v_45: RTKph + pErbB3i => pErbB3i_ph; cyt*pErbB3i_phosphatase*RTKph*pErbB3i;
  v_46: pErbB3i_ph => RTKph + 2 ErbB3i; cyt*pErbB3i_dephosph*pErbB3i_ph;
  v_47: ErbB3i => ErbB3; cyt*ErbB3_basal_recycle*ErbB3i;
  v_48: pIGF1Rd => pIGF1Ri; cyt*pIGF1R_internalize*pIGF1Rd;
  v_49: pIGF1Ri => ; cyt*pIGF1R_degradation*pIGF1Ri;
  v_50: RTKph + pIGF1Ri => pIGF1Ri_ph; cyt*pIGF1Ri_phosphatase*RTKph*pIGF1Ri;
  v_51: pIGF1Ri_ph => RTKph + 2 IGF1Ri; cyt*pIGF1Ri_dephosph*pIGF1Ri_ph;
  v_52: IGF1Ri => IGF1R; cyt*IGF1R_basal_recycle*IGF1Ri;
  v_53: pErbB12 => pErbB12i; cyt*pErbB12_internalize*pErbB12;
  v_54: pErbB12i => ; cyt*pErbB12_degradation*pErbB12i;
  v_55: RTKph + pErbB12i => pErbB12i_ph; cyt*pErbB12i_phosphatase*RTKph*pErbB12i;
  v_56: pErbB12i_ph => RTKph + EGFRi + ErbB2i; cyt*pErbB12i_dephosph*pErbB12i_ph;
  v_57: pErbB32 => pErbB32i; cyt*pErbB32_internalize*pErbB32;
  v_58: pErbB32i => ; cyt*pErbB32_degradation*pErbB32i;
  v_59: RTKph + pErbB32i => pErbB32i_ph; cyt*pErbB32i_phosphatase*RTKph*pErbB32i;
  v_60: pErbB32i_ph => RTKph + ErbB2i + ErbB3i; cyt*pErbB32i_dephosph*pErbB32i_ph;
  v_61: pErbB13 => pErbB13i; cyt*pErbB13_internalize*pErbB13;
  v_62: pErbB13i => ; cyt*pErbB13_degradation*pErbB13i;
  v_63: RTKph + pErbB13i => pErbB13i_ph; cyt*pErbB13i_phosphatase*RTKph*pErbB13i;
  v_64: pErbB13i_ph => RTKph + EGFRi + ErbB3i; cyt*pErbB13i_dephosph*pErbB13i_ph;
  v_65: pMetd => pMeti; cyt*pMet_internalize*pMetd;
  v_66: pMeti => ; cyt*pMet_degradation*pMeti;
  v_67: RTKph + pMeti => pMeti_ph; cyt*pMeti_phosphatase*RTKph*pMeti;
  v_68: pMeti_ph => RTKph + 2 Meti; cyt*pMeti_dephosph*pMeti_ph;
  v_69: Meti => Met; cyt*Met_recycle*Meti;
  v_70: pMetErbB3 => pMetErbB3i; cyt*pMetErbB3_internalize*pMetErbB3;
  v_71: pMetErbB3i => ; cyt*pMetErbB3_degradation*pMetErbB3i;
  v_72: RTKph + pMetErbB3i => pMetErbB3i_ph; cyt*pMetErbB3i_phosphatase*RTKph*pMetErbB3i;
  v_73: pMetErbB3i_ph => RTKph + ErbB3i + Meti; cyt*pMetErbB3i_dephosph*pMetErbB3i_ph;
  v_74: pMetEGFR => pMetEGFRi; cyt*pMetEGFR_internalize*pMetEGFR;
  v_75: pMetEGFRi => ; cyt*pMetEGFR_degradation*pMetEGFRi;
  v_76: RTKph + pMetEGFRi => pMetEGFRi_ph; cyt*pMetEGFRi_phosphatase*RTKph*pMetEGFRi;
  v_77: pMetEGFRi_ph => RTKph + EGFRi + Meti; cyt*pMetEGFRi_dephosph*pMetEGFRi_ph;
  v_78: MEK => pMEK; cyt*Function_for_v_78(AKT_activation_pEGFR, AKT_activation_pErbB12, AKT_activation_pErbB13, AKT_activation_pErbB32, AKT_activation_pIGF1R, AKT_activation_pMetEGFR, AKT_activation_pMetErbB3, AKT_activation_pMetd, AKT_internIGF1R_effect, EGFR_ErbB2_basal_act, EGFR_ErbB3_basal_act, EGFR_basal_activation, ErbB3_ErbB2_basal_act, IGF1R_basal_activation, MEK, MEK_phosphorylation_pEGFR, Met_EGFR_basal_act, Met_ErbB3_basal_act, Met_basal_act, feedback_pAKT, feedback_pERK, feedback_pERK_on_AKT, feedback_pS6K1, init_AKT, init_EGFR, init_ErbB2, init_ErbB3, init_IGF1R, init_Met, init_RTKph, init_pERK, init_pS6K1, pAKT_deactivation, pEGFR_internalize, pEGFRd, pERK, pErbB12_internalize, pErbB13_internalize, pErbB32_internalize, pIGF1R_degradation, pIGF1R_internalize, pIGF1Ri_phosphatase, pMetEGFR_internalize, pMetErbB3_internalize, pMet_internalize);  // modifiers: pEGFRd, pERK
  v_79: MEK => pMEK; cyt*Function_for_v_79(AKT_activation_pEGFR, AKT_activation_pErbB12, AKT_activation_pErbB13, AKT_activation_pErbB32, AKT_activation_pIGF1R, AKT_activation_pMetEGFR, AKT_activation_pMetErbB3, AKT_activation_pMetd, AKT_internIGF1R_effect, EGFR_ErbB2_basal_act, EGFR_ErbB3_basal_act, EGFR_basal_activation, ErbB3_ErbB2_basal_act, IGF1R_basal_activation, MEK, MEK_phosphorylation_pErbB12, Met_EGFR_basal_act, Met_ErbB3_basal_act, Met_basal_act, feedback_pAKT, feedback_pERK, feedback_pERK_on_AKT, feedback_pS6K1, init_AKT, init_EGFR, init_ErbB2, init_ErbB3, init_IGF1R, init_Met, init_RTKph, init_pERK, init_pS6K1, pAKT_deactivation, pEGFR_internalize, pERK, pErbB12, pErbB12_internalize, pErbB13_internalize, pErbB32_internalize, pIGF1R_degradation, pIGF1R_internalize, pIGF1Ri_phosphatase, pMetEGFR_internalize, pMetErbB3_internalize, pMet_internalize);  // modifiers: pERK, pErbB12
  v_80: MEK => pMEK; cyt*Function_for_v_80(AKT_activation_pEGFR, AKT_activation_pErbB12, AKT_activation_pErbB13, AKT_activation_pErbB32, AKT_activation_pIGF1R, AKT_activation_pMetEGFR, AKT_activation_pMetErbB3, AKT_activation_pMetd, AKT_internIGF1R_effect, EGFR_ErbB2_basal_act, EGFR_ErbB3_basal_act, EGFR_basal_activation, ErbB3_ErbB2_basal_act, IGF1R_basal_activation, MEK, MEK_phosphorylation_pErbB13, Met_EGFR_basal_act, Met_ErbB3_basal_act, Met_basal_act, feedback_pAKT, feedback_pERK, feedback_pERK_on_AKT, feedback_pS6K1, init_AKT, init_EGFR, init_ErbB2, init_ErbB3, init_IGF1R, init_Met, init_RTKph, init_pERK, init_pS6K1, pAKT_deactivation, pEGFR_internalize, pERK, pErbB12_internalize, pErbB13, pErbB13_internalize, pErbB32_internalize, pIGF1R_degradation, pIGF1R_internalize, pIGF1Ri_phosphatase, pMetEGFR_internalize, pMetErbB3_internalize, pMet_internalize);  // modifiers: pERK, pErbB13
  v_81: MEK => pMEK; cyt*Function_for_v_81(AKT_activation_pEGFR, AKT_activation_pErbB12, AKT_activation_pErbB13, AKT_activation_pErbB32, AKT_activation_pIGF1R, AKT_activation_pMetEGFR, AKT_activation_pMetErbB3, AKT_activation_pMetd, AKT_internIGF1R_effect, EGFR_ErbB2_basal_act, EGFR_ErbB3_basal_act, EGFR_basal_activation, ErbB3_ErbB2_basal_act, IGF1R_basal_activation, MEK, MEK_phosphorylation_pErbB32, Met_EGFR_basal_act, Met_ErbB3_basal_act, Met_basal_act, feedback_pAKT, feedback_pERK, feedback_pERK_on_AKT, feedback_pS6K1, init_AKT, init_EGFR, init_ErbB2, init_ErbB3, init_IGF1R, init_Met, init_RTKph, init_pERK, init_pS6K1, pAKT_deactivation, pEGFR_internalize, pERK, pErbB12_internalize, pErbB13_internalize, pErbB32, pErbB32_internalize, pIGF1R_degradation, pIGF1R_internalize, pIGF1Ri_phosphatase, pMetEGFR_internalize, pMetErbB3_internalize, pMet_internalize);  // modifiers: pERK, pErbB32
  v_82: MEK => pMEK; cyt*Function_for_v_82(AKT_activation_pEGFR, AKT_activation_pErbB12, AKT_activation_pErbB13, AKT_activation_pErbB32, AKT_activation_pIGF1R, AKT_activation_pMetEGFR, AKT_activation_pMetErbB3, AKT_activation_pMetd, AKT_internIGF1R_effect, EGFR_ErbB2_basal_act, EGFR_ErbB3_basal_act, EGFR_basal_activation, ErbB3_ErbB2_basal_act, IGF1R_basal_activation, MEK, MEK_phosphorylation_pMetd, Met_EGFR_basal_act, Met_ErbB3_basal_act, Met_basal_act, feedback_pAKT, feedback_pERK, feedback_pERK_on_AKT, feedback_pS6K1, init_AKT, init_EGFR, init_ErbB2, init_ErbB3, init_IGF1R, init_Met, init_RTKph, init_pERK, init_pS6K1, pAKT_deactivation, pEGFR_internalize, pERK, pErbB12_internalize, pErbB13_internalize, pErbB32_internalize, pIGF1R_degradation, pIGF1R_internalize, pIGF1Ri_phosphatase, pMetEGFR_internalize, pMetErbB3_internalize, pMet_internalize, pMetd);  // modifiers: pERK, pMetd
  v_83: MEK => pMEK; cyt*Function_for_v_83(AKT_activation_pEGFR, AKT_activation_pErbB12, AKT_activation_pErbB13, AKT_activation_pErbB32, AKT_activation_pIGF1R, AKT_activation_pMetEGFR, AKT_activation_pMetErbB3, AKT_activation_pMetd, AKT_internIGF1R_effect, EGFR_ErbB2_basal_act, EGFR_ErbB3_basal_act, EGFR_basal_activation, ErbB3_ErbB2_basal_act, IGF1R_basal_activation, MEK, MEK_phosphorylation_pMetEGFR, Met_EGFR_basal_act, Met_ErbB3_basal_act, Met_basal_act, feedback_pAKT, feedback_pERK, feedback_pERK_on_AKT, feedback_pS6K1, init_AKT, init_EGFR, init_ErbB2, init_ErbB3, init_IGF1R, init_Met, init_RTKph, init_pERK, init_pS6K1, pAKT_deactivation, pEGFR_internalize, pERK, pErbB12_internalize, pErbB13_internalize, pErbB32_internalize, pIGF1R_degradation, pIGF1R_internalize, pIGF1Ri_phosphatase, pMetEGFR, pMetEGFR_internalize, pMetErbB3_internalize, pMet_internalize);  // modifiers: pERK, pMetEGFR
  v_84: MEK => pMEK; cyt*Function_for_v_84(AKT_activation_pEGFR, AKT_activation_pErbB12, AKT_activation_pErbB13, AKT_activation_pErbB32, AKT_activation_pIGF1R, AKT_activation_pMetEGFR, AKT_activation_pMetErbB3, AKT_activation_pMetd, AKT_internIGF1R_effect, EGFR_ErbB2_basal_act, EGFR_ErbB3_basal_act, EGFR_basal_activation, ErbB3_ErbB2_basal_act, IGF1R_basal_activation, MEK, MEK_phosphorylation_pIGF1R, Met_EGFR_basal_act, Met_ErbB3_basal_act, Met_basal_act, feedback_pAKT, feedback_pERK, feedback_pERK_on_AKT, feedback_pS6K1, init_AKT, init_EGFR, init_ErbB2, init_ErbB3, init_IGF1R, init_Met, init_RTKph, init_pERK, init_pS6K1, pAKT_deactivation, pEGFR_internalize, pERK, pErbB12_internalize, pErbB13_internalize, pErbB32_internalize, pIGF1R_degradation, pIGF1R_internalize, pIGF1Rd, pIGF1Ri_phosphatase, pMetEGFR_internalize, pMetErbB3_internalize, pMet_internalize);  // modifiers: pERK, pIGF1Rd
  v_85: MEK => pMEK; cyt*Function_for_v_85(AKT_activation_pEGFR, AKT_activation_pErbB12, AKT_activation_pErbB13, AKT_activation_pErbB32, AKT_activation_pIGF1R, AKT_activation_pMetEGFR, AKT_activation_pMetErbB3, AKT_activation_pMetd, AKT_internIGF1R_effect, EGFR_ErbB2_basal_act, EGFR_ErbB3_basal_act, EGFR_basal_activation, ErbB3_ErbB2_basal_act, IGF1R_basal_activation, MEK, MEK_phosphorylation_pMetErbB3, Met_EGFR_basal_act, Met_ErbB3_basal_act, Met_basal_act, feedback_pAKT, feedback_pERK, feedback_pERK_on_AKT, feedback_pS6K1, init_AKT, init_EGFR, init_ErbB2, init_ErbB3, init_IGF1R, init_Met, init_RTKph, init_pERK, init_pS6K1, pAKT_deactivation, pEGFR_internalize, pERK, pErbB12_internalize, pErbB13_internalize, pErbB32_internalize, pIGF1R_degradation, pIGF1R_internalize, pIGF1Ri_phosphatase, pMetEGFR_internalize, pMetErbB3, pMetErbB3_internalize, pMet_internalize);  // modifiers: pERK, pMetErbB3
  v_86: MEK => pMEK; cyt*Function_for_v_86(AKT_activation_pEGFR, AKT_activation_pErbB12, AKT_activation_pErbB13, AKT_activation_pErbB32, AKT_activation_pIGF1R, AKT_activation_pMetEGFR, AKT_activation_pMetErbB3, AKT_activation_pMetd, AKT_internIGF1R_effect, EGFR_ErbB2_basal_act, EGFR_ErbB3_basal_act, EGFR_basal_activation, ErbB3_ErbB2_basal_act, IGF1R_basal_activation, MEK, MEK_internIGF1R_effect, MEK_phosphorylation_pIGF1R, Met_EGFR_basal_act, Met_ErbB3_basal_act, Met_basal_act, feedback_pAKT, feedback_pERK, feedback_pERK_on_AKT, feedback_pS6K1, init_AKT, init_EGFR, init_ErbB2, init_ErbB3, init_IGF1R, init_Met, init_RTKph, init_pERK, init_pS6K1, pAKT_deactivation, pEGFR_internalize, pERK, pErbB12_internalize, pErbB13_internalize, pErbB32_internalize, pIGF1R_degradation, pIGF1R_internalize, pIGF1Ri, pIGF1Ri_phosphatase, pMetEGFR_internalize, pMetErbB3_internalize, pMet_internalize);  // modifiers: pERK, pIGF1Ri
  v_87: pMEK => MEK; cyt*pMEK_dephosphorylation*pMEK;
  v_88: ERK => pERK; cyt*Function_for_v_88(ERK, ERK_phosphorylation_pMEK, pMEK);  // modifiers: pMEK
  v_89: pERK => ERK; cyt*pERK_dephosphorylation*pERK;
  v_90: AKT => pAKT; cyt*Function_for_v_90(AKT, AKT_activation_pEGFR, feedback_pERK_on_AKT, feedback_pS6K1, pEGFRd, pERK, pS6K1);  // modifiers: pEGFRd, pERK, pS6K1
  v_91: AKT => pAKT; cyt*Function_for_v_91(AKT, AKT_activation_pErbB12, feedback_pERK_on_AKT, feedback_pS6K1, pERK, pErbB12, pS6K1);  // modifiers: pERK, pErbB12, pS6K1
  v_92: AKT => pAKT; cyt*Function_for_v_92(AKT, AKT_activation_pErbB13, feedback_pERK_on_AKT, feedback_pS6K1, pERK, pErbB13, pS6K1);  // modifiers: pERK, pErbB13, pS6K1
  v_93: AKT => pAKT; cyt*Function_for_v_93(AKT, AKT_activation_pErbB32, feedback_pERK_on_AKT, feedback_pS6K1, pERK, pErbB32, pS6K1);  // modifiers: pERK, pErbB32, pS6K1
  v_94: AKT => pAKT; cyt*Function_for_v_94(AKT, AKT_activation_pMetEGFR, feedback_pERK_on_AKT, feedback_pS6K1, pERK, pMetEGFR, pS6K1);  // modifiers: pERK, pMetEGFR, pS6K1
  v_95: AKT => pAKT; cyt*Function_for_v_95(AKT, AKT_activation_pMetd, feedback_pERK_on_AKT, feedback_pS6K1, pERK, pMetd, pS6K1);  // modifiers: pERK, pMetd, pS6K1
  v_96: AKT => pAKT; cyt*Function_for_v_96(AKT, AKT_activation_pIGF1R, feedback_pERK_on_AKT, feedback_pS6K1, pERK, pIGF1Rd, pS6K1);  // modifiers: pERK, pIGF1Rd, pS6K1
  v_97: AKT => pAKT; cyt*Function_for_v_97(AKT, AKT_activation_pMetErbB3, feedback_pERK_on_AKT, feedback_pS6K1, pERK, pMetErbB3, pS6K1);  // modifiers: pERK, pMetErbB3, pS6K1
  v_98: AKT => pAKT; cyt*Function_for_v_98(AKT, AKT_activation_pIGF1R, AKT_internIGF1R_effect, feedback_pERK_on_AKT, feedback_pS6K1, pERK, pIGF1Ri, pS6K1);  // modifiers: pERK, pIGF1Ri, pS6K1
  v_99: pAKT => AKT; cyt*pAKT_deactivation*pAKT;
  v_100: S6K1 => pS6K1; cyt*Function_for_v_100(S6K1, S6K1_phosphorylation_pAKT, pAKT);  // modifiers: pAKT
  v_101: S6K1 => pS6K1; cyt*Function_for_v_101(S6K1, S6K1_phosphorylation_pERK, pERK);  // modifiers: pERK
  v_102: pS6K1 => S6K1; cyt*pS6K1_dephosphorylation*pS6K1;
  v_103: S6 => pS6; cyt*Function_for_v_103(S6, S6_phosphorylation_pS6K1, pS6K1);  // modifiers: pS6K1
  v_104: S6 => pS6; cyt*Function_for_v_104(S6, S6_phosphorylation_pERK, pERK);  // modifiers: pERK
  v_105: pS6 => S6; cyt*pS6_dephosphorylation*pS6;

  // Events:
  Ligand_on_1: at (time > 0): dose_EGF = 2.5*ModelValue_122_0;

  // Unit definitions:
  unit length = metre;
  unit area = metre^2;
  unit volume = litre;
  unit time = 60 second;
  unit substance = mole;
end
