// SBML level 2 version 4

function Function_for_R64(S213, cell, kG2)
  kG2*S213*cell/cell;
end

function Function_for_R106(OS_DM_Rhod_act_a_bs_1_ps_1_p4, S44, cell, kG14)
  kG14*S44*OS_DM_Rhod_act_a_bs_1_ps_1_p4*cell/cell;
end

function Function_for_R26(OS_CP_RGS_bs_1, S26, cell, kRGS1)
  kRGS1*OS_CP_RGS_bs_1*S26*cell/cell;
end

function Function_for_R16(S15, cell, kG4GDP)
  kG4GDP*S15*cell/cell;
end

function Function_for_R27(S26, cell, kPDEshutoff)
  kPDEshutoff*S26*cell/cell;
end

function Function_for_R62(S211, cell, kG3)
  kG3*S211*cell/cell;
end

function Function_for_R70(S203, cell, kG7)
  kG7*S203*cell/cell;
end

function Function_for_R7(S10, cell, kG3)
  kG3*S10*cell/cell;
end

function Function_for_R39(OS_CP_cGmp, cell, rateLaw5)
  rateLaw5*OS_CP_cGmp*cell/cell;
end

function Function_for_R22(S18, cell, kG4GDP)
  kG4GDP*S18*cell/cell;
end

function Function_for_R38(cell, rateLaw4)
  rateLaw4*cell/cell;
end

function Function_for_R18(S16, cell, kG4GDP)
  kG4GDP*S16*cell/cell;
end

function Function_for_R84(S225, cell, kRK3ATP)
  kRK3ATP*S225*cell/cell;
end

function Function_for_R57(S208, cell, kG6)
  kG6*S208*cell/cell;
end

function Function_for_R110(S232, cell, kPDEshutoff)
  kPDEshutoff*S232*cell/cell;
end

function Function_for_R33(S23, cell, kRec4)
  kRec4*S23*cell/cell;
end

function Function_for_R6(S10, cell, kG2)
  kG2*S10*cell/cell;
end

function Function_for_R56(S207, cell, kG3)
  kG3*S207*cell/cell;
end

function Function_for_R8(S9, cell, kG6)
  kG6*S9*cell/cell;
end

function Function_for_R73(S218, cell, kP4)
  kP4*S218*cell/cell;
end

function Function_for_R94(OS_DM_Rhod_act_a_bs_1_ps_1_p4, OS_CP_Arr_bs_1_bs_2, cell, kA14)
  kA14*OS_CP_Arr_bs_1_bs_2*OS_DM_Rhod_act_a_bs_1_ps_1_p4*cell/cell;
end

function Function_for_R12(S13, cell, kG4GDP)
  kG4GDP*S13*cell/cell;
end

function Function_for_R19(S16, cell, kG5GTP)
  kG5GTP*S16*cell/cell;
end

function Function_for_R25(S26, OS_CP_GtA_g_tp, cell, kP3)
  kP3*S26*OS_CP_GtA_g_tp*cell/cell;
end

function Function_for_R115(S237, cell, kRK4)
  kRK4*S237*cell/cell;
end

function Function_for_R9(OS_DM_Ops_bs_1, cell, kRrecyc)
  kRrecyc*OS_DM_Ops_bs_1*cell/cell;
end

function Function_for_R49(S201, cell, kG2)
  kG2*S201*cell/cell;
end

function Function_for_R127(S244, cell, kA2)
  kA2*S244*cell/cell;
end

function Function_for_R132(S246, cell, kA3)
  kA3*S246*cell/cell;
end

function Function_for_R54(S206, cell, kG6)
  kG6*S206*cell/cell;
end

function Function_for_R44(OS_CP_RK_bs_1, OS_DM_Rhod_act_a_bs_1_ps_1_p0, cell, kRK10)
  kRK10*OS_CP_RK_bs_1*OS_DM_Rhod_act_a_bs_1_ps_1_p0*cell/cell;
end

function Function_for_R138(S249, cell, kA3)
  kA3*S249*cell/cell;
end

function Function_for_R144(S255, cell, kRK4)
  kRK4*S255*cell/cell;
end

function Function_for_R141(S252, cell, kRK4)
  kRK4*S252*cell/cell;
end

function Function_for_R29(OS_CP_GtA_g_dp, OS_CP_GtBG_bs_1_bs_2, cell, kGrecycl)
  kGrecycl*OS_CP_GtA_g_dp*OS_CP_GtBG_bs_1_bs_2*cell/cell;
end

function Function_for_R105(OS_DM_Rhod_act_a_bs_1_ps_1_p3, S44, cell, kG13)
  kG13*S44*OS_DM_Rhod_act_a_bs_1_ps_1_p3*cell/cell;
end

function Function_for_R131(S246, cell, kA2)
  kA2*S246*cell/cell;
end

function Function_for_R139(S250, cell, kRGS2)
  kRGS2*S250*cell/cell;
end

function Function_for_R34(OS_CP_Ca2PFree_bs_1, cell, rateLaw1)
  rateLaw1*OS_CP_Ca2PFree_bs_1*cell/cell;
end

function Function_for_R137(S249, cell, kA2)
  kA2*S249*cell/cell;
end

function Function_for_R125(S242, cell, kRK3ATP)
  kRK3ATP*S242*cell/cell;
end

function Function_for_R68(S215, cell, kG3)
  kG3*S215*cell/cell;
end

function Function_for_R51(S204, cell, kG6)
  kG6*S204*cell/cell;
end

function Function_for_R37(cell, rateLaw3)
  rateLaw3*cell/cell;
end

function Function_for_R50(S201, cell, kG3)
  kG3*S201*cell/cell;
end

function Function_for_R52(S205, cell, kG2)
  kG2*S205*cell/cell;
end

function Function_for_R119(S239, cell, kRK3ATP)
  kRK3ATP*S239*cell/cell;
end

function Function_for_R128(S244, cell, kA3)
  kA3*S244*cell/cell;
end

function Function_for_R122(S241, cell, kRK2)
  kRK2*S241*cell/cell;
end

function Function_for_R121(S240, cell, kRK3ATP)
  kRK3ATP*S240*cell/cell;
end

function Function_for_R45(OS_DM_Rhod_act_a_bs_1_ps_1_p0, cell, ktherm)
  ktherm*OS_DM_Rhod_act_a_bs_1_ps_1_p0*cell/cell;
end

function Function_for_R123(S241, cell, kRK3ATP)
  kRK3ATP*S241*cell/cell;
end

function Function_for_R53(S205, cell, kG3)
  kG3*S205*cell/cell;
end

function Function_for_R30(OS_CP_Rec_T_bs_1_bs_2, OS_CP_Ca2PFree_bs_1, cell, kRec1)
  kRec1*OS_CP_Rec_T_bs_1_bs_2*OS_CP_Ca2PFree_bs_1*cell/cell;
end

function Function_for_R48(OS_DM_Rhod_act_a_bs_1_ps_1_p0, S44, cell, kG10)
  kG10*S44*OS_DM_Rhod_act_a_bs_1_ps_1_p0*cell/cell;
end

function Function_for_R124(S242, cell, kRK2)
  kRK2*S242*cell/cell;
end

function Function_for_R140(S251, cell, kRK4)
  kRK4*S251*cell/cell;
end

function Function_for_R136(S248, cell, kA3)
  kA3*S248*cell/cell;
end

function Function_for_R23(S18, cell, kG5GTP)
  kG5GTP*S18*cell/cell;
end

function Function_for_R10(S12, cell, kG4GDP)
  kG4GDP*S12*cell/cell;
end

function Function_for_R87(OS_CP_RK_bs_1, OS_DM_Rhod_act_a_bs_1_ps_1_p3, cell, kRK13)
  kRK13*OS_CP_RK_bs_1*OS_DM_Rhod_act_a_bs_1_ps_1_p3*cell/cell;
end

function Function_for_R109(OS_CP_RGS_bs_1, S232, cell, kRGS1)
  kRGS1*OS_CP_RGS_bs_1*S232*cell/cell;
end

function Function_for_R59(S209, cell, kG3)
  kG3*S209*cell/cell;
end

function Function_for_R3(OS_DM_Rhod_act_i_bs_1_ps_1_p0, S44, cell, kG_pre1)
  kG_pre1*OS_DM_Rhod_act_i_bs_1_ps_1_p0*S44*cell/cell;
end

function Function_for_R99(OS_DM_Rhod_act_a_bs_1_ps_1_p3, cell, ktherm)
  ktherm*OS_DM_Rhod_act_a_bs_1_ps_1_p3*cell/cell;
end

function Function_for_R5(OS_DM_Ops_bs_1, S44, cell, kOps)
  kOps*OS_DM_Ops_bs_1*S44*cell/cell;
end

function Function_for_R4(S118, cell, kG_pre2)
  kG_pre2*S118*cell/cell;
end

function Function_for_R35(OS_CP_Ca2Pbuff_bs_1, cell, k2)
  k2*OS_CP_Ca2Pbuff_bs_1*cell/cell;
end

function Function_for_R129(S245, cell, kA2)
  kA2*S245*cell/cell;
end

function Function_for_R98(OS_DM_Rhod_act_a_bs_1_ps_1_p2, cell, ktherm)
  ktherm*OS_DM_Rhod_act_a_bs_1_ps_1_p2*cell/cell;
end

function Function_for_R89(OS_CP_RK_bs_1, OS_DM_Rhod_act_a_bs_1_ps_1_p5, cell, kRK15)
  kRK15*OS_CP_RK_bs_1*OS_DM_Rhod_act_a_bs_1_ps_1_p5*cell/cell;
end

function Function_for_R13(S13, cell, kG5GTP)
  kG5GTP*S13*cell/cell;
end

function Function_for_R61(S211, cell, kG2)
  kG2*S211*cell/cell;
end

function Function_for_R63(S212, cell, kG6)
  kG6*S212*cell/cell;
end

function Function_for_R104(OS_DM_Rhod_act_a_bs_1_ps_1_p2, S44, cell, kG12)
  kG12*S44*OS_DM_Rhod_act_a_bs_1_ps_1_p2*cell/cell;
end

function Function_for_R55(S207, cell, kG2)
  kG2*S207*cell/cell;
end

function Function_for_R47(S202, cell, kG5GTP)
  kG5GTP*S202*cell/cell;
end

function Function_for_R117(S238, cell, kRK3ATP)
  kRK3ATP*S238*cell/cell;
end

function Function_for_R58(S209, cell, kG2)
  kG2*S209*cell/cell;
end

function Function_for_R21(S17, cell, kG5GTP)
  kG5GTP*S17*cell/cell;
end

function Function_for_R15(S14, cell, kG5GTP)
  kG5GTP*S14*cell/cell;
end

function Function_for_R31(S22, cell, kRec2)
  kRec2*S22*cell/cell;
end

function Function_for_R28(OS_CP_GtA_g_tp, cell, kGshutoff)
  kGshutoff*OS_CP_GtA_g_tp*cell/cell;
end

function Function_for_R24(OS_CP_GtA_g_tp, OS_CP_PDE_act_i_bs_1_bs_2_bs_3, cell, kP1)
  kP1*OS_CP_PDE_act_i_bs_1_bs_2_bs_3*OS_CP_GtA_g_tp*cell/cell;
end

function Function_for_R20(S17, cell, kG4GDP)
  kG4GDP*S17*cell/cell;
end

function Function_for_R83(S225, cell, kRK2)
  kRK2*S225*cell/cell;
end

function Function_for_R60(S210, cell, kG6)
  kG6*S210*cell/cell;
end

function Function_for_R17(S15, cell, kG5GTP)
  kG5GTP*S15*cell/cell;
end

function Function_for_R32(OS_CP_RK_bs_1, S22, cell, kRec3)
  kRec3*OS_CP_RK_bs_1*S22*cell/cell;
end

function Function_for_R69(S216, cell, kG6)
  kG6*S216*cell/cell;
end

function Function_for_R126(S243, cell, kRK2)
  kRK2*S243*cell/cell;
end

function Function_for_R108(OS_DM_Rhod_act_a_bs_1_ps_1_p6, S44, cell, kG16)
  kG16*S44*OS_DM_Rhod_act_a_bs_1_ps_1_p6*cell/cell;
end

function Function_for_R71(S217, cell, kP1rev)
  kP1rev*S217*cell/cell;
end

function Function_for_R103(OS_DM_Rhod_act_a_bs_1_ps_1_p1, S44, cell, kG11)
  kG11*S44*OS_DM_Rhod_act_a_bs_1_ps_1_p1*cell/cell;
end

function Function_for_R133(S247, cell, kA2)
  kA2*S247*cell/cell;
end

function Function_for_R72(S217, cell, kP2)
  kP2*S217*cell/cell;
end

function Function_for_R116(S238, cell, kRK2)
  kRK2*S238*cell/cell;
end

function Function_for_R97(OS_DM_Rhod_act_a_bs_1_ps_1_p1, cell, ktherm)
  ktherm*OS_DM_Rhod_act_a_bs_1_ps_1_p1*cell/cell;
end

function Function_for_R96(OS_DM_Rhod_act_a_bs_1_ps_1_p6, OS_CP_Arr_bs_1_bs_2, cell, kA16)
  kA16*OS_CP_Arr_bs_1_bs_2*OS_DM_Rhod_act_a_bs_1_ps_1_p6*cell/cell;
end

function Function_for_R91(OS_DM_Rhod_act_a_bs_1_ps_1_p1, OS_CP_Arr_bs_1_bs_2, cell, kA11)
  kA11*OS_CP_Arr_bs_1_bs_2*OS_DM_Rhod_act_a_bs_1_ps_1_p1*cell/cell;
end

function Function_for_R90(OS_CP_RK_bs_1, OS_DM_Rhod_act_a_bs_1_ps_1_p6, cell, kRK16)
  kRK16*OS_CP_RK_bs_1*OS_DM_Rhod_act_a_bs_1_ps_1_p6*cell/cell;
end

function Function_for_R135(S248, cell, kA2)
  kA2*S248*cell/cell;
end

function Function_for_R130(S245, cell, kA3)
  kA3*S245*cell/cell;
end

function Function_for_R120(S240, cell, kRK2)
  kRK2*S240*cell/cell;
end

function Function_for_R93(OS_DM_Rhod_act_a_bs_1_ps_1_p3, OS_CP_Arr_bs_1_bs_2, cell, kA13)
  kA13*OS_CP_Arr_bs_1_bs_2*OS_DM_Rhod_act_a_bs_1_ps_1_p3*cell/cell;
end

function Function_for_R143(S254, cell, kRK4)
  kRK4*S254*cell/cell;
end

function Function_for_R101(OS_DM_Rhod_act_a_bs_1_ps_1_p5, cell, ktherm)
  ktherm*OS_DM_Rhod_act_a_bs_1_ps_1_p5*cell/cell;
end

function Function_for_R46(S202, cell, kG4GDP)
  kG4GDP*S202*cell/cell;
end

function Function_for_R86(OS_CP_RK_bs_1, OS_DM_Rhod_act_a_bs_1_ps_1_p2, cell, kRK12)
  kRK12*OS_CP_RK_bs_1*OS_DM_Rhod_act_a_bs_1_ps_1_p2*cell/cell;
end

function Function_for_R95(OS_DM_Rhod_act_a_bs_1_ps_1_p5, OS_CP_Arr_bs_1_bs_2, cell, kA15)
  kA15*OS_CP_Arr_bs_1_bs_2*OS_DM_Rhod_act_a_bs_1_ps_1_p5*cell/cell;
end

function Function_for_R92(OS_DM_Rhod_act_a_bs_1_ps_1_p2, OS_CP_Arr_bs_1_bs_2, cell, kA12)
  kA12*OS_CP_Arr_bs_1_bs_2*OS_DM_Rhod_act_a_bs_1_ps_1_p2*cell/cell;
end

function Function_for_R100(OS_DM_Rhod_act_a_bs_1_ps_1_p4, cell, ktherm)
  ktherm*OS_DM_Rhod_act_a_bs_1_ps_1_p4*cell/cell;
end

function Function_for_R11(S12, cell, kG5GTP)
  kG5GTP*S12*cell/cell;
end

function Function_for_R107(OS_DM_Rhod_act_a_bs_1_ps_1_p5, S44, cell, kG15)
  kG15*S44*OS_DM_Rhod_act_a_bs_1_ps_1_p5*cell/cell;
end

function Function_for_R142(S253, cell, kRK4)
  kRK4*S253*cell/cell;
end

function Function_for_R102(OS_DM_Rhod_act_a_bs_1_ps_1_p6, cell, ktherm)
  ktherm*OS_DM_Rhod_act_a_bs_1_ps_1_p6*cell/cell;
end

function Function_for_R74(S219, cell, kRGS2)
  kRGS2*S219*cell/cell;
end

function Function_for_R118(S239, cell, kRK2)
  kRK2*S239*cell/cell;
end

function Function_for_R134(S247, cell, kA3)
  kA3*S247*cell/cell;
end

function Function_for_R14(S14, cell, kG4GDP)
  kG4GDP*S14*cell/cell;
end

function Function_for_R111_1(S233, cell, kA5)
  kA5*S233*cell/cell;
end

function Function_for_R66(S214, cell, kG6)
  kG6*S214*cell/cell;
end

function flow_eq_1(IS_CP_Arr_bs_1_bs_2, sum_arr, t_sumArr, v_is_os_arr)
  IS_CP_Arr_bs_1_bs_2*(t_sumArr - sum_arr)*v_is_os_arr;
end

function Function_for_R36(cell, rateLaw2)
  rateLaw2*cell/cell;
end

function Function_for_R40_1(OS_CP_Arr_bs_1_bs_2, cell, kA4)
  kA4*OS_CP_Arr_bs_1_bs_2*OS_CP_Arr_bs_1_bs_2*cell/cell;
end

function v_GtBG_OS_IS_1(GtBGRedFact, Gtot, OS_CP_GtBG_bs_1_bs_2, sumGtB, v_gtBG_OS_IS)
  v_gtBG_OS_IS*OS_CP_GtBG_bs_1_bs_2*(sumGtB - GtBGRedFact*Gtot);
end

function Function_for_R85(OS_CP_RK_bs_1, OS_DM_Rhod_act_a_bs_1_ps_1_p1, cell, kRK11)
  kRK11*OS_CP_RK_bs_1*OS_DM_Rhod_act_a_bs_1_ps_1_p1*cell/cell;
end

function Function_for_R81_1(S223, cell, kA4_IS)
  2*kA4_IS*S223*S223*cell/cell;
end

function flow_eq_4(OS_CP_Rec_T_bs_1_bs_2, sum_Rec, tsum_rec, v_os_is_rec)
  OS_CP_Rec_T_bs_1_bs_2*(tsum_rec - sum_Rec)*v_os_is_rec;
end

function Function_for_R113_1(S235, cell, kA5)
  kA5*S235*cell/cell;
end

function Function_for_R1_1(Rtot, OS_DM_Rhod_act_i_bs_1_ps_1_p0, cell, stimulus)
  stimulus*OS_DM_Rhod_act_i_bs_1_ps_1_p0*cell/(cell*Rtot);
end

function flow_eq_3(S235, sum_arr, t_sumArr, v_is_os_arr)
  S235*(t_sumArr - sum_arr)*v_is_os_arr;
end

function flow_eq_2(S223, sum_arr, t_sumArr, v_is_os_arr)
  S223*(t_sumArr - sum_arr)*v_is_os_arr;
end

function v_Gtx_OS_IS_2(Gtot, OS_CP_GtA_g_dp, sumGta, v_gtX_OS_IS)
  v_gtX_OS_IS*OS_CP_GtA_g_dp*(sumGta - 0.15*Gtot);
end

function Function_for_R75_1(S221, cell, kA5)
  kA5*S221*cell/cell;
end

function Function_for_R2_1(Rtot, S118, cell, stimulus)
  1/Rtot*stimulus*S118*cell/cell;
end

function Function_for_R67(S215, cell, kG2)
  kG2*S215*cell/cell;
end

function Function_for_R42_1(IS_CP_Arr_bs_1_bs_2, cell, kA4_IS)
  0.5*kA4_IS*IS_CP_Arr_bs_1_bs_2*IS_CP_Arr_bs_1_bs_2*cell/cell;
end

function Function_for_R77_1(S223, cell, kA5)
  kA5*S223*cell/cell;
end

function Function_for_R88(OS_CP_RK_bs_1, OS_DM_Rhod_act_a_bs_1_ps_1_p4, cell, kRK14)
  kRK14*OS_CP_RK_bs_1*OS_DM_Rhod_act_a_bs_1_ps_1_p4*cell/cell;
end

function Function_for_R65(S213, cell, kG3)
  kG3*S213*cell/cell;
end

function v_Gtx_OS_IS_1(Gtot, OS_CP_GtA_g_tp, sumGta, v_gtX_OS_IS)
  v_gtX_OS_IS*OS_CP_GtA_g_tp*(sumGta - 0.15*Gtot);
end

function Function_for_R79_1(S221, cell, kA4)
  kA4*S221*S221*cell/cell;
end

model MODEL1710030000()
  // Tikidji-Hamburyan2018 - Rod phototransduction under strong illumination
  // This model is described in the article:
  // Rods progressively escape saturation to drive visual responses in daylight conditions.
  // Tikidji-Hamburyan A, Reinhard K, Storchi R, Dietter J, Seitter H, Davis KE, Idrees S, Mutter M, Walmsley L, Bedford RA, Ueffing M, Ala-Laurila P, Brown TM, Lucas RJ, Münch TA.
  // Nat Commun 2017 Nov; 8(1): 1813
  // Abstract:
  // Rod and cone photoreceptors support vision across large light intensity ranges. Rods, active under dim illumination, are thought to saturate at higher (photopic) irradiances. The extent of rod saturation is not well defined; some studies report rod activity well into the photopic range. Using electrophysiological recordings from retina and dorsal lateral geniculate nucleus of cone-deficient and visually intact mice, we describe stimulus and physiological factors that influence photopic rod-driven responses. We find that rod contrast sensitivity is initially strongly reduced at high irradiances, but progressively recovers to allow responses to moderate contrast stimuli. Surprisingly, rods recover faster at higher light levels. A model of rod phototransduction suggests that phototransduction gain adjustments and bleaching adaptation underlie rod recovery. Consistently, exogenous chromophore reduces rod responses at bright background. Thus, bleaching adaptation renders mouse rods responsive to modest contrast at any irradiance. Paradoxically, raising irradiance across the photopic range increases the robustness of rod responses.
  // This model is hosted on BioModels Database and identified by: MODEL1710030000.
  // To cite BioModels Database, please use: Chelliah V et al. BioModels: ten-year anniversary. Nucl. Acids Res. 2015, 43(Database issue):D542-8.
  // To the extent possible under law, all copyright and related or neighbouring rights to this encoded model have been dedicated to the public domain worldwide. Please refer to CC0 Public Domain Dedication for more information.
  // biomodels.db:MODEL1710030000

  // Compartments:
  compartment cell = vcyto;

  // Species:
  substanceOnly species OS_CP_RK_bs_1 in cell = 0.0009631352; OS_CP_RK_bs_1 is "@OS_CP::RK(bs_1)";
  substanceOnly species OS_CP_RK_pre_bs_1 in cell = 0; OS_CP_RK_pre_bs_1 is "@OS_CP::RK_pre(bs_1)";
  substanceOnly species OS_CP_RK_post_bs_1 in cell = 0; OS_CP_RK_post_bs_1 is "@OS_CP::RK_post(bs_1)";
  substanceOnly species OS_DM_Ops_bs_1 in cell = 0; OS_DM_Ops_bs_1 is "@OS_DM::Ops(bs_1)";
  substanceOnly species OS_CP_PDE_act_i_bs_1_bs_2_bs_3 in cell = 3.321156; OS_CP_PDE_act_i_bs_1_bs_2_bs_3 is "@OS_CP::PDE(act~i,bs_1,bs_2,bs_3)";
  substanceOnly species OS_CP_GtA_g_nil in cell = 0; OS_CP_GtA_g_nil is "@OS_CP::GtA(g~nil)";
  substanceOnly species S9 in cell = 0; S9 is "@OS_DM::GtA(g~tp!1)@OS_CP.GtBG(bs_1!1,bs_2!2)@OS_CP.Ops(bs_1!2)";
  substanceOnly species S10 in cell = 0; S10 is "@OS_DM::GtA(g~dp!1)@OS_CP.GtBG(bs_1!1,bs_2!2)@OS_CP.Ops(bs_1!2)";
  substanceOnly species OS_DM_Rhod_act_i_bs_1_ps_1_p0 in cell = 42.3934412; OS_DM_Rhod_act_i_bs_1_ps_1_p0 is "@OS_DM::Rhod(act~i,bs_1,ps_1~p0)";
  substanceOnly species S12 in cell = 0; S12 is "@OS_DM::GtA(g~nil!1)@OS_CP.GtBG(bs_1!1,bs_2!2)@OS_CP.Rhod(act~a,bs_1!2,ps_1~p0)";
  substanceOnly species S13 in cell = 0; S13 is "@OS_DM::GtA(g~nil!1)@OS_CP.GtBG(bs_1!1,bs_2!2)@OS_CP.Rhod(act~a,bs_1!2,ps_1~p1)";
  substanceOnly species S14 in cell = 0; S14 is "@OS_DM::GtA(g~nil!1)@OS_CP.GtBG(bs_1!1,bs_2!2)@OS_CP.Rhod(act~a,bs_1!2,ps_1~p2)";
  substanceOnly species S15 in cell = 0; S15 is "@OS_DM::GtA(g~nil!1)@OS_CP.GtBG(bs_1!1,bs_2!2)@OS_CP.Rhod(act~a,bs_1!2,ps_1~p3)";
  substanceOnly species S16 in cell = 0; S16 is "@OS_DM::GtA(g~nil!1)@OS_CP.GtBG(bs_1!1,bs_2!2)@OS_CP.Rhod(act~a,bs_1!2,ps_1~p4)";
  substanceOnly species S17 in cell = 0; S17 is "@OS_DM::GtA(g~nil!1)@OS_CP.GtBG(bs_1!1,bs_2!2)@OS_CP.Rhod(act~a,bs_1!2,ps_1~p5)";
  substanceOnly species S18 in cell = 0; S18 is "@OS_DM::GtA(g~nil!1)@OS_CP.GtBG(bs_1!1,bs_2!2)@OS_CP.Rhod(act~a,bs_1!2,ps_1~p6)";
  substanceOnly species OS_CP_RGS_bs_1 in cell = 0.1660578; OS_CP_RGS_bs_1 is "@OS_CP::RGS(bs_1)";
  substanceOnly species S20 in cell = 0.7302988; S20 is "@OS_CP::Rec(bs_1!1).wCa2(bs_1!1,bs_2)";
  substanceOnly species OS_CP_Rec_T_bs_1_bs_2 in cell = 393.927*0.055*cell; OS_CP_Rec_T_bs_1_bs_2 is "@OS_CP::Rec_T(bs_1,bs_2)";
  substanceOnly species S22 in cell = 0.8484391; S22 is "@OS_CP::Ca2PFree(bs_1!1).Rec_T(bs_1!1,bs_2)";
  substanceOnly species S23 in cell = 0.3311524; S23 is "@OS_CP::Ca2PFree(bs_1!1).RK(bs_1!2).Rec_T(bs_1!1,bs_2!2)";
  substanceOnly species S24 in cell = 6.981999; S24 is "@OS_CP::RK(bs_1!1).Rec(bs_1!2).wCa2(bs_1!2,bs_2!1)";
  substanceOnly species OS_CP_Ca2Pbuff_bs_1 in cell = 0.7526513; OS_CP_Ca2Pbuff_bs_1 is "@OS_CP::Ca2Pbuff(bs_1)";
  substanceOnly species S26 in cell = 0; S26 is "@OS_CP::GtA(g~tp!1).PDE(act~a1,bs_1!1,bs_2,bs_3)";
  substanceOnly species OS_CP_cGmp in cell = 0.2543207; OS_CP_cGmp is "@OS_CP::cGmp()";
  substanceOnly species OS_CP_ICa in cell = 0.03916; OS_CP_ICa is "@OS_CP::ICa()";
  substanceOnly species OS_CP_I in cell = 0.03916; OS_CP_I is "@OS_CP::I()";
  substanceOnly species OS_CP_Ca2PFree_bs_1 in cell = 0.00979; OS_CP_Ca2PFree_bs_1 is "@OS_CP::Ca2PFree(bs_1)";
  substanceOnly species OS_CP_GtA_g_tp in cell = 0; OS_CP_GtA_g_tp is "@OS_CP::GtA(g~tp)";
  substanceOnly species IS_CP_GtA_g_tp in cell = 0; IS_CP_GtA_g_tp is "@IS_CP::GtA(g~tp)";
  substanceOnly species OS_CP_GtA_g_dp in cell = 0; OS_CP_GtA_g_dp is "@OS_CP::GtA(g~dp)";
  substanceOnly species IS_CP_GtA_g_dp in cell = 0; IS_CP_GtA_g_dp is "@IS_CP::GtA(g~dp)";
  substanceOnly species OS_CP_GtBG_bs_1_bs_2 in cell = 0; OS_CP_GtBG_bs_1_bs_2 is "@OS_CP::GtBG(bs_1,bs_2)";
  substanceOnly species IS_CP_GtBG_bs_1_bs_2 in cell = 0; IS_CP_GtBG_bs_1_bs_2 is "@IS_CP::GtBG(bs_1,bs_2)";
  substanceOnly species S44 in cell = 13.53786; S44 is "@OS_CP::GtA(g~dp!1).GtBG(bs_1!1,bs_2)";
  substanceOnly species S45 in cell = 0.1853305; S45 is "@IS_CP::GtA(g~dp!1).GtBG(bs_1!1,bs_2)";
  substanceOnly species OS_CP_Arr_bs_1_bs_2 in cell = 1260760*numConcFactor*cell; OS_CP_Arr_bs_1_bs_2 is "@OS_CP::Arr(bs_1,bs_2)";
  substanceOnly species IS_CP_Arr_bs_1_bs_2 in cell = 227.5988; IS_CP_Arr_bs_1_bs_2 is "@IS_CP::Arr(bs_1,bs_2)";
  substanceOnly species OS_CP_SRec_bs_1 in cell = 1.098403; OS_CP_SRec_bs_1 is "@OS_CP::SRec(bs_1)";
  substanceOnly species OS_CP_Rec_bs_1 in cell = 1.3706; OS_CP_Rec_bs_1 is "@OS_CP::Rec(bs_1)";
  substanceOnly species IS_CP_Rec_T_bs_1_bs_2 in cell = 3.916; IS_CP_Rec_T_bs_1_bs_2 is "@IS_CP::Rec_T(bs_1,bs_2)";
  substanceOnly species OS_CP_R_bs_1_bs_2_bs_3_bs_4 in cell = 0; OS_CP_R_bs_1_bs_2_bs_3_bs_4 is "@OS_CP::R(bs_1,bs_2,bs_3,bs_4)";
  substanceOnly species S118 in cell = 0.7976586; S118 is "@OS_DM::GtA(g~dp!1)@OS_CP.GtBG(bs_1!1,bs_2!2)@OS_CP.Rhod(act~i,bs_1!2,ps_1~p0)";
  substanceOnly species S149 in cell = 0; S149 is "@OS_CP::GtBG(bs_1!1,bs_2).Pdc(S54~u,S73~p,bs_1!1)";
  substanceOnly species S155 in cell = 0; S155 is "@OS_CP::GtBG(bs_1!1,bs_2).Pdc(S54~p,S73~u,bs_1!1)";
  substanceOnly species OS_DM_Rhod_act_a_bs_1_ps_1_p0 in cell = 0; OS_DM_Rhod_act_a_bs_1_ps_1_p0 is "@OS_DM::Rhod(act~a,bs_1,ps_1~p0)";
  substanceOnly species S201 in cell = 0; S201 is "@OS_DM::GtA(g~dp!1)@OS_CP.GtBG(bs_1!1,bs_2!2)@OS_CP.Rhod(act~a,bs_1!2,ps_1~p0)";
  substanceOnly species S202 in cell = 0; S202 is "@OS_DM::GtA(g~nil!1)@OS_CP.GtBG(bs_1!1,bs_2!2)@OS_CP.Ops(bs_1!2)";
  substanceOnly species S203 in cell = 0; S203 is "@OS_CP::GtA(g~tp!1).GtBG(bs_1!1,bs_2)";
  substanceOnly species S204 in cell = 0; S204 is "@OS_DM::GtA(g~tp!1)@OS_CP.GtBG(bs_1!1,bs_2!2)@OS_CP.Rhod(act~a,bs_1!2,ps_1~p0)";
  substanceOnly species S205 in cell = 0; S205 is "@OS_DM::GtA(g~dp!1)@OS_CP.GtBG(bs_1!1,bs_2!2)@OS_CP.Rhod(act~a,bs_1!2,ps_1~p1)";
  substanceOnly species S206 in cell = 0; S206 is "@OS_DM::GtA(g~tp!1)@OS_CP.GtBG(bs_1!1,bs_2!2)@OS_CP.Rhod(act~a,bs_1!2,ps_1~p1)";
  substanceOnly species S207 in cell = 0; S207 is "@OS_DM::GtA(g~dp!1)@OS_CP.GtBG(bs_1!1,bs_2!2)@OS_CP.Rhod(act~a,bs_1!2,ps_1~p2)";
  substanceOnly species S208 in cell = 0; S208 is "@OS_DM::GtA(g~tp!1)@OS_CP.GtBG(bs_1!1,bs_2!2)@OS_CP.Rhod(act~a,bs_1!2,ps_1~p2)";
  substanceOnly species S209 in cell = 0; S209 is "@OS_DM::GtA(g~dp!1)@OS_CP.GtBG(bs_1!1,bs_2!2)@OS_CP.Rhod(act~a,bs_1!2,ps_1~p3)";
  substanceOnly species S210 in cell = 0; S210 is "@OS_DM::GtA(g~tp!1)@OS_CP.GtBG(bs_1!1,bs_2!2)@OS_CP.Rhod(act~a,bs_1!2,ps_1~p3)";
  substanceOnly species S211 in cell = 0; S211 is "@OS_DM::GtA(g~dp!1)@OS_CP.GtBG(bs_1!1,bs_2!2)@OS_CP.Rhod(act~a,bs_1!2,ps_1~p4)";
  substanceOnly species S212 in cell = 0; S212 is "@OS_DM::GtA(g~tp!1)@OS_CP.GtBG(bs_1!1,bs_2!2)@OS_CP.Rhod(act~a,bs_1!2,ps_1~p4)";
  substanceOnly species S213 in cell = 0; S213 is "@OS_DM::GtA(g~dp!1)@OS_CP.GtBG(bs_1!1,bs_2!2)@OS_CP.Rhod(act~a,bs_1!2,ps_1~p5)";
  substanceOnly species S214 in cell = 0; S214 is "@OS_DM::GtA(g~tp!1)@OS_CP.GtBG(bs_1!1,bs_2!2)@OS_CP.Rhod(act~a,bs_1!2,ps_1~p5)";
  substanceOnly species S215 in cell = 0; S215 is "@OS_DM::GtA(g~dp!1)@OS_CP.GtBG(bs_1!1,bs_2!2)@OS_CP.Rhod(act~a,bs_1!2,ps_1~p6)";
  substanceOnly species S216 in cell = 0; S216 is "@OS_DM::GtA(g~tp!1)@OS_CP.GtBG(bs_1!1,bs_2!2)@OS_CP.Rhod(act~a,bs_1!2,ps_1~p6)";
  substanceOnly species S217 in cell = 0; S217 is "@OS_CP::GtA(g~tp!1).PDE(act~i,bs_1!1,bs_2,bs_3)";
  substanceOnly species S218 in cell = 0; S218 is "@OS_CP::GtA(g~tp!1).GtA(g~tp!2).PDE(act~a1,bs_1!2,bs_2!1,bs_3)";
  substanceOnly species S219 in cell = 0; S219 is "@OS_CP::GtA(g~tp!1).PDE(act~a1,bs_1!1,bs_2!2,bs_3).RGS(bs_1!2)";
  substanceOnly species OS_CP_TrashCa in cell = 0; OS_CP_TrashCa is "@OS_CP::TrashCa()";
  substanceOnly species S221 in cell = 1123300*numConcFactor*cell; S221 is "@OS_CP::Arr(bs_1,bs_2!1).Arr(bs_1,bs_2!1)";
  substanceOnly species S223 in cell = 0; S223 is "@IS_CP::Arr(bs_1,bs_2!1).Arr(bs_1,bs_2!1)";
  substanceOnly species S225 in cell = 0; S225 is "@OS_DM::RK_pre(bs_1!1)@OS_CP.Rhod(act~a,bs_1!1,ps_1~p0)";
  substanceOnly species OS_DM_Rhod_act_a_bs_1_ps_1_p1 in cell = 0; OS_DM_Rhod_act_a_bs_1_ps_1_p1 is "@OS_DM::Rhod(act~a,bs_1,ps_1~p1)";
  substanceOnly species OS_DM_Rhod_act_a_bs_1_ps_1_p2 in cell = 0; OS_DM_Rhod_act_a_bs_1_ps_1_p2 is "@OS_DM::Rhod(act~a,bs_1,ps_1~p2)";
  substanceOnly species OS_DM_Rhod_act_a_bs_1_ps_1_p3 in cell = 0; OS_DM_Rhod_act_a_bs_1_ps_1_p3 is "@OS_DM::Rhod(act~a,bs_1,ps_1~p3)";
  substanceOnly species OS_DM_Rhod_act_a_bs_1_ps_1_p4 in cell = 0; OS_DM_Rhod_act_a_bs_1_ps_1_p4 is "@OS_DM::Rhod(act~a,bs_1,ps_1~p4)";
  substanceOnly species OS_DM_Rhod_act_a_bs_1_ps_1_p5 in cell = 0; OS_DM_Rhod_act_a_bs_1_ps_1_p5 is "@OS_DM::Rhod(act~a,bs_1,ps_1~p5)";
  substanceOnly species OS_DM_Rhod_act_a_bs_1_ps_1_p6 in cell = 0; OS_DM_Rhod_act_a_bs_1_ps_1_p6 is "@OS_DM::Rhod(act~a,bs_1,ps_1~p6)";
  substanceOnly species S232 in cell = 0; S232 is "@OS_CP::GtA(g~tp!1).GtA(g~tp!2).PDE(act~a2,bs_1!2,bs_2!1,bs_3)";
  substanceOnly species S233 in cell = 891810*numConcFactor*cell; S233 is "@OS_CP::Arr(bs_1!1,bs_2!2).Arr(bs_1!1,bs_2!3).Arr(bs_1,bs_2!2).Arr(bs_1,bs_2!3)";
  substanceOnly species S235 in cell = 0; S235 is "@IS_CP::Arr(bs_1!1,bs_2!2).Arr(bs_1!1,bs_2!3).Arr(bs_1,bs_2!2).Arr(bs_1,bs_2!3)";
  substanceOnly species S237 in cell = 0; S237 is "@OS_DM::RK_post(bs_1!1)@OS_CP.Rhod(act~a,bs_1!1,ps_1~p1)";
  substanceOnly species S238 in cell = 0; S238 is "@OS_DM::RK_pre(bs_1!1)@OS_CP.Rhod(act~a,bs_1!1,ps_1~p1)";
  substanceOnly species S239 in cell = 0; S239 is "@OS_DM::RK_pre(bs_1!1)@OS_CP.Rhod(act~a,bs_1!1,ps_1~p2)";
  substanceOnly species S240 in cell = 0; S240 is "@OS_DM::RK_pre(bs_1!1)@OS_CP.Rhod(act~a,bs_1!1,ps_1~p3)";
  substanceOnly species S241 in cell = 0; S241 is "@OS_DM::RK_pre(bs_1!1)@OS_CP.Rhod(act~a,bs_1!1,ps_1~p4)";
  substanceOnly species S242 in cell = 0; S242 is "@OS_DM::RK_pre(bs_1!1)@OS_CP.Rhod(act~a,bs_1!1,ps_1~p5)";
  substanceOnly species S243 in cell = 0; S243 is "@OS_DM::RK_pre(bs_1!1)@OS_CP.Rhod(act~a,bs_1!1,ps_1~p6)";
  substanceOnly species S244 in cell = 0; S244 is "@OS_DM::Arr(bs_1!1,bs_2)@OS_CP.Rhod(act~a,bs_1!1,ps_1~p1)";
  substanceOnly species S245 in cell = 0; S245 is "@OS_DM::Arr(bs_1!1,bs_2)@OS_CP.Rhod(act~a,bs_1!1,ps_1~p2)";
  substanceOnly species S246 in cell = 0; S246 is "@OS_DM::Arr(bs_1!1,bs_2)@OS_CP.Rhod(act~a,bs_1!1,ps_1~p3)";
  substanceOnly species S247 in cell = 0; S247 is "@OS_DM::Arr(bs_1!1,bs_2)@OS_CP.Rhod(act~a,bs_1!1,ps_1~p4)";
  substanceOnly species S248 in cell = 0; S248 is "@OS_DM::Arr(bs_1!1,bs_2)@OS_CP.Rhod(act~a,bs_1!1,ps_1~p5)";
  substanceOnly species S249 in cell = 0; S249 is "@OS_DM::Arr(bs_1!1,bs_2)@OS_CP.Rhod(act~a,bs_1!1,ps_1~p6)";
  substanceOnly species S250 in cell = 0; S250 is "@OS_CP::GtA(g~tp!1).GtA(g~tp!2).PDE(act~a2,bs_1!2,bs_2!1,bs_3!3).RGS(bs_1!3)";
  substanceOnly species S251 in cell = 0; S251 is "@OS_DM::RK_post(bs_1!1)@OS_CP.Rhod(act~a,bs_1!1,ps_1~p2)";
  substanceOnly species S252 in cell = 0; S252 is "@OS_DM::RK_post(bs_1!1)@OS_CP.Rhod(act~a,bs_1!1,ps_1~p3)";
  substanceOnly species S253 in cell = 0; S253 is "@OS_DM::RK_post(bs_1!1)@OS_CP.Rhod(act~a,bs_1!1,ps_1~p4)";
  substanceOnly species S254 in cell = 0; S254 is "@OS_DM::RK_post(bs_1!1)@OS_CP.Rhod(act~a,bs_1!1,ps_1~p5)";
  substanceOnly species S255 in cell = 0; S255 is "@OS_DM::RK_post(bs_1!1)@OS_CP.Rhod(act~a,bs_1!1,ps_1~p6)";

  // Parameters:
  vcyto = 0.03916;
  omega = 2.5;
  omega_G = 0.6;
  omega_arr = 0.81323;
  kRK16 = 0;
  kRK2 = 250;
  kRK3ATP = 4000;
  kRK4 = 250;
  kA2 = 0.026;
  kA3 = 1.1651;
  kA5 = 0.424;
  ktherm = 0.0238;
  kG2 = 2200;
  kG3 = 8500;
  kG4 = 1;
  kG4GDP = 400;
  kG5GTP = 3500;
  kG6GTP = 2000;
  kG6 = 8500;
  kRrecyc = 0.0007;
  kG7 = 200;
  kP1rev = 0;
  kP2 = 940.706;
  kP4 = 21.0881;
  kRGS2 = 98;
  kPDEshutoff = 0.1;
  kGshutoff = 0.05;
  kRec4 = 0.610084;
  k1 = 9.37059;
  k2 = 46.412;
  yCa = 1;
  gCa = 981.3558;
  kInCgmp = 1;
  kOutCgmp = 1;
  eT = 400;
  Ca0 = 0.023;
  fCa = 0.12;
  Jdark = 14.87;
  cGMPdark = 6.4944;
  ncg = 3.8;
  F = 9.6485341e4;
  gammaCa = 981.3558;
  m = 2.5;
  m1 = 3;
  m2 = 1.5;
  Kc = 0.17;
  Kc1 = 0.171;
  Kc2 = 0.059;
  w = 2;
  Kp = 0.425272;
  betadark = 3.19;
  betasub = 0.0021826;
  Ca2dark = 0.25;
  RKdark = 10838;
  flashBG = 0;
  flash0Dur = 0.02;
  flashDel = 0;
  flashDur = 0.001;
  flashMag = 0;
  testflash = 0;
  preflash = 0;
  flash0Mag = 0;
  dur = 0.001;
  del = 0;
  Rectot = 51.7884;
  Rectot_IS = 100;
  Rectot_EL = 20;
  Rtot = 26000000;
  alfamax = 60;
  k_arr2_b = 0.424;
  Cae = 0.05;
  LB1 = 0.4;
  LB2 = 0.2;
  S_1 = 3.14e-6;
  Kp_Kami = 2;
  V = 0;
  mCa = 0;
  Ca0_Ogu = 900;
  mCa_EL = 0;
  vol_EC = 3;
  vol_CM = 0.2;
  vol_EL = 3;
  vol_OS_CM = 0.2;
  vol_OS_CP = 3;
  vol_IS_CM = 0.2;
  vol_IS_CP = 3;
  vol_CI = 3;
  vol_EL_CM = 0.2;
  flash_Val = 99545;
  stepT = 1800;
  stepStim = 0;
  ampl_osz = 0.375;
  scale_fac = 1;
  // reductionfactor for recoverin concentration
  q_rrecf = 0.15;
  // weight first rec-reduction step
  qr = 0.1764706;
  v_gtX_OS_IS = 0;
  v_gtBG_OS_IS = 0;
  GtBGRedFact = 0.15;
  v_is_os_arr = 0;
  t_sumArr = 0;
  v_os_is_rec = 0;
  tsum_rec = 0.12*Rectot;

  // Assignment rules:
  kRec2 := 1*0.05;
  kRec1 := 1*0.011;
  otherstimulus := 10^(8 - (8 - stepStim - ampl_osz*sin(0.5*pi*time) + 0.0774633));
  E := S26/cell + 2*(S232/cell) + S218/cell;
  k_arr4_b := k_arr2_b;
  cGMP0 := OS_CP_cGmp/cell;
  Ca2Free0 := OS_CP_Ca2PFree_bs_1/cell;
  numConcFactor := 1/(602200*vcyto);
  k_arr2_f := 2.9965e-7/numConcFactor;
  k_arr4_f := k_arr2_f;
  kOps := 1e-9/numConcFactor;
  kArr := 9.9147e-6/numConcFactor;
  m_arr := 9.5475e-6/numConcFactor;
  kA14 := kArr + 3*m_arr;
  kA12 := kArr + m_arr;
  kA13 := kArr + 2*m_arr;
  kA16 := kArr + 3*m_arr;
  kRK10 := 0.1724/numConcFactor;
  kRK11 := kRK10*exp(-omega);
  kRK12 := kRK10*exp(-(omega*2));
  kRK15 := kRK10*exp(-(omega*5));
  kRK14 := kRK10*exp(-(omega*4));
  kA4 := 2.9965e-7/numConcFactor;
  kA11 := kArr;
  kRK13 := kRK10*exp(-(omega*3));
  kG10 := 0.001/numConcFactor;
  kG13 := kG10*exp(-(omega_G*3));
  kG14 := kG10*exp(-(omega_G*4));
  kG15 := kG10*exp(-(omega_G*5));
  kG16 := kG10*exp(-(omega_G*6));
  kG11 := kG10*exp(-omega_G);
  kG_pre1 := kG10*1.6;
  kA15 := kArr + 3*m_arr;
  kG12 := kG10*exp(-(omega_G*2));
  rateLaw5 := betadark + betasub*E/numConcFactor;
  sum_Rec := OS_CP_Rec_T_bs_1_bs_2/cell + S22/cell + S23/cell;
  kRGS1 := 4.818e-5/numConcFactor;
  kP3 := 1.49834e-9/numConcFactor;
  sumGta := S44/cell + S118/cell + S26/cell + OS_CP_GtA_g_dp/cell + OS_CP_GtA_g_tp/cell;
  kP1 := 0.0549715/numConcFactor;
  RGStot := 100000*numConcFactor;
  Arrtot := 7074000*numConcFactor;
  rateLaw3 := 10^6*fCa*Jdark/((2 + fCa)*F*vcyto)*(cGMP0/cGMPdark)^ncg;
  sumGtX := S44/cell + S118/cell + S26/cell + OS_CP_GtBG_bs_1_bs_2/cell + OS_CP_GtA_g_dp/cell + OS_CP_GtA_g_tp/cell;
  kA4_IS := kA4*0.02;
  mag := flashMag/flashDur;
  kG_pre2 := kG2*315;
  sumGtB := S44/cell + S118/cell + OS_CP_GtBG_bs_1_bs_2/cell;
  RKtot := 4215400*numConcFactor;
  rateLaw2 := gCa*(Ca2Free0 - Ca0);
  background := flashBG;
  stimulus := background + preflash + testflash + otherstimulus;
  Gtot := 10000000*numConcFactor;
  rateLaw1 := k1*(eT - OS_CP_Ca2Pbuff_bs_1/cell);
  kGrecycl := 2/numConcFactor;
  PDEtot := 2000000*numConcFactor;
  rateLaw4 := alfamax/(1 + (Ca2Free0/Kc1)^m1) + alfamax/(1 + (Ca2Free0/Kc2)^m2);
  Ca2_frac := (Ca2Free0 - Ca0)/(Ca2dark - Ca0);
  J := 2/(2 + fCa)*(cGMP0/cGMPdark)^ncg*Jdark + fCa/(2 + fCa)*Ca2_frac*Jdark;
  deltaJ := Jdark - J;
  premag := flash0Mag/flash0Dur;
  sum_arr := S244/cell + S245/cell + S246/cell + OS_DM_Rhod_act_a_bs_1_ps_1_p4/cell + S248/cell + S255/cell + OS_CP_Arr_bs_1_bs_2/cell + 2*(S221/cell) + 4*(S233/cell);
  predur := flash0Dur;
  kRec3 := 0.00041081/numConcFactor*9.5;

  // Reactions:
  R1: OS_DM_Rhod_act_i_bs_1_ps_1_p0 => OS_DM_Rhod_act_a_bs_1_ps_1_p0; cell*Function_for_R1_1(Rtot, OS_DM_Rhod_act_i_bs_1_ps_1_p0/cell, cell, stimulus);
  R2: S118 => S201; cell*Function_for_R2_1(Rtot, S118/cell, cell, stimulus);
  R3: OS_DM_Rhod_act_i_bs_1_ps_1_p0 + S44 => S118; cell*Function_for_R3(OS_DM_Rhod_act_i_bs_1_ps_1_p0/cell, S44/cell, cell, kG_pre1);
  R4: S118 => OS_DM_Rhod_act_i_bs_1_ps_1_p0 + S44; cell*Function_for_R4(S118/cell, cell, kG_pre2);
  R5: OS_DM_Ops_bs_1 + S44 => S10; cell*Function_for_R5(OS_DM_Ops_bs_1/cell, S44/cell, cell, kOps);
  R6: S10 => OS_DM_Ops_bs_1 + S44; cell*Function_for_R6(S10/cell, cell, kG2);
  R7: S10 => S202; cell*Function_for_R7(S10/cell, cell, kG3);
  R8: S9 => OS_DM_Ops_bs_1 + S203; cell*Function_for_R8(S9/cell, cell, kG6);
  R9: OS_DM_Ops_bs_1 => OS_DM_Rhod_act_i_bs_1_ps_1_p0; cell*Function_for_R9(OS_DM_Ops_bs_1/cell, cell, kRrecyc);
  R10: S12 => S201; cell*Function_for_R10(S12/cell, cell, kG4GDP);
  R11: S12 => S204; cell*Function_for_R11(S12/cell, cell, kG5GTP);
  R12: S13 => S205; cell*Function_for_R12(S13/cell, cell, kG4GDP);
  R13: S13 => S206; cell*Function_for_R13(S13/cell, cell, kG5GTP);
  R14: S14 => S207; cell*Function_for_R14(S14/cell, cell, kG4GDP);
  R15: S14 => S208; cell*Function_for_R15(S14/cell, cell, kG5GTP);
  R16: S15 => S209; cell*Function_for_R16(S15/cell, cell, kG4GDP);
  R17: S15 => S210; cell*Function_for_R17(S15/cell, cell, kG5GTP);
  R18: S16 => S211; cell*Function_for_R18(S16/cell, cell, kG4GDP);
  R19: S16 => S212; cell*Function_for_R19(S16/cell, cell, kG5GTP);
  R20: S17 => S213; cell*Function_for_R20(S17/cell, cell, kG4GDP);
  R21: S17 => S214; cell*Function_for_R21(S17/cell, cell, kG5GTP);
  R22: S18 => S215; cell*Function_for_R22(S18/cell, cell, kG4GDP);
  R23: S18 => S216; cell*Function_for_R23(S18/cell, cell, kG5GTP);
  R24: OS_CP_PDE_act_i_bs_1_bs_2_bs_3 + OS_CP_GtA_g_tp => S217; cell*Function_for_R24(OS_CP_GtA_g_tp/cell, OS_CP_PDE_act_i_bs_1_bs_2_bs_3/cell, cell, kP1);
  R25: S26 + OS_CP_GtA_g_tp => S218; cell*Function_for_R25(S26/cell, OS_CP_GtA_g_tp/cell, cell, kP3);
  R26: OS_CP_RGS_bs_1 + S26 => S219; cell*Function_for_R26(OS_CP_RGS_bs_1/cell, S26/cell, cell, kRGS1);
  R27: S26 => OS_CP_PDE_act_i_bs_1_bs_2_bs_3 + OS_CP_GtA_g_dp; cell*Function_for_R27(S26/cell, cell, kPDEshutoff);
  R28: OS_CP_GtA_g_tp => OS_CP_GtA_g_dp; cell*Function_for_R28(OS_CP_GtA_g_tp/cell, cell, kGshutoff);
  R29: OS_CP_GtA_g_dp + OS_CP_GtBG_bs_1_bs_2 => S44; cell*Function_for_R29(OS_CP_GtA_g_dp/cell, OS_CP_GtBG_bs_1_bs_2/cell, cell, kGrecycl);
  R30: OS_CP_Rec_T_bs_1_bs_2 + OS_CP_Ca2PFree_bs_1 => S22; cell*Function_for_R30(OS_CP_Rec_T_bs_1_bs_2/cell, OS_CP_Ca2PFree_bs_1/cell, cell, kRec1);
  R31: S22 => OS_CP_Rec_T_bs_1_bs_2 + OS_CP_Ca2PFree_bs_1; cell*Function_for_R31(S22/cell, cell, kRec2);
  R32: OS_CP_RK_bs_1 + S22 => S23; cell*Function_for_R32(OS_CP_RK_bs_1/cell, S22/cell, cell, kRec3);
  R33: S23 => OS_CP_RK_bs_1 + S22; cell*Function_for_R33(S23/cell, cell, kRec4);
  R34: OS_CP_Ca2PFree_bs_1 => OS_CP_Ca2Pbuff_bs_1; cell*Function_for_R34(OS_CP_Ca2PFree_bs_1/cell, cell, rateLaw1);
  R35: OS_CP_Ca2Pbuff_bs_1 => OS_CP_Ca2PFree_bs_1; cell*Function_for_R35(OS_CP_Ca2Pbuff_bs_1/cell, cell, k2);
  R36: OS_CP_Ca2PFree_bs_1 => ; cell*Function_for_R36(cell, rateLaw2);
  R37: => OS_CP_Ca2PFree_bs_1; cell*Function_for_R37(cell, rateLaw3);
  R38: => OS_CP_cGmp; cell*Function_for_R38(cell, rateLaw4);
  R39: OS_CP_cGmp => ; cell*Function_for_R39(OS_CP_cGmp/cell, cell, rateLaw5);
  R40: 2 OS_CP_Arr_bs_1_bs_2 => S221; cell*Function_for_R40_1(OS_CP_Arr_bs_1_bs_2/cell, cell, kA4);
  R42: 2 IS_CP_Arr_bs_1_bs_2 => S223; cell*Function_for_R42_1(IS_CP_Arr_bs_1_bs_2/cell, cell, kA4_IS);
  R44: OS_CP_RK_bs_1 + OS_DM_Rhod_act_a_bs_1_ps_1_p0 => S225; cell*Function_for_R44(OS_CP_RK_bs_1/cell, OS_DM_Rhod_act_a_bs_1_ps_1_p0/cell, cell, kRK10);
  R45: OS_DM_Rhod_act_a_bs_1_ps_1_p0 => OS_DM_Ops_bs_1; cell*Function_for_R45(OS_DM_Rhod_act_a_bs_1_ps_1_p0/cell, cell, ktherm);
  R46: S202 => S10; cell*Function_for_R46(S202/cell, cell, kG4GDP);
  R47: S202 => S9; cell*Function_for_R47(S202/cell, cell, kG5GTP);
  R48: S44 + OS_DM_Rhod_act_a_bs_1_ps_1_p0 => S201; cell*Function_for_R48(OS_DM_Rhod_act_a_bs_1_ps_1_p0/cell, S44/cell, cell, kG10);
  R49: S201 => S44 + OS_DM_Rhod_act_a_bs_1_ps_1_p0; cell*Function_for_R49(S201/cell, cell, kG2);
  R50: S201 => S12; cell*Function_for_R50(S201/cell, cell, kG3);
  R51: S204 => OS_DM_Rhod_act_a_bs_1_ps_1_p0 + S203; cell*Function_for_R51(S204/cell, cell, kG6);
  R52: S205 => S44 + OS_DM_Rhod_act_a_bs_1_ps_1_p1; cell*Function_for_R52(S205/cell, cell, kG2);
  R53: S205 => S13; cell*Function_for_R53(S205/cell, cell, kG3);
  R54: S206 => S203 + OS_DM_Rhod_act_a_bs_1_ps_1_p1; cell*Function_for_R54(S206/cell, cell, kG6);
  R55: S207 => S44 + OS_DM_Rhod_act_a_bs_1_ps_1_p2; cell*Function_for_R55(S207/cell, cell, kG2);
  R56: S207 => S14; cell*Function_for_R56(S207/cell, cell, kG3);
  R57: S208 => S203 + OS_DM_Rhod_act_a_bs_1_ps_1_p2; cell*Function_for_R57(S208/cell, cell, kG6);
  R58: S209 => S44 + OS_DM_Rhod_act_a_bs_1_ps_1_p3; cell*Function_for_R58(S209/cell, cell, kG2);
  R59: S209 => S15; cell*Function_for_R59(S209/cell, cell, kG3);
  R60: S210 => S203 + OS_DM_Rhod_act_a_bs_1_ps_1_p3; cell*Function_for_R60(S210/cell, cell, kG6);
  R61: S211 => S44 + OS_DM_Rhod_act_a_bs_1_ps_1_p4; cell*Function_for_R61(S211/cell, cell, kG2);
  R62: S211 => S16; cell*Function_for_R62(S211/cell, cell, kG3);
  R63: S212 => S203 + OS_DM_Rhod_act_a_bs_1_ps_1_p4; cell*Function_for_R63(S212/cell, cell, kG6);
  R64: S213 => S44 + OS_DM_Rhod_act_a_bs_1_ps_1_p5; cell*Function_for_R64(S213/cell, cell, kG2);
  R65: S213 => S17; cell*Function_for_R65(S213/cell, cell, kG3);
  R66: S214 => S203 + OS_DM_Rhod_act_a_bs_1_ps_1_p5; cell*Function_for_R66(S214/cell, cell, kG6);
  R67: S215 => S44 + OS_DM_Rhod_act_a_bs_1_ps_1_p6; cell*Function_for_R67(S215/cell, cell, kG2);
  R68: S215 => S18; cell*Function_for_R68(S215/cell, cell, kG3);
  R69: S216 => S203 + OS_DM_Rhod_act_a_bs_1_ps_1_p6; cell*Function_for_R69(S216/cell, cell, kG6);
  R70: S203 => OS_CP_GtA_g_tp + OS_CP_GtBG_bs_1_bs_2; cell*Function_for_R70(S203/cell, cell, kG7);
  R71: S217 => OS_CP_PDE_act_i_bs_1_bs_2_bs_3 + OS_CP_GtA_g_tp; cell*Function_for_R71(S217/cell, cell, kP1rev);
  R72: S217 => S26; cell*Function_for_R72(S217/cell, cell, kP2);
  R73: S218 => S232; cell*Function_for_R73(S218/cell, cell, kP4);
  R74: S219 => OS_CP_PDE_act_i_bs_1_bs_2_bs_3 + OS_CP_RGS_bs_1 + OS_CP_GtA_g_dp; cell*Function_for_R74(S219/cell, cell, kRGS2);
  R75: S221 => 2 OS_CP_Arr_bs_1_bs_2; cell*Function_for_R75_1(S221/cell, cell, kA5);
  R77: S223 => 2 IS_CP_Arr_bs_1_bs_2; cell*Function_for_R77_1(S223/cell, cell, kA5);
  R79: 2 S221 => S233; cell*Function_for_R79_1(S221/cell, cell, kA4);
  R81: 2 S223 => S235; cell*Function_for_R81_1(S223/cell, cell, kA4_IS);
  R83: S225 => OS_CP_RK_bs_1 + OS_DM_Rhod_act_a_bs_1_ps_1_p0; cell*Function_for_R83(S225/cell, cell, kRK2);
  R84: S225 => S237; cell*Function_for_R84(S225/cell, cell, kRK3ATP);
  R85: OS_CP_RK_bs_1 + OS_DM_Rhod_act_a_bs_1_ps_1_p1 => S238; cell*Function_for_R85(OS_CP_RK_bs_1/cell, OS_DM_Rhod_act_a_bs_1_ps_1_p1/cell, cell, kRK11);
  R86: OS_CP_RK_bs_1 + OS_DM_Rhod_act_a_bs_1_ps_1_p2 => S239; cell*Function_for_R86(OS_CP_RK_bs_1/cell, OS_DM_Rhod_act_a_bs_1_ps_1_p2/cell, cell, kRK12);
  R87: OS_CP_RK_bs_1 + OS_DM_Rhod_act_a_bs_1_ps_1_p3 => S240; cell*Function_for_R87(OS_CP_RK_bs_1/cell, OS_DM_Rhod_act_a_bs_1_ps_1_p3/cell, cell, kRK13);
  R88: OS_CP_RK_bs_1 + OS_DM_Rhod_act_a_bs_1_ps_1_p4 => S241; cell*Function_for_R88(OS_CP_RK_bs_1/cell, OS_DM_Rhod_act_a_bs_1_ps_1_p4/cell, cell, kRK14);
  R89: OS_CP_RK_bs_1 + OS_DM_Rhod_act_a_bs_1_ps_1_p5 => S242; cell*Function_for_R89(OS_CP_RK_bs_1/cell, OS_DM_Rhod_act_a_bs_1_ps_1_p5/cell, cell, kRK15);
  R90: OS_CP_RK_bs_1 + OS_DM_Rhod_act_a_bs_1_ps_1_p6 => S243; cell*Function_for_R90(OS_CP_RK_bs_1/cell, OS_DM_Rhod_act_a_bs_1_ps_1_p6/cell, cell, kRK16);
  R91: OS_CP_Arr_bs_1_bs_2 + OS_DM_Rhod_act_a_bs_1_ps_1_p1 => S244; cell*Function_for_R91(OS_DM_Rhod_act_a_bs_1_ps_1_p1/cell, OS_CP_Arr_bs_1_bs_2/cell, cell, kA11);
  R92: OS_CP_Arr_bs_1_bs_2 + OS_DM_Rhod_act_a_bs_1_ps_1_p2 => S245; cell*Function_for_R92(OS_DM_Rhod_act_a_bs_1_ps_1_p2/cell, OS_CP_Arr_bs_1_bs_2/cell, cell, kA12);
  R93: OS_CP_Arr_bs_1_bs_2 + OS_DM_Rhod_act_a_bs_1_ps_1_p3 => S246; cell*Function_for_R93(OS_DM_Rhod_act_a_bs_1_ps_1_p3/cell, OS_CP_Arr_bs_1_bs_2/cell, cell, kA13);
  R94: OS_CP_Arr_bs_1_bs_2 + OS_DM_Rhod_act_a_bs_1_ps_1_p4 => S247; cell*Function_for_R94(OS_DM_Rhod_act_a_bs_1_ps_1_p4/cell, OS_CP_Arr_bs_1_bs_2/cell, cell, kA14);
  R95: OS_CP_Arr_bs_1_bs_2 + OS_DM_Rhod_act_a_bs_1_ps_1_p5 => S248; cell*Function_for_R95(OS_DM_Rhod_act_a_bs_1_ps_1_p5/cell, OS_CP_Arr_bs_1_bs_2/cell, cell, kA15);
  R96: OS_CP_Arr_bs_1_bs_2 + OS_DM_Rhod_act_a_bs_1_ps_1_p6 => S249; cell*Function_for_R96(OS_DM_Rhod_act_a_bs_1_ps_1_p6/cell, OS_CP_Arr_bs_1_bs_2/cell, cell, kA16);
  R97: OS_DM_Rhod_act_a_bs_1_ps_1_p1 => OS_DM_Ops_bs_1; cell*Function_for_R97(OS_DM_Rhod_act_a_bs_1_ps_1_p1/cell, cell, ktherm);
  R98: OS_DM_Rhod_act_a_bs_1_ps_1_p2 => OS_DM_Ops_bs_1; cell*Function_for_R98(OS_DM_Rhod_act_a_bs_1_ps_1_p2/cell, cell, ktherm);
  R99: OS_DM_Rhod_act_a_bs_1_ps_1_p3 => OS_DM_Ops_bs_1; cell*Function_for_R99(OS_DM_Rhod_act_a_bs_1_ps_1_p3/cell, cell, ktherm);
  R100: OS_DM_Rhod_act_a_bs_1_ps_1_p4 => OS_DM_Ops_bs_1; cell*Function_for_R100(OS_DM_Rhod_act_a_bs_1_ps_1_p4/cell, cell, ktherm);
  R101: OS_DM_Rhod_act_a_bs_1_ps_1_p5 => OS_DM_Ops_bs_1; cell*Function_for_R101(OS_DM_Rhod_act_a_bs_1_ps_1_p5/cell, cell, ktherm);
  R102: OS_DM_Rhod_act_a_bs_1_ps_1_p6 => OS_DM_Ops_bs_1; cell*Function_for_R102(OS_DM_Rhod_act_a_bs_1_ps_1_p6/cell, cell, ktherm);
  R103: S44 + OS_DM_Rhod_act_a_bs_1_ps_1_p1 => S205; cell*Function_for_R103(OS_DM_Rhod_act_a_bs_1_ps_1_p1/cell, S44/cell, cell, kG11);
  R104: S44 + OS_DM_Rhod_act_a_bs_1_ps_1_p2 => S207; cell*Function_for_R104(OS_DM_Rhod_act_a_bs_1_ps_1_p2/cell, S44/cell, cell, kG12);
  R105: S44 + OS_DM_Rhod_act_a_bs_1_ps_1_p3 => S209; cell*Function_for_R105(OS_DM_Rhod_act_a_bs_1_ps_1_p3/cell, S44/cell, cell, kG13);
  R106: S44 + OS_DM_Rhod_act_a_bs_1_ps_1_p4 => S211; cell*Function_for_R106(OS_DM_Rhod_act_a_bs_1_ps_1_p4/cell, S44/cell, cell, kG14);
  R107: S44 + OS_DM_Rhod_act_a_bs_1_ps_1_p5 => S213; cell*Function_for_R107(OS_DM_Rhod_act_a_bs_1_ps_1_p5/cell, S44/cell, cell, kG15);
  R108: S44 + OS_DM_Rhod_act_a_bs_1_ps_1_p6 => S215; cell*Function_for_R108(OS_DM_Rhod_act_a_bs_1_ps_1_p6/cell, S44/cell, cell, kG16);
  R109: OS_CP_RGS_bs_1 + S232 => S250; cell*Function_for_R109(OS_CP_RGS_bs_1/cell, S232/cell, cell, kRGS1);
  R110: S232 => S26 + OS_CP_GtA_g_dp; cell*Function_for_R110(S232/cell, cell, kPDEshutoff);
  R111: S233 => 2 S221; cell*Function_for_R111_1(S233/cell, cell, kA5);
  R113: S235 => 2 S223; cell*Function_for_R113_1(S235/cell, cell, kA5);
  R115: S237 => OS_CP_RK_bs_1 + OS_DM_Rhod_act_a_bs_1_ps_1_p1; cell*Function_for_R115(S237/cell, cell, kRK4);
  R116: S238 => OS_CP_RK_bs_1 + OS_DM_Rhod_act_a_bs_1_ps_1_p1; cell*Function_for_R116(S238/cell, cell, kRK2);
  R117: S238 => S251; cell*Function_for_R117(S238/cell, cell, kRK3ATP);
  R118: S239 => OS_CP_RK_bs_1 + OS_DM_Rhod_act_a_bs_1_ps_1_p2; cell*Function_for_R118(S239/cell, cell, kRK2);
  R119: S239 => S252; cell*Function_for_R119(S239/cell, cell, kRK3ATP);
  R120: S240 => OS_CP_RK_bs_1 + OS_DM_Rhod_act_a_bs_1_ps_1_p3; cell*Function_for_R120(S240/cell, cell, kRK2);
  R121: S240 => S253; cell*Function_for_R121(S240/cell, cell, kRK3ATP);
  R122: S241 => OS_CP_RK_bs_1 + OS_DM_Rhod_act_a_bs_1_ps_1_p4; cell*Function_for_R122(S241/cell, cell, kRK2);
  R123: S241 => S254; cell*Function_for_R123(S241/cell, cell, kRK3ATP);
  R124: S242 => OS_CP_RK_bs_1 + OS_DM_Rhod_act_a_bs_1_ps_1_p5; cell*Function_for_R124(S242/cell, cell, kRK2);
  R125: S242 => S255; cell*Function_for_R125(S242/cell, cell, kRK3ATP);
  R126: S243 => OS_CP_RK_bs_1 + OS_DM_Rhod_act_a_bs_1_ps_1_p6; cell*Function_for_R126(S243/cell, cell, kRK2);
  R127: S244 => OS_CP_Arr_bs_1_bs_2 + OS_DM_Rhod_act_a_bs_1_ps_1_p1; cell*Function_for_R127(S244/cell, cell, kA2);
  R128: S244 => OS_DM_Ops_bs_1 + OS_CP_Arr_bs_1_bs_2; cell*Function_for_R128(S244/cell, cell, kA3);
  R129: S245 => OS_CP_Arr_bs_1_bs_2 + OS_DM_Rhod_act_a_bs_1_ps_1_p2; cell*Function_for_R129(S245/cell, cell, kA2);
  R130: S245 => OS_DM_Ops_bs_1 + OS_CP_Arr_bs_1_bs_2; cell*Function_for_R130(S245/cell, cell, kA3);
  R131: S246 => OS_CP_Arr_bs_1_bs_2 + OS_DM_Rhod_act_a_bs_1_ps_1_p3; cell*Function_for_R131(S246/cell, cell, kA2);
  R132: S246 => OS_DM_Ops_bs_1 + OS_CP_Arr_bs_1_bs_2; cell*Function_for_R132(S246/cell, cell, kA3);
  R133: S247 => OS_CP_Arr_bs_1_bs_2 + OS_DM_Rhod_act_a_bs_1_ps_1_p4; cell*Function_for_R133(S247/cell, cell, kA2);
  R134: S247 => OS_DM_Ops_bs_1 + OS_CP_Arr_bs_1_bs_2; cell*Function_for_R134(S247/cell, cell, kA3);
  R135: S248 => OS_CP_Arr_bs_1_bs_2 + OS_DM_Rhod_act_a_bs_1_ps_1_p5; cell*Function_for_R135(S248/cell, cell, kA2);
  R136: S248 => OS_DM_Ops_bs_1 + OS_CP_Arr_bs_1_bs_2; cell*Function_for_R136(S248/cell, cell, kA3);
  R137: S249 => OS_CP_Arr_bs_1_bs_2 + OS_DM_Rhod_act_a_bs_1_ps_1_p6; cell*Function_for_R137(S249/cell, cell, kA2);
  R138: S249 => OS_DM_Ops_bs_1 + OS_CP_Arr_bs_1_bs_2; cell*Function_for_R138(S249/cell, cell, kA3);
  R139: S250 => OS_CP_RGS_bs_1 + S26 + OS_CP_GtA_g_dp; cell*Function_for_R139(S250/cell, cell, kRGS2);
  R140: S251 => OS_CP_RK_bs_1 + OS_DM_Rhod_act_a_bs_1_ps_1_p2; cell*Function_for_R140(S251/cell, cell, kRK4);
  R141: S252 => OS_CP_RK_bs_1 + OS_DM_Rhod_act_a_bs_1_ps_1_p3; cell*Function_for_R141(S252/cell, cell, kRK4);
  R142: S253 => OS_CP_RK_bs_1 + OS_DM_Rhod_act_a_bs_1_ps_1_p4; cell*Function_for_R142(S253/cell, cell, kRK4);
  R143: S254 => OS_CP_RK_bs_1 + OS_DM_Rhod_act_a_bs_1_ps_1_p5; cell*Function_for_R143(S254/cell, cell, kRK4);
  R144: S255 => OS_CP_RK_bs_1 + OS_DM_Rhod_act_a_bs_1_ps_1_p6; cell*Function_for_R144(S255/cell, cell, kRK4);
  reaction_1: OS_CP_GtA_g_tp => IS_CP_GtA_g_tp; cell*v_Gtx_OS_IS_1(Gtot, OS_CP_GtA_g_tp/cell, sumGta, v_gtX_OS_IS);
  reaction_2: OS_CP_GtA_g_dp => IS_CP_GtA_g_dp; cell*v_Gtx_OS_IS_2(Gtot, OS_CP_GtA_g_dp/cell, sumGta, v_gtX_OS_IS);
  reaction_3: OS_CP_GtBG_bs_1_bs_2 => IS_CP_GtBG_bs_1_bs_2; cell*v_GtBG_OS_IS_1(GtBGRedFact, Gtot, OS_CP_GtBG_bs_1_bs_2/cell, sumGtB, v_gtBG_OS_IS);
  reaction_4: IS_CP_Arr_bs_1_bs_2 => OS_CP_Arr_bs_1_bs_2; cell*flow_eq_1(IS_CP_Arr_bs_1_bs_2/cell, sum_arr, t_sumArr, v_is_os_arr);
  reaction_5: S223 => S221; cell*flow_eq_2(S223/cell, sum_arr, t_sumArr, v_is_os_arr);
  reaction_6: S235 => S233; cell*flow_eq_3(S235/cell, sum_arr, t_sumArr, v_is_os_arr);
  reaction_7: OS_CP_Rec_T_bs_1_bs_2 => IS_CP_Rec_T_bs_1_bs_2; cell*flow_eq_4(OS_CP_Rec_T_bs_1_bs_2/cell, sum_Rec, tsum_rec, v_os_is_rec);

  // Events:
  event_1: at (time >= del + 1*stepT): stepStim = 1;
  event_2: at (time >= del + 2*stepT): stepStim = 2;
  event_4: at (time >= del + 4*stepT): stepStim = 4, t_sumArr = 2522, v_os_is_rec = -0.0001;
  event_5: at (time >= del + 5*stepT): stepStim = 5, v_gtX_OS_IS = 0.003, v_gtBG_OS_IS = 0.003, t_sumArr = 3680;
  event_6: at (time >= del + 6*stepT): stepStim = 6;
  event_7: at (time >= del + 7*stepT): stepStim = 7;
  event_3: at (time >= del + 3*stepT): v_is_os_arr = 1.5e-6, stepStim = 3, t_sumArr = 1200;

  // Unit definitions:
  unit substance = 1e-6 mole;
end
