// SBML level 2 version 4

function Constant_flux__irreversible(v)
  v;
end
Constant_flux__irreversible is "Constant flux (irreversible)";

model MODEL1710260002()
  // Martinez-Guimera2017 - Generic redox signalling model with negative feedforward regulation (Model 3)
  // This model is described in the article:
  // 'Molecular habituation' as a potential mechanism of gradual homeostatic loss with age.
  // Martinez Guimera A, Welsh CM, Proctor CJ, McArdle A, Shanley DP.
  // Mech. Ageing Dev. 2017 Nov; :
  // Abstract:
  // The ability of reactive oxygen species (ROS) to cause molecular damage has meant that chronic oxidative stress has been mostly studied from the point of view of being a source of toxicity to the cell. However, the known duality of ROS molecules as both damaging agents and cellular redox signals implies another perspective in the study of sustained oxidative stress. This is a perspective of studying oxidative stress as a constitutive signal within the cell. In this work, we adopt a theoretical perspective as an exploratory and explanatory approach to examine how chronic oxidative stress can interfere with signal processing by redox signalling pathways in the cell. We report that constitutive signals can give rise to a 'molecular habituation' effect that can prime for a gradual loss of biological function. This is because a constitutive signal in the environment has the potential to reduce the responsiveness of a signalling pathway through the prolonged activation of negative regulators. Additionally, we demonstrate how this phenomenon is likely to occur in different signalling pathways exposed to persistent signals and furthermore at different levels of biological organisation.
  // This model is hosted on BioModels Database and identified by: MODEL1710260002.
  // To cite BioModels Database, please use: Chelliah V et al. BioModels: ten-year anniversary. Nucl. Acids Res. 2015, 43(Database issue):D542-8.
  // To the extent possible under law, all copyright and related or neighbouring rights to this encoded model have been dedicated to the public domain worldwide. Please refer to CC0 Public Domain Dedication for more information.
  // biomodels.db:MODEL1710260002

  // Compartments:
  compartment compartment = 1;

  // Species:
  species Oxidant in compartment = 0;
  species AOX in compartment = 100;
  species Nil in compartment = 1;
  species Activator in compartment = 0;
  species Sensor in compartment = 10;
  species SensorOX in compartment = 0;
  species Function in compartment = 0;
  species Relay in compartment = 10;
  species Intermediate in compartment = 0;
  species Reductant in compartment = 100;
  species Inhibitor in compartment = 0;
  species ReductantOX in compartment = 0;
  species NegReg in compartment = 0;
  species Inactive in compartment = 0;
  species Parallel in compartment = 0;
  species Sensor2 in compartment = 10;
  species ParRelay in compartment = 10;

  // Reactions:
  reaction_1: Nil => Oxidant + Nil; compartment*Constant_flux__irreversible(v);
    v = 0;
  reaction_2: Oxidant + AOX => AOX; compartment*reaction_2_k1*Oxidant*AOX;
    reaction_2_k1 = 0.1;
  reaction_3: Oxidant + Sensor => SensorOX + Activator; compartment*reaction_3_k1*Oxidant*Sensor;
    reaction_3_k1 = 0.1;
  reaction_4: Activator + Relay => Function + Relay + Activator; compartment*reaction_4_k1*Activator*Relay;
    reaction_4_k1 = 0.1;
  reaction_5: Function + Nil => Nil; compartment*reaction_5_k1*Function*Nil;
    reaction_5_k1 = 0.1;
  reaction_6: SensorOX + Reductant => Intermediate; compartment*reaction_6_k1*SensorOX*Reductant;
    reaction_6_k1 = 0.1;
  reaction_7: Intermediate => Inhibitor + ReductantOX; compartment*reaction_7_k1*Intermediate;
    reaction_7_k1 = 0.01;
  reaction_8: Inhibitor + Activator => Sensor; compartment*reaction_8_k1*Inhibitor*Activator;
    reaction_8_k1 = 0.1;
  reaction_9: ReductantOX => Reductant; compartment*reaction_9_k1*ReductantOX;
    reaction_9_k1 = 0.1;
  reaction_10: Oxidant + Sensor2 => Parallel + Sensor2 + Oxidant; compartment*reaction_10_k1*Oxidant*Sensor2;
    reaction_10_k1 = 0.1;
  reaction_13: NegReg + Activator => Inactive + NegReg; compartment*reaction_13_k1*NegReg*Activator;
    reaction_13_k1 = 0.1;
  reaction_12: NegReg + Nil => Nil; compartment*reaction_12_k1*NegReg*Nil;
    reaction_12_k1 = 0.1;
  reaction_11: Parallel + ParRelay => NegReg + ParRelay; compartment*reaction_11_k1*Parallel*ParRelay;
    reaction_11_k1 = 0.1;
  reaction_14: Inhibitor + Inactive => Sensor; compartment*reaction_14_k1*Inhibitor*Inactive;
    reaction_14_k1 = 0.1;

  // Events:
  event_1: at (time >= 300): Oxidant = 100;

  // Unit definitions:
  unit volume = dimensionless;
  unit time = dimensionless;
  unit substance = item;
end
