// SBML level 2 version 4

function Constant_flux__irreversible(v)
  v;
end
Constant_flux__irreversible is "Constant flux (irreversible)";

model MODEL1710260004()
  // Martinez-Guimera2017 - Generic negative feedforward circuit (Model 5)
  // This model is described in the article:
  // 'Molecular habituation' as a potential mechanism of gradual homeostatic loss with age.
  // Martinez Guimera A, Welsh CM, Proctor CJ, McArdle A, Shanley DP.
  // Mech. Ageing Dev. 2017 Nov; :
  // Abstract:
  // The ability of reactive oxygen species (ROS) to cause molecular damage has meant that chronic oxidative stress has been mostly studied from the point of view of being a source of toxicity to the cell. However, the known duality of ROS molecules as both damaging agents and cellular redox signals implies another perspective in the study of sustained oxidative stress. This is a perspective of studying oxidative stress as a constitutive signal within the cell. In this work, we adopt a theoretical perspective as an exploratory and explanatory approach to examine how chronic oxidative stress can interfere with signal processing by redox signalling pathways in the cell. We report that constitutive signals can give rise to a 'molecular habituation' effect that can prime for a gradual loss of biological function. This is because a constitutive signal in the environment has the potential to reduce the responsiveness of a signalling pathway through the prolonged activation of negative regulators. Additionally, we demonstrate how this phenomenon is likely to occur in different signalling pathways exposed to persistent signals and furthermore at different levels of biological organisation.
  // This model is hosted on BioModels Database and identified by: MODEL1710260004.
  // To cite BioModels Database, please use: Chelliah V et al. BioModels: ten-year anniversary. Nucl. Acids Res. 2015, 43(Database issue):D542-8.
  // To the extent possible under law, all copyright and related or neighbouring rights to this encoded model have been dedicated to the public domain worldwide. Please refer to CC0 Public Domain Dedication for more information.
  // biomodels.db:MODEL1710260004

  // Compartments:
  compartment compartment = 1;

  // Species:
  species Nil in compartment = 1;
  species O in compartment = 0;
  species S in compartment = 10;
  species A in compartment = 0;
  species F in compartment = 0;
  species N in compartment = 0;
  species R in compartment = 0;
  species S2 in compartment = 10;

  // Reactions:
  reaction_1: Nil => O + Nil; compartment*Constant_flux__irreversible(v);
    v = 0;
  reaction_2: O + Nil => Nil; compartment*reaction_2_k1*O*Nil;
    reaction_2_k1 = 0.1;
  reaction_3: Nil => S + Nil; compartment*reaction_3_k1*Nil;
    reaction_3_k1 = 0.1;
  reaction_4: S + Nil => Nil; compartment*reaction_4_k1*S*Nil;
    reaction_4_k1 = 0.01;
  reaction_5: O + S => A + O; compartment*reaction_5_k1*O*S;
    reaction_5_k1 = 0.1;
  reaction_6: A => F; compartment*reaction_6_k1*A;
    reaction_6_k1 = 0.1;
  reaction_7: F + Nil => Nil; compartment*reaction_7_k1*F*Nil;
    reaction_7_k1 = 0.1;
  reaction_8: A + N => N; compartment*reaction_8_k1*A*N;
    reaction_8_k1 = 0.1;
  reaction_9: N + Nil => Nil; compartment*reaction_9_k1*N*Nil;
    reaction_9_k1 = 0.01;
  reaction_10: O + S2 => R + O; compartment*reaction_10_k1*O*S2;
    reaction_10_k1 = 0.1;
  reaction_11: R => N; compartment*reaction_11_k1*R;
    reaction_11_k1 = 0.1;
  reaction_12: Nil => S2 + Nil; compartment*reaction_12_k1*Nil;
    reaction_12_k1 = 0.1;
  reaction_13: S2 + Nil => Nil; compartment*reaction_13_k1*S2*Nil;
    reaction_13_k1 = 0.01;

  // Events:
  event_1: at (time >= 500): O = 100;

  // Unit definitions:
  unit volume = dimensionless;
  unit time = dimensionless;
  unit substance = dimensionless;
end
