// SBML level 2 version 4

function Constant_flux__irreversible(v)
  v;
end
Constant_flux__irreversible is "Constant flux (irreversible)";

function Mass_action__dif_compartments__explicit_volume(k, Volume_S, Substrate)
  k*Substrate*Volume_S;
end
Mass_action__dif_compartments__explicit_volume is "Mass action (dif compartments, explicit volume)";

function MM_w__competitive_and_noncompetitive_inhibition(v, volume, substrate, Km, compet_inhib, noncompet_inhib, Ki)
  v*volume*substrate/((Km + substrate + compet_inhib)*(1 + noncompet_inhib/Ki));
end
MM_w__competitive_and_noncompetitive_inhibition is "MM w/ competitive and noncompetitive inhibition";

function Mass_action_transport_with_linear_activator(k, Activator, S, Volume_S)
  k*Activator*S*Volume_S;
end

function Uptake_with_substrate_activation_and_competing_substrate(Km, Ka, Vmax, Volume_S, S1, S2)
  Vmax*Volume_S*(S1/(Km + S1 + S2))*((S1 + S2)/(Ka + S1 + S2));
end

function Basal_flux_with_Hill_type_inhibition__2_inh(V, Ki, h, M1, M2)
  V*Ki^h/(Ki^h + (M1 + M2)^h);
end
Basal_flux_with_Hill_type_inhibition__2_inh is "Basal flux with Hill-type inhibition (2 inh)";

function Linear_activator_and_hyperbolic_inhibitor(ks, M1, Ki, h, M2)
  ks*M1*Ki^h/(Ki^h + M2^h);
end

model Iron_Mouse_PV3___tracer()
  // Parmar2019 - Iron Mouse PV3 - tracer
  // Iron Mouse PV3
  // "A computational model to understand mouse iron physiology and diseases"
  // By Jignesh Parmar and Pedro Mendes
  // Parameter estimation using radioactive tracer data
  // This is a dynamic model of iron distribution in mice, covering seven compartments: plasma, bone marrow, red blood cells (RBC), spleen, duodenum, liver, and the rest of the body . This is mostly a physiological model with regulation by hepcidin and erythropoietin, including only a minimal amount of molecular details.
  // This version of the model includes normal iron species and radioactive-labelled tracer iron species. It was used specifically for parameter estimation using the data from Schümann et al. 2007 (see also Lopes et al. 2010 and Parmar et al. 2017) from three experiments of mice fed adequate, iron-deficient, and iron-rich diets. Mice in all three dietary regimes were injected with a radiactive tracer and its distribution measured along time. The model parameters were adjusted in order to minimize the distance of the model to the data of all three experiements simultaneously.
  // Model validation was carried out with another version of this model where the radioactive species are ommited but all parameters remain with the values determined here (see accompanying model). The model is able to match the phenotype of several iron-related diseases.
  // taxonomy:10090
  // GO:0055072
  // hasProperty mamo:MAMO_0000046

  // Compartments:
  compartment Duodenum = 3.84615e-5;  // FMA:7206
  compartment RBC = 0.00079;  // FMA:263005
  compartment Spleen = 6.73077e-5;  // FMA:7196
  compartment Liver = 0.001161905;  // FMA:7197
  compartment Plasma = 0.0013;  // FMA:62970
  compartment RestOfBody = 0.019694766;
  compartment BoneMarrow = 0.000214286;  // FMA:9608

  // Species:
  species FeDuo in Duodenum = 0; FeDuo is "FeDuo*";  // hasPart CHEBI:24875
  species FeDuo_0 in Duodenum = 0.0100222;  // hasPart CHEBI:24875
  species FeRBC in RBC = 0; FeRBC is "FeRBC*";  // hasPart CHEBI:24875
  species FeRBC_0 in RBC = 0.023;  // hasPart CHEBI:24875
  species FeSpleen in Spleen = 0; FeSpleen is "FeSpleen*";  // hasPart CHEBI:24875
  species FeSpleen_0 in Spleen = 0.00226838;  // hasPart CHEBI:24875
  species FeLiver in Liver = 0; FeLiver is "FeLiver*";  // hasPart CHEBI:24875
  species FeLiver_0 in Liver = 0.0013;  // hasPart CHEBI:24875
  species Fe2Tf in Plasma = 0; Fe2Tf is "Fe2Tf*";  // hasPart uniprot:Q921I1; hasPart CHEBI:29034
  species NTBI in Plasma = 0; NTBI is "NTBI*";  // hasPart CHEBI:24875
  species Tf in Plasma = 1.16103e-5;  // uniprot:Q921I1
  species Fe1Tf in Plasma = 0; Fe1Tf is "Fe1Tf*";  // hasPart uniprot:Q921I1; hasPart CHEBI:29034
  species Hepcidin in Plasma = 2.30092e-8;  // uniprot:Q9EQ21; hasProperty GO:0097690
  species Fe2Tf_0 in Plasma = 1.89625e-5;  // hasPart uniprot:Q921I1; hasPart CHEBI:29034
  species Fe1Tf_0 in Plasma = 8.12714e-6;  // hasPart CHEBI:29034; hasPart uniprot:Q921I1
  species NTBI_0 in Plasma = 4e-8;  // hasPart CHEBI:24875
  species Fe2Tf_ in Plasma = 0; Fe2Tf_ is "Fe2Tf**";  // hasPart uniprot:Q921I1; hasPart CHEBI:29034
  species EPO in Plasma = 2.4267e-12;  // uniprot:P07321
  species FeRest in RestOfBody = 0; FeRest is "FeRest*";  // hasPart CHEBI:24875
  species FeOutside in RestOfBody = 0; FeOutside is "FeOutside*";  // hasPart CHEBI:24875
  species FeRest_0 in RestOfBody = 0.00040176;  // hasPart CHEBI:24875
  species $FeOutside_0 in RestOfBody = 0;  // hasPart CHEBI:24875
  species FeBM in BoneMarrow = 0.00208051;  // hasPart CHEBI:24875
  species FeBM_0 in BoneMarrow = 0; FeBM_0 is "FeBM*";  // hasPart CHEBI:24875

  // Parameters:
  var Total_Fe___in_body; Total_Fe___in_body is "Total_Fe* (in body)";
  var FePlasma; FePlasma is "FePlasma*";
  Injected = 3.073e15;
  kNTBI_Fe1Tf = 1.004004e9;
  kInDuo = 0.0405971;
  kInLiver = 2.11666;
  kInRBC = 5.038445e11;
  kInRest = 4.781209;
  var FePlasma_conc_; FePlasma_conc_ is "FePlasma(conc)*";
  KmFeFPN = 0.112511;
  KiHepcidinFPN = 6.3e-9;
  kFe1Tf_Fe2Tf = 1004000000;
  vDuoNTBI = 0.200907;
  vLiverNTBI = 0.04447949;
  vSpleenNTBI = 2.06738;
  vRestNTBI = 0.0101453;
  kDuoLoss = 6.80738e-5;
  kRBCSpleen = 0.03;
  var FePlasma_0;
  kInBM = 4.068782e12;
  kBMSpleen = 0.1032184;
  var Total_Fe__g; Total_Fe__g is "Total_Fe_(g)";
  var Total_Tf_mg_ml; Total_Tf_mg_ml is "Total_Tf_mg/ml";
  vDiet = 0.003469655;
  var FePlasma_conc; FePlasma_conc is "FePlasma(conc)";
  KaNTBI = 0.000255016;
  KmNTBI = 0.000679291;
  vNTBILiver = 14.1511;
  fDiet = 1;
  // original value is 0.01026651919
  ksHepcidin = 0.0003987658;
  vEPO = 2.626748e-9;
  kdEPO = 4.8;
  hEPO = 6.5;
  KiEPORBC = 0.01;
  KEPOHepcidin = 5e-12;
  hEPOHepcidin = 4;
  hNTBI = 1;
  TotalFe_DailyLossFraction = 0.00466;
  TotalFe_target_g = 0.00159555;
  kRestLoss = 0.01686202;
  vTf = 1.5479976e-5;
  kdTf = 0.4;
  kdHepcidin = 0.75616;
  quantity_to_number_factor = 6.02214179e23;

  // Assignment rules:
  FeTftotal := 2*Fe2Tf_0 + Fe1Tf_0 + Fe1Tf + 2*Fe2Tf_ + 2*Fe2Tf;
  Total_Fe___in_body := FeDuo*quantity_to_number_factor*Duodenum + FeLiver*quantity_to_number_factor*Liver + FeSpleen*quantity_to_number_factor*Spleen + FeRBC*quantity_to_number_factor*RBC + FeRest*quantity_to_number_factor*RestOfBody + Fe2Tf*quantity_to_number_factor*Plasma + NTBI*quantity_to_number_factor*Plasma + 2*Fe2Tf_*quantity_to_number_factor*Plasma + Fe1Tf*quantity_to_number_factor*Plasma + FeBM_0*quantity_to_number_factor*BoneMarrow;
  FePlasma := Fe2Tf*quantity_to_number_factor*Plasma + NTBI*quantity_to_number_factor*Plasma + Fe1Tf*quantity_to_number_factor*Plasma + 2*Fe2Tf_*quantity_to_number_factor*Plasma;
  PDuo := 100*FeDuo*quantity_to_number_factor*Duodenum/Injected;
  PLiver := 100*FeLiver*quantity_to_number_factor*Liver/Injected;
  PSpleen := 100*FeSpleen*quantity_to_number_factor*Spleen/Injected;
  PRBC := 100*FeRBC*quantity_to_number_factor*RBC/Injected;
  PRest := 100*FeRest*quantity_to_number_factor*RestOfBody/Injected;
  PPlasma := 100*(NTBI*quantity_to_number_factor*Plasma + 2*Fe2Tf_*quantity_to_number_factor*Plasma + Fe2Tf*quantity_to_number_factor*Plasma + Fe1Tf*quantity_to_number_factor*Plasma)/Injected;
  POutside := 100*FeOutside*quantity_to_number_factor*RestOfBody/Injected;
  FePlasma_conc_ := FePlasma/(Plasma*6.02214179e23);
  TfSaturation := 100*(2*Fe2Tf*quantity_to_number_factor*Plasma + 2*Fe2Tf_0*quantity_to_number_factor*Plasma + Fe1Tf*quantity_to_number_factor*Plasma + Fe1Tf_0*quantity_to_number_factor*Plasma + 2*Fe2Tf_*quantity_to_number_factor*Plasma)/(2*(Fe2Tf*quantity_to_number_factor*Plasma + Fe1Tf*quantity_to_number_factor*Plasma + Tf*quantity_to_number_factor*Plasma + Fe2Tf_*quantity_to_number_factor*Plasma + Fe2Tf_0*quantity_to_number_factor*Plasma + Fe1Tf_0*quantity_to_number_factor*Plasma));
  Total_Fe := FeDuo_0*quantity_to_number_factor*Duodenum + FeLiver_0*quantity_to_number_factor*Liver + FeSpleen_0*quantity_to_number_factor*Spleen + FeRBC_0*quantity_to_number_factor*RBC + FeRest_0*quantity_to_number_factor*RestOfBody + 2*Fe2Tf_0*quantity_to_number_factor*Plasma + Fe2Tf*quantity_to_number_factor*Plasma + Fe1Tf_0*quantity_to_number_factor*Plasma + NTBI_0*quantity_to_number_factor*Plasma + FeBM*quantity_to_number_factor*BoneMarrow;
  Total_Fe_concentration := (FeDuo_0*quantity_to_number_factor*Duodenum + FeLiver_0*quantity_to_number_factor*Liver + FeSpleen_0*quantity_to_number_factor*Spleen + FeRBC_0*quantity_to_number_factor*RBC + FeRest_0*quantity_to_number_factor*RestOfBody + 2*Fe2Tf_0*quantity_to_number_factor*Plasma + Fe2Tf*quantity_to_number_factor*Plasma + Fe1Tf_0*quantity_to_number_factor*Plasma + NTBI_0*quantity_to_number_factor*Plasma + FeBM*quantity_to_number_factor*BoneMarrow)/(6.02214179e23*(Duodenum + Liver + Plasma + RBC + RestOfBody + Spleen));
  FePlasma_0 := 2*Fe2Tf_0*quantity_to_number_factor*Plasma + Fe2Tf*quantity_to_number_factor*Plasma + Fe1Tf_0*quantity_to_number_factor*Plasma + NTBI_0*quantity_to_number_factor*Plasma;
  PBM := 100*FeBM_0*quantity_to_number_factor*BoneMarrow/Injected;
  Total_Fe__g := Total_Fe*55.845/6.02214179e23;
  Total_Tf := Tf*quantity_to_number_factor*Plasma + Fe1Tf*quantity_to_number_factor*Plasma + Fe1Tf_0*quantity_to_number_factor*Plasma + Fe2Tf_*quantity_to_number_factor*Plasma + Fe2Tf*quantity_to_number_factor*Plasma + Fe2Tf_0*quantity_to_number_factor*Plasma;
  Total_Tf_conc := Total_Tf/(6.02214179e23*Plasma);
  Total_Tf_mg_ml := Total_Tf_conc*80;
  FePlasma_conc := FePlasma_0/(Plasma*6.02214179e23);

  // Reactions:
  Duo_NTBI: FeDuo => NTBI; MM_w__competitive_and_noncompetitive_inhibition(vDuoNTBI, Duodenum, FeDuo, KmFeFPN, FeDuo_0, Hepcidin, KiHepcidinFPN); Duo_NTBI is "Duo_NTBI*";  // modifiers: FeDuo_0, Hepcidin; GO:1903414; GO:1903988
  Fe2Tf_BM_: Fe2Tf_ => 2 FeBM_0 + Tf; Mass_action_transport_with_linear_activator(kInBM, EPO, Fe2Tf_, Plasma); Fe2Tf_BM_ is "Fe2Tf_BM**";  // modifiers: EPO; GO:0097286; GO:0033572; hasProperty GO:0036017
  RBC_Spleen: FeRBC => FeSpleen; Mass_action__dif_compartments__explicit_volume(kRBCSpleen, RBC, FeRBC); RBC_Spleen is "RBC_Spleen*";  // modifiers: NTBI, NTBI_0; GO:0006909
  Spleen_NTBI: FeSpleen => NTBI; MM_w__competitive_and_noncompetitive_inhibition(vSpleenNTBI, Spleen, FeSpleen, KmFeFPN, FeSpleen_0, Hepcidin, KiHepcidinFPN); Spleen_NTBI is "Spleen_NTBI*";  // modifiers: FeSpleen_0, Hepcidin; GO:1903414; GO:1903988
  Liver_NTBI: FeLiver => NTBI; MM_w__competitive_and_noncompetitive_inhibition(vLiverNTBI, Liver, FeLiver, KmFeFPN, FeLiver_0, Hepcidin, KiHepcidinFPN); Liver_NTBI is "Liver_NTBI*";  // modifiers: FeLiver_0, Hepcidin; GO:1903988; GO:1903414
  NTBI_Fe1Tf: NTBI + Tf => Fe1Tf; Plasma*kNTBI_Fe1Tf*NTBI*Tf; NTBI_Fe1Tf is "NTBI_Fe1Tf*";
  DuoLoss: FeDuo => FeOutside; Mass_action__dif_compartments__explicit_volume(kDuoLoss, Duodenum, FeDuo); DuoLoss is "DuoLoss*";  // modifiers: FeDuo_0
  Fe2Tf_Liver_: Fe2Tf_ => 2 FeLiver + Tf; Mass_action__dif_compartments__explicit_volume(kInLiver, Plasma, Fe2Tf_); Fe2Tf_Liver_ is "Fe2Tf_Liver**";  // GO:0097286; GO:0033572
  Fe2Tf_Rest_: Fe2Tf_ => 2 FeRest + Tf; Mass_action__dif_compartments__explicit_volume(kInRest, Plasma, Fe2Tf_); Fe2Tf_Rest_ is "Fe2Tf_Rest**";  // GO:0097286; GO:0033572
  RestLoss: FeRest => FeOutside; RestOfBody*kRestLoss*FeRest; RestLoss is "RestLoss*";
  Fe2Tf_Duo_: Fe2Tf_ => 2 FeDuo + Tf; Mass_action__dif_compartments__explicit_volume(kInDuo, Plasma, Fe2Tf_); Fe2Tf_Duo_ is "Fe2Tf_Duo**";  // GO:0033572; GO:0097286
  Rest_NTBI: FeRest => NTBI; MM_w__competitive_and_noncompetitive_inhibition(vRestNTBI, RestOfBody, FeRest, KmFeFPN, FeRest_0, Hepcidin, KiHepcidinFPN); Rest_NTBI is "Rest_NTBI*";  // modifiers: FeRest_0, Hepcidin; GO:1903988; GO:1903414
  Fe1Tf__Fe2Tf_: Fe1Tf + NTBI => Fe2Tf_; Plasma*kFe1Tf_Fe2Tf*Fe1Tf*NTBI; Fe1Tf__Fe2Tf_ is "Fe1Tf*_Fe2Tf**";
  Fe1Tf_Liver: Fe1Tf => FeLiver + Tf; Mass_action__dif_compartments__explicit_volume(kInLiver, Plasma, Fe1Tf); Fe1Tf_Liver is "Fe1Tf_Liver*";  // GO:0097286; GO:0033572
  Fe1Tf_BM: Fe1Tf => FeBM_0 + Tf; Mass_action_transport_with_linear_activator(kInBM, EPO, Fe1Tf, Plasma); Fe1Tf_BM is "Fe1Tf_BM*";  // modifiers: EPO; GO:0097286; GO:0033572; hasProperty GO:0036017
  Fe1Tf_Rest: Fe1Tf => FeRest + Tf; Mass_action__dif_compartments__explicit_volume(kInRest, Plasma, Fe1Tf); Fe1Tf_Rest is "Fe1Tf_Rest*";  // GO:0097286; GO:0033572
  Fe1Tf_Duo: Fe1Tf => FeDuo + Tf; Mass_action__dif_compartments__explicit_volume(kInDuo, Plasma, Fe1Tf); Fe1Tf_Duo is "Fe1Tf_Duo*";  // GO:0097286; GO:0033572
  Diet: => FeDuo_0; Duodenum*Constant_flux__irreversible(vDiet);
  HepcidinSynthesis: => Hepcidin; Plasma*Linear_activator_and_hyperbolic_inhibitor(ksHepcidin, FeTftotal, KEPOHepcidin, hEPOHepcidin, EPO);  // modifiers: EPO; isInstanceOf GO:0036017 GO:0030072; hasProperty GO:0036017
  HepcidinDecay: Hepcidin => ; Plasma*kdHepcidin*Hepcidin;  // isInstanceOf GO:0030163
  Duo_NTBI_0: FeDuo_0 => NTBI_0; MM_w__competitive_and_noncompetitive_inhibition(vDuoNTBI, Duodenum, FeDuo_0, KmFeFPN, FeDuo, Hepcidin, KiHepcidinFPN);  // modifiers: FeDuo, Hepcidin; GO:1903988; GO:1903414
  Fe2Tf_BM: Fe2Tf_0 => 2 FeBM + Tf; Mass_action_transport_with_linear_activator(kInBM, EPO, Fe2Tf_0, Plasma);  // modifiers: EPO; GO:0097286; GO:0033572; hasProperty GO:0036017
  RBC_Spleen_0: FeRBC_0 => FeSpleen_0; Mass_action__dif_compartments__explicit_volume(kRBCSpleen, RBC, FeRBC_0);  // modifiers: NTBI_0, NTBI; GO:0006909
  Spleen_NTBI_0: FeSpleen_0 => NTBI_0; MM_w__competitive_and_noncompetitive_inhibition(vSpleenNTBI, Spleen, FeSpleen_0, KmFeFPN, FeSpleen, Hepcidin, KiHepcidinFPN);  // modifiers: FeSpleen, Hepcidin; GO:1903414; GO:1903988
  Liver_NTBI_0: FeLiver_0 => NTBI_0; MM_w__competitive_and_noncompetitive_inhibition(vLiverNTBI, Liver, FeLiver_0, KmFeFPN, FeLiver, Hepcidin, KiHepcidinFPN);  // modifiers: FeLiver, Hepcidin; GO:1903988; GO:1903414
  NTBI_Fe1Tf_0: NTBI_0 + Tf => Fe1Tf_0; Plasma*kNTBI_Fe1Tf*NTBI_0*Tf;
  DuoLoss_0: FeDuo_0 => $FeOutside_0; Mass_action__dif_compartments__explicit_volume(kDuoLoss, Duodenum, FeDuo_0);  // modifiers: FeDuo
  Fe2Tf_Liver: Fe2Tf_0 => 2 FeLiver_0 + Tf; Mass_action__dif_compartments__explicit_volume(kInLiver, Plasma, Fe2Tf_0);  // GO:0097286; GO:0033572
  Fe2Tf_Rest: Fe2Tf_0 => 2 FeRest_0 + Tf; Mass_action__dif_compartments__explicit_volume(kInRest, Plasma, Fe2Tf_0);  // GO:0097286; GO:0033572
  Fe2Tf_Duo: Fe2Tf_0 => 2 FeDuo_0 + Tf; Mass_action__dif_compartments__explicit_volume(kInDuo, Plasma, Fe2Tf_0);  // GO:0097286; GO:0033572
  Rest_NTBI_0: FeRest_0 => NTBI_0; MM_w__competitive_and_noncompetitive_inhibition(vRestNTBI, RestOfBody, FeRest_0, KmFeFPN, FeRest, Hepcidin, KiHepcidinFPN);  // modifiers: FeRest, Hepcidin; GO:1903988; GO:1903414
  Fe1Tf_Fe2Tf: Fe1Tf_0 + NTBI_0 => Fe2Tf_0; Plasma*kFe1Tf_Fe2Tf*Fe1Tf_0*NTBI_0;
  Fe1Tf_Liver_0: Fe1Tf_0 => FeLiver_0 + Tf; Mass_action__dif_compartments__explicit_volume(kInLiver, Plasma, Fe1Tf_0);  // GO:0033572; GO:0097286
  Fe1Tf_BM_0: Fe1Tf_0 => FeBM + Tf; Mass_action_transport_with_linear_activator(kInBM, EPO, Fe1Tf_0, Plasma);  // modifiers: EPO; GO:0097286; GO:0033572; hasProperty GO:0036017
  Fe1Tf_Rest_0: Fe1Tf_0 => FeRest_0 + Tf; Mass_action__dif_compartments__explicit_volume(kInRest, Plasma, Fe1Tf_0);  // GO:0033572; GO:0097286
  Fe1Tf_Duo_0: Fe1Tf_0 => FeDuo_0 + Tf; Mass_action__dif_compartments__explicit_volume(kInDuo, Plasma, Fe1Tf_0);  // GO:0097286; GO:0033572
  Fe1Tf_Fe2Tf_0: Fe1Tf_0 + NTBI => Fe2Tf; Plasma*kFe1Tf_Fe2Tf*Fe1Tf_0*NTBI; Fe1Tf_Fe2Tf_0 is "Fe1Tf_Fe2Tf*";
  Fe1Tf__Fe2Tf: Fe1Tf + NTBI_0 => Fe2Tf; Plasma*kFe1Tf_Fe2Tf*Fe1Tf*NTBI_0; Fe1Tf__Fe2Tf is "Fe1Tf*_Fe2Tf*";
  Fe2Tf_Duo_0: Fe2Tf => FeDuo + FeDuo_0 + Tf; Mass_action__dif_compartments__explicit_volume(kInDuo, Plasma, Fe2Tf); Fe2Tf_Duo_0 is "Fe2Tf_Duo*";  // GO:0097286; GO:0033572
  Fe2Tf_Liver_0: Fe2Tf => FeLiver + FeLiver_0 + Tf; Mass_action__dif_compartments__explicit_volume(kInLiver, Plasma, Fe2Tf); Fe2Tf_Liver_0 is "Fe2Tf_Liver*";  // GO:0033572; GO:0097286
  Fe2Tf_BM_0: Fe2Tf => FeBM_0 + FeBM + Tf; Mass_action_transport_with_linear_activator(kInBM, EPO, Fe2Tf, Plasma); Fe2Tf_BM_0 is "Fe2Tf_BM*";  // modifiers: EPO; GO:0097286; GO:0033572; hasProperty GO:0036017
  Fe2Tf_Rest_0: Fe2Tf => FeRest + FeRest_0 + Tf; Mass_action__dif_compartments__explicit_volume(kInRest, Plasma, Fe2Tf); Fe2Tf_Rest_0 is "Fe2Tf_Rest*";  // GO:0097286; GO:0033572
  BM_RBC: FeBM => FeRBC_0; Mass_action_transport_with_linear_activator(kInRBC, EPO, FeBM, BoneMarrow);  // modifiers: EPO; GO:0043249; hasProperty GO:0036017
  BM_RBC_0: FeBM_0 => FeRBC; Mass_action_transport_with_linear_activator(kInRBC, EPO, FeBM_0, BoneMarrow); BM_RBC_0 is "BM_RBC*";  // modifiers: EPO; GO:0043249; hasProperty GO:0036017
  BM_Spleen: FeBM => FeSpleen_0; Mass_action__dif_compartments__explicit_volume(kBMSpleen, BoneMarrow, FeBM);
  BM_Spleen_0: FeBM_0 => FeSpleen; Mass_action__dif_compartments__explicit_volume(kBMSpleen, BoneMarrow, FeBM_0); BM_Spleen_0 is "BM_Spleen*";
  NTBI_Liver: NTBI_0 => FeLiver_0; Uptake_with_substrate_activation_and_competing_substrate(KmNTBI, KaNTBI, vNTBILiver, Plasma, NTBI_0, NTBI);  // modifiers: NTBI; GO:0097286; isPropertyOf uniprot:Q75N73
  NTBI__Liver: NTBI => FeLiver; Uptake_with_substrate_activation_and_competing_substrate(KmNTBI, KaNTBI, vNTBILiver, Plasma, NTBI, NTBI_0); NTBI__Liver is "NTBI*_Liver";  // modifiers: NTBI_0; GO:0097286; isPropertyOf uniprot:Q75N73
  EPO_synthesis: => EPO; Plasma*Basal_flux_with_Hill_type_inhibition__2_inh(vEPO, KiEPORBC, hEPO, FeRBC_0, FeRBC);  // modifiers: FeRBC_0, FeRBC; isInstanceOf GO:0030072
  EPO_degradation: EPO => ; Plasma*kdEPO*EPO;  // isInstanceOf GO:0030163
  RestLoss_0: FeRest_0 => $FeOutside_0; RestOfBody*kRestLoss*FeRest_0;
  Tf_degradation: Tf => ; Plasma*kdTf*Tf;  // isInstanceOf GO:0030163
  Tf_synthesis: => Tf; Plasma*Constant_flux__irreversible(vTf);  // isInstanceOf GO:0030163
  Fe2Tf_degradation: Fe2Tf_0 => 2 NTBI_0; Plasma*kdTf*Fe2Tf_0;  // isInstanceOf GO:0030163
  Fe2Tf___degradation: Fe2Tf_ => 2 NTBI; Plasma*kdTf*Fe2Tf_; Fe2Tf___degradation is "Fe2Tf**_degradation";  // isInstanceOf GO:0030163
  Fe2Tf__degradation: Fe2Tf => NTBI_0 + NTBI; Plasma*kdTf*Fe2Tf; Fe2Tf__degradation is "Fe2Tf*_degradation";  // isInstanceOf GO:0030163
  Fe1Tf_degradation: Fe1Tf_0 => NTBI_0; Plasma*kdTf*Fe1Tf_0;  // isInstanceOf GO:0030163
  Fe1Tf__degradation: Fe1Tf => NTBI; Plasma*kdTf*Fe1Tf; Fe1Tf__degradation is "Fe1Tf*_degradation";

  // Events:
  IV_iron_tracer_0: at (time >= 40): NTBI = Injected/(6.02214179e23*Plasma);
  change_Diet: at (time >= 5): vDiet = vDiet*fDiet;

  // Unit definitions:
  unit time = 86400 second;
end
