// SBML level 3 version 1

model New_Model()
  // Hetmanski2019 - Mechanochemical signaling controlled rear retraction of migrating cell
  // hasProperty mamo:MAMO_0000046
  // model units - substance: substance, time: time, volume: volume, area: area, length: length, extent: substance

  // Compartments:
  compartment rear = 1 volume;

  // Species:
  species RhoAgdp in rear = 100;
  species RhoAgtp in rear = 0;
  species Rock1i in rear = 100;
  species Rock1a in rear = 0;
  species RhoA_Rock1 in rear = 0; RhoA_Rock1 is "RhoA:Rock1";
  species DRFi in rear = 100;
  species DRFa in rear = 0;
  species PKN2i in rear = 100;
  species RhoA_PKN2 in rear = 0; RhoA_PKN2 is "RhoA:PKN2";
  species PKN2a in rear = 0;
  species LIMKi in rear = 100;
  species ROCK1_LIMK in rear = 0; ROCK1_LIMK is "ROCK1-LIMK";
  species LIMKa in rear = 0;
  species Cofilina in rear = 100;
  species LIMK_Cofilin in rear = 0; LIMK_Cofilin is "LIMK-Cofilin";
  species Cofilini in rear = 0;
  species Actinag in rear = 100;
  species DRF_Actin in rear = 0; DRF_Actin is "DRF:Actin";
  species Actinf in rear = 0;
  species Cofilin_Actin in rear = 0; Cofilin_Actin is "Cofilin:Actin";
  species CPI_17i in rear = 100; CPI_17i is "CPI-17i";
  species PKN2_CPI17 in rear = 0; PKN2_CPI17 is "PKN2:CPI17";
  species CPI_17a in rear = 0; CPI_17a is "CPI-17a";
  species ROCK1_CPI17 in rear = 0; ROCK1_CPI17 is "ROCK1:CPI17";
  species MLCPa in rear = 100;
  species ROCK_MLCP in rear = 0; ROCK_MLCP is "ROCK:MLCP";
  species MLCPi in rear = 0;
  species CPI17_MLCP in rear = 0; CPI17_MLCP is "CPI17:MLCP";
  species RhoA_Drf in rear = 0; RhoA_Drf is "RhoA:Drf";
  species ROCK1_DRF in rear = 0; ROCK1_DRF is "ROCK1:DRF";
  species pMLCa in rear = 0;
  species pMLCi in rear = 100;
  species MLCP_PMLC in rear = 0; MLCP_PMLC is "MLCP-PMLC";
  species Rock1_pMLC_MLCP in rear = 0; Rock1_pMLC_MLCP is "Rock1:pMLC:MLCP";
  species Cavi_Src in rear = 0; Cavi_Src is "Cavi-Src";
  species Cav1a in rear = 0;
  species Srca in rear = 50;
  species Cav1i in rear = 100;
  species Srci in rear = 50;
  species Cav_Ect2 in rear = 0; Cav_Ect2 is "Cav-Ect2";
  species Ect2i in rear = 100;
  species Ect2a in rear = 0;
  species p190GAPi in rear = 100;
  species Src_p190 in rear = 0; Src_p190 is "Src-p190";
  species p190GAPa in rear = 0;
  species Actomyo_High in rear = 0; Actomyo_High is "Actomyo.High";
  species Polcont_High in rear = 0; Polcont_High is "Polcont.High";
  species Polcont_Low in rear = 100; Polcont_Low is "Polcont.Low";
  species Polystiff_High in rear = 100; Polystiff_High is "Polystiff.High";
  species Recoil_Fast in rear = 0; Recoil_Fast is "Recoil.Fast";
  species Tension_D in rear = 0; Tension_D is "Tension.D";
  species Tension_I in rear = 100; Tension_I is "Tension.I";
  species Actomyo_Low in rear = 100; Actomyo_Low is "Actomyo.Low";
  species Recoil_Slow in rear = 100; Recoil_Slow is "Recoil.Slow";
  species p190GAP_RhoA in rear = 0; p190GAP_RhoA is "p190GAP:RhoA";
  species Rho_Ect2 in rear = 0; Rho_Ect2 is "Rho-Ect2";
  species Cava_Src in rear = 0; Cava_Src is "Cava-Src";
  species Pkn2_Actin in rear = 0; Pkn2_Actin is "Pkn2-Actin";

  // Parameters:
  PKN2___ROCK = 0.01; PKN2___ROCK is "PKN2 / ROCK";
  Actin_turn = 0.01;
  Tension_increase = 0.01;

  // Reactions:
  RhoA_Rock1_0: RhoAgtp + Rock1i -> RhoA_Rock1; rear*(RhoA_Rock1_0_k1*RhoAgtp*Rock1i - RhoA_Rock1_0_k2*RhoA_Rock1); RhoA_Rock1_0 is "RhoA-Rock1";
    RhoA_Rock1_0_k1 = 0.001; RhoA_Rock1_0_k2 = 0.0001;
  Rock1_act: RhoA_Rock1 -> Rock1a + RhoAgdp; rear*(Rock1_act_k1*RhoA_Rock1 - Rock1_act_k2*Rock1a*RhoAgdp);
    Rock1_act_k1 = 0.1; Rock1_act_k2 = 0.01;
  RhoA_DRF: RhoAgtp + DRFi -> RhoA_Drf; rear*(RhoA_DRF_k1*RhoAgtp*DRFi - RhoA_DRF_k2*RhoA_Drf); RhoA_DRF is "RhoA-DRF";
    RhoA_DRF_k1 = 0.001; RhoA_DRF_k2 = 0.0001;
  RhoA_PKN2_0: RhoAgtp + PKN2i -> RhoA_PKN2; rear*(RhoA_PKN2_0_k1*RhoAgtp*PKN2i - RhoA_PKN2_0_k2*RhoA_PKN2); RhoA_PKN2_0 is "RhoA-PKN2";
    RhoA_PKN2_0_k1 = 0.001; RhoA_PKN2_0_k2 = 0.0001;
  PKN2_act: RhoA_PKN2 -> PKN2a + RhoAgdp; rear*(PKN2_act_k1*RhoA_PKN2 - PKN2_act_k2*PKN2a*RhoAgdp);
    PKN2_act_k1 = 0.1; PKN2_act_k2 = 0.01;
  DRF_act: RhoA_Drf -> DRFa + RhoAgdp; rear*(DRF_act_k1*RhoA_Drf - DRF_act_k2*DRFa*RhoAgdp);
    DRF_act_k1 = 0.1; DRF_act_k2 = 0.01;
  ROCK1_LIMK_0: Rock1a + LIMKi -> ROCK1_LIMK; rear*(ROCK1_LIMK_0_k1*Rock1a*LIMKi - ROCK1_LIMK_0_k2*ROCK1_LIMK); ROCK1_LIMK_0 is "ROCK1-LIMK";
    ROCK1_LIMK_0_k1 = 0.001; ROCK1_LIMK_0_k2 = 0.0001;
  LIMK_act: ROCK1_LIMK -> LIMKa + Rock1i; rear*(LIMK_act_k1*ROCK1_LIMK - LIMK_act_k2*LIMKa*Rock1i);
    LIMK_act_k1 = 0.01; LIMK_act_k2 = 0.001;
  LIMK_Cofilin_0: LIMKa + Cofilina -> LIMK_Cofilin; rear*(LIMK_Cofilin_0_k1*LIMKa*Cofilina - LIMK_Cofilin_0_k2*LIMK_Cofilin); LIMK_Cofilin_0 is "LIMK-Cofilin";
    LIMK_Cofilin_0_k1 = 0.01; LIMK_Cofilin_0_k2 = 0.001;
  Cofilin_inact: LIMK_Cofilin -> LIMKi + Cofilini; rear*(Cofilin_inact_k1*LIMK_Cofilin - Cofilin_inact_k2*LIMKi*Cofilini);
    Cofilin_inact_k1 = 0.01; Cofilin_inact_k2 = 0.001;
  DRF_Actin_0: DRFa + Actinag -> DRF_Actin; rear*(DRF_Actin_0_k1*DRFa*Actinag - DRF_Actin_0_k2*DRF_Actin); DRF_Actin_0 is "DRF-Actin";
    DRF_Actin_0_k1 = 0.1; DRF_Actin_0_k2 = 0.0001;
  Actinf_act: DRF_Actin -> DRFi + Actinf; rear*(Actinf_act_k1*DRF_Actin - Actinf_act_k2*DRFi*Actinf);
    Actinf_act_k1 = 0.1; Actinf_act_k2 = 0.01;
  Cofilin_Actin_0: Cofilina + Actinf -> Cofilin_Actin; rear*(Cofilin_Actin_0_k1*Cofilina*Actinf - Cofilin_Actin_0_k2*Cofilin_Actin); Cofilin_Actin_0 is "Cofilin-Actin";
    Cofilin_Actin_0_k1 = 0.0001; Cofilin_Actin_0_k2 = 1e-5;
  Actinf_inh: Cofilin_Actin -> Actinag + Cofilina; rear*(Actinf_inh_k1*Cofilin_Actin - Actinf_inh_k2*Actinag*Cofilina);
    Actinf_inh_k1 = 0.01; Actinf_inh_k2 = 0.001;
  PKN2_CPI_17: PKN2a + CPI_17i -> PKN2_CPI17; rear*(PKN2_CPI_17_k1*PKN2a*CPI_17i - PKN2_CPI_17_k2*PKN2_CPI17); PKN2_CPI_17 is "PKN2-CPI-17";
    PKN2_CPI_17_k1 = 0.01; PKN2_CPI_17_k2 = 0.001;
  CPI_17_act: PKN2_CPI17 -> CPI_17a + PKN2i; rear*(CPI_17_act_k1*PKN2_CPI17 - CPI_17_act_k2*CPI_17a*PKN2i); CPI_17_act is "CPI-17 act";
    CPI_17_act_k1 = 0.01; CPI_17_act_k2 = 0.001;
  ROCK1_CPI_17: Rock1a + CPI_17i -> ROCK1_CPI17; rear*(ROCK1_CPI_17_k1*Rock1a*CPI_17i - ROCK1_CPI_17_k2*ROCK1_CPI17); ROCK1_CPI_17 is "ROCK1-CPI-17";
    ROCK1_CPI_17_k1 = 0.0001; ROCK1_CPI_17_k2 = 1e-5;
  CPI_17_act_2: ROCK1_CPI17 -> Rock1i + CPI_17a; rear*(CPI_17_act_2_k1*ROCK1_CPI17 - CPI_17_act_2_k2*Rock1i*CPI_17a); CPI_17_act_2 is "CPI-17 act 2";
    CPI_17_act_2_k1 = 0.01; CPI_17_act_2_k2 = 0.001;
  CPI_17_MLCP: CPI_17a + MLCPa -> CPI17_MLCP; rear*(CPI_17_MLCP_k1*CPI_17a*MLCPa - CPI_17_MLCP_k2*CPI17_MLCP); CPI_17_MLCP is "CPI-17-MLCP";
    CPI_17_MLCP_k1 = 0.01; CPI_17_MLCP_k2 = 0.001;
  MLCP_inhib_2: CPI17_MLCP -> CPI_17i + MLCPi; rear*(MLCP_inhib_2_k1*CPI17_MLCP - MLCP_inhib_2_k2*CPI_17i*MLCPi);
    MLCP_inhib_2_k1 = 0.001; MLCP_inhib_2_k2 = 0.0001;
  ROCK1_DRF_0: Rock1a + DRFi -> ROCK1_DRF; rear*(ROCK1_DRF_0_k1*Rock1a*DRFi - ROCK1_DRF_0_k2*ROCK1_DRF); ROCK1_DRF_0 is "ROCK1-DRF";
    ROCK1_DRF_0_k1 = 0.01; ROCK1_DRF_0_k2 = 0.001;
  DRF_act_2: ROCK1_DRF -> Rock1i + DRFa; rear*(DRF_act_2_k1*ROCK1_DRF - DRF_act_2_k2*Rock1i*DRFa);
    DRF_act_2_k1 = 0.01; DRF_act_2_k2 = 0.001;
  ROCK_pMLC: Rock1a + pMLCi -> Rock1i + pMLCa; rear*(ROCK_pMLC_k1*Rock1a*pMLCi - ROCK_pMLC_k2*Rock1i*pMLCa); ROCK_pMLC is "ROCK-pMLC";
    ROCK_pMLC_k1 = 0.001; ROCK_pMLC_k2 = 0.0001;
  MLCP_PMLC_0: MLCPa + pMLCa -> MLCP_PMLC; rear*(MLCP_PMLC_0_k1*MLCPa*pMLCa - MLCP_PMLC_0_k2*MLCP_PMLC); MLCP_PMLC_0 is "MLCP-PMLC";
    MLCP_PMLC_0_k1 = 0.01; MLCP_PMLC_0_k2 = 0.001;
  pMLC_inhib: MLCP_PMLC -> MLCPa + pMLCi; rear*(pMLC_inhib_k1*MLCP_PMLC - pMLC_inhib_k2*MLCPa*pMLCi);
    pMLC_inhib_k1 = 0.01; pMLC_inhib_k2 = 0.001;
  Cav1a_Srca: Cav1a + Srca -> Cava_Src; rear*(Cav1a_Srca_k1*Cav1a*Srca - Cav1a_Srca_k2*Cava_Src); Cav1a_Srca is "Cav1a.Srca";
    Cav1a_Srca_k1 = 1e-6; Cav1a_Srca_k2 = 1e-7;
  Src_inact: Cava_Src -> Cav1i + Srci; rear*(Src_inact_k1*Cava_Src - Src_inact_k2*Cav1i*Srci);
    Src_inact_k1 = 1e-6; Src_inact_k2 = 1e-7;
  Cav_Gef: Cav1a + Ect2i -> Cav_Ect2; rear*(Cav_Gef_k1*Cav1a*Ect2i - Cav_Gef_k2*Cav_Ect2); Cav_Gef is "Cav.Gef";
    Cav_Gef_k1 = 0.01; Cav_Gef_k2 = 0.001;
  Cav_Gef_act: Cav_Ect2 -> Cav1i + Ect2a; rear*(Cav_Gef_act_k1*Cav_Ect2 - Cav_Gef_act_k2*Cav1i*Ect2a);
    Cav_Gef_act_k1 = 0.1; Cav_Gef_act_k2 = 0.01;
  Rho_GEF: Ect2a + RhoAgdp -> Rho_Ect2; rear*(Rho_GEF_k1*Ect2a*RhoAgdp - Rho_GEF_k2*Rho_Ect2); Rho_GEF is "Rho-GEF";
    Rho_GEF_k1 = 0.1; Rho_GEF_k2 = 0.01;
  Src_p190_0: Srca + p190GAPi -> Src_p190; rear*(Src_p190_0_k1*Srca*p190GAPi - Src_p190_0_k2*Src_p190); Src_p190_0 is "Src-p190";
    Src_p190_0_k1 = 0.01; Src_p190_0_k2 = 0.001;
  p190gapin: Src_p190 -> Srci + p190GAPa; rear*(p190gapin_k1*Src_p190 - p190gapin_k2*Srci*p190GAPa);
    p190gapin_k1 = 0.01; p190gapin_k2 = 0.001;
  Rho_turnover: RhoAgtp => RhoAgdp; rear*Rho_turnover_k1*RhoAgtp;
    Rho_turnover_k1 = 0.01;
  Rock_turnover: Rock1a => Rock1i; rear*PKN2___ROCK*Rock1a;
  Pkn2_turnover: PKN2a => PKN2i; rear*PKN2___ROCK*PKN2a;
  DRF_turnover: DRFa => DRFi; rear*DRF_turnover_k1*DRFa;
    DRF_turnover_k1 = 0.01;
  LIMK_turnover: LIMKa => LIMKi; rear*LIMK_turnover_k1*LIMKa;
    LIMK_turnover_k1 = 0.01;
  Actin_turnover: Actinf => Actinag; rear*Actin_turn*Actinf;
  Recoil_tension: Tension_I + Recoil_Fast -> Tension_D + Recoil_Fast; rear*(Recoil_tension_k1*Tension_I*Recoil_Fast - Recoil_tension_k2*Tension_D*Recoil_Fast); Recoil_tension is "Recoil.tension";
    Recoil_tension_k1 = 0.0001; Recoil_tension_k2 = 1e-5;
  Tension_Cav1: Tension_D + Cav1i => Tension_D + Cav1a; rear*Tension_Cav1_k1*Tension_D*Cav1i; Tension_Cav1 is "Tension.Cav1";
    Tension_Cav1_k1 = 0.01;
  Actin_Actomyo_recoil: Actinf + Actomyo_High + Recoil_Slow -> Actinf + Actomyo_High + Recoil_Fast; rear*(Actin_Actomyo_recoil_k1*Actinf*Actomyo_High*Recoil_Slow - Actin_Actomyo_recoil_k2*Actinf*Actomyo_High*Recoil_Fast); Actin_Actomyo_recoil is "Actin.Actomyo.recoil";
    Actin_Actomyo_recoil_k1 = 1e-5; Actin_Actomyo_recoil_k2 = 1e-6;
  Tension_increase_0: Tension_D => Tension_I; rear*Tension_increase*Tension_D;
  Recoil_relaxation: Recoil_Fast => Recoil_Slow; rear*Recoil_relaxation_k1*Recoil_Fast;
    Recoil_relaxation_k1 = 0.01;
  Actomyo_relax: Actomyo_High => Actomyo_Low; rear*Actomyo_relax_k1*Actomyo_High;
    Actomyo_relax_k1 = 0.01;
  Polcont_relax: Polcont_High => Polcont_Low; rear*Polcont_relax_k1*Polcont_High;
    Polcont_relax_k1 = 0.001;
  pMLCa_Actomyo: pMLCa + Actomyo_Low + Actinf => pMLCa + Actomyo_High + Actinf; rear*pMLCa_Actomyo_k1*pMLCa*Actomyo_Low*Actinf; pMLCa_Actomyo is "pMLCa.Actomyo";
    pMLCa_Actomyo_k1 = 1e-5;
  Cav_turnover: Cav1a => Cav1i; rear*Cav_turnover_k1*Cav1a;
    Cav_turnover_k1 = 0.01;
  Gef_turnover: Ect2a => Ect2i; rear*Gef_turnover_k1*Ect2a;
    Gef_turnover_k1 = 0.01;
  Src_Cav1_act: Cavi_Src -> Cav1a + Srca; rear*(Src_Cav1_act_k1*Cavi_Src - Src_Cav1_act_k2*Cav1a*Srca);
    Src_Cav1_act_k1 = 1e-6; Src_Cav1_act_k2 = 1e-7;
  RhoA_GAP_binding: p190GAPa + RhoAgtp -> p190GAP_RhoA; rear*(RhoA_GAP_binding_k1*p190GAPa*RhoAgtp - RhoA_GAP_binding_k2*p190GAP_RhoA); RhoA_GAP_binding is "RhoA-GAP binding";
    RhoA_GAP_binding_k1 = 0.001; RhoA_GAP_binding_k2 = 0.0001;
  RhoA_inact: p190GAP_RhoA -> p190GAPi + RhoAgdp; rear*(RhoA_inact_k1*p190GAP_RhoA - RhoA_inact_k2*p190GAPi*RhoAgdp);
    RhoA_inact_k1 = 0.1; RhoA_inact_k2 = 0.01;
  RhoA_act: Rho_Ect2 -> RhoAgtp + Ect2i; rear*(RhoA_act_k1*Rho_Ect2 - RhoA_act_k2*RhoAgtp*Ect2i);
    RhoA_act_k1 = 0.1; RhoA_act_k2 = 0.01;
  PKN2_Actin: PKN2a + Actinag -> Pkn2_Actin; rear*(PKN2_Actin_k1*PKN2a*Actinag - PKN2_Actin_k2*Pkn2_Actin); PKN2_Actin is "PKN2-Actin";
    PKN2_Actin_k1 = 0.001; PKN2_Actin_k2 = 0.0001;
  Actinf_act_2: Pkn2_Actin -> PKN2i + Actinf; rear*(Actinf_act_2_k1*Pkn2_Actin - Actinf_act_2_k2*PKN2i*Actinf);
    Actinf_act_2_k1 = 0.001; Actinf_act_2_k2 = 0.0001;
  Cav1i_Src: Cav1i + Srca -> Cavi_Src; rear*(Cav1i_Src_k1*Cav1i*Srca - Cav1i_Src_k2*Cavi_Src); Cav1i_Src is "Cav1i-Src";
    Cav1i_Src_k1 = 1e-6; Cav1i_Src_k2 = 1e-7;
  Polstiff_contractility: Polystiff_High + Polcont_Low => Polystiff_High + Polcont_High; rear*Polstiff_contractility_k1*Polystiff_High*Polcont_Low;
    Polstiff_contractility_k1 = 0.0001;
  Polcont_tension: Polcont_High + Tension_I => Polcont_High + Tension_D; rear*Polcont_tension_k1*Polcont_High*Tension_I; Polcont_tension is "Polcont.tension";
    Polcont_tension_k1 = 1e-6;

  // Events:
  Y_compound_0: at (time > 5000): PKN2___ROCK = 0.01;
  Cyto_D_0: at (time > 5000): Actin_turn = 0.01;
  Uniform_stiffness_0: at (time > 4000): Polystiff_High = 100;
  Osmotic_shock_0: at (time > 4000): Tension_increase = 0.01;
  Reversible_0: at (time > 7000): Tension_increase = 0.01;

  // Unit definitions:
  unit length = metre;
  unit area = metre^2;
  unit volume = 1e-3 litre;
  unit time = second;
  unit substance = item;
end
