// SBML level 2 version 4
// dcterms:bibliographicCitation: urn:miriam:pubmed:30384811

function rateOf(a)
  NaN;
end

function death_of_androgen_dependent_cancer_cell_0(beta_1, k_2, A, k_3, N_1)
  beta_1*(k_2 + (1 - k_2)*A/(A + k_3))*N_1;
end
death_of_androgen_dependent_cancer_cell_0 is "death of androgen-dependent cancer cell";

function death_of_AD_by_T_cell_0(e_1, N_1, T, g_1)
  e_1*N_1*T/(g_1 + N_1);
end

function proliferation_of_androgen_dependent_cancer_cell_0(alpha_1, A, N_1, k_1)
  alpha_1*A*N_1/(A + k_1);
end
proliferation_of_androgen_dependent_cancer_cell_0 is "proliferation of androgen-dependent cancer cell";

function Clonal_expansion_of_T_cell(e_3, T, I_L, g_3)
  e_3*T*I_L/(g_3 + I_L);
end

function Activation_of_T_cell_by_dendritic_cell_0(e_2, D, g_2)
  e_2*D/(g_2 + D);
end

function proliferation_and_death_of_androgen_independent_cancer_cell_0(alpha_2, N_2)
  alpha_2*N_2;
end
proliferation_and_death_of_androgen_independent_cancer_cell_0 is "proliferation and death of androgen-independent cancer cell";

function natural_death_of_T_cell(myu, T)
  myu*T;
end

function clerance_of_I_L(omga, I_L)
  omga*I_L;
end

function death_of_AI_by_T_cell_0(e_1, N_2, T, g_1)
  e_1*N_2*T/(g_1 + N_2);
end

function homeostasis_0(gamma, a_0, A)
  gamma*(a_0 - A);
end

function mutation_from_AD_to_AI(m_1, A, a_0, N_1)
  m_1*(1 - A/a_0)*N_1;
end

function Production_of_cytokine_IL_2_by_stimulated_T_cells_0(e_4, T, N_1, N_2, g_4)
  e_4*T*(N_1 + N_2)/(g_4 + N_1 + N_2);
end
Production_of_cytokine_IL_2_by_stimulated_T_cells_0 is "Production of cytokine IL-2 by stimulated T cells";

function deprivation_therapy_0(gamma, a_0, chi)
  gamma*a_0*chi;
end

function natural_death_of_dendritic_cell_0(c, D)
  c*D;
end

model New_Model()
  // Nave2018 - prostate cancer model
  // This model is based on paper: Combination of singularly perturbed vector field method and method of directly defining the inverse mapping applied to complex ODE system prostate cancer model Author: Ophir Nave, Miriam Elbaz Abstract: We propose a new method to solve a system of complex ordinary differential equations (ODEs) with hidden hierarchy. Given a complex system of the ODE, the hierarchy of the system is generally hidden. Once we reveal the hierarchy of the system, the system can be reduced into subsystems called slow and fast subsystems. This division of slow and fast subsystems reduces the analysis and hence reduces the computation time, which can be expensive. In our new method, we first apply the singularly perturbed vector field method that is the global quasi-linearization method. This method exposes the hierarchy of a given complex system. Subsequently, we apply a version of the homotopy analysis method called the method of directly defining the inverse mapping. We applied our new method to the immunotherapy of advanced prostate cancer.
  // isDescribedBy pubmed:30384811
  // hasProperty ncit:C7378
  // hasProperty mamo:MAMO_0000046
  // hasProperty efo:0000311
  // hasProperty ncit:C15262
  // isDescribedBy pubmed:30384811

  // Compartments:
  compartment compartment = 1;

  // Species:
  species N_1 in compartment = 14;
  species T in compartment = 0;
  species A in compartment = 30;
  species N_2 in compartment = 18;
  species D in compartment = 2;
  species I_L in compartment = 0;
  species $N in compartment;

  // Parameters:
  alpha_1 = 0.25;
  alpha_2 = 0.006;
  beta_1 = 0.008;
  k_1 = 2;
  k_2 = 8;
  k_3 = 0.5;
  a_0 = 30;
  e_1 = 20000000;
  e_2 = 20000000;
  e_3 = 0.1245;
  e_4 = 5e-6;
  g_1 = 1e10;
  g_2 = 400000000;
  g_3 = 1000;
  g_4 = 1e10;
  c_1 = 1e-9;
  c_2 = 1e-9;
  gamma = 0.08;
  omega = 10;
  myu = 0.03;
  c = 0.14;
  m_1 = 5e-5;
  chi = 0;
  L_1 = 15;
  L_0 = 14.43;

  // Assignment rules:
  N := c_1*N_1 + N_2*c_2;

  // Reactions:
  proliferation_of_androgen_dependent_cancer_cell: => N_1; compartment*proliferation_of_androgen_dependent_cancer_cell_0(alpha_1, A, N_1, k_1); proliferation_of_androgen_dependent_cancer_cell is "proliferation of androgen-dependent cancer cell";  // modifiers: A
  death_of_androgen_dependent_cancer_cell: N_1 => ; compartment*death_of_androgen_dependent_cancer_cell_0(beta_1, k_2, A, k_3, N_1); death_of_androgen_dependent_cancer_cell is "death of androgen-dependent cancer cell";  // modifiers: A
  mutation_to_androgen_independent_cancer_cell: N_1 => N_2; compartment*mutation_from_AD_to_AI(m_1, A, a_0, N_1); mutation_to_androgen_independent_cancer_cell is "mutation to androgen-independent cancer cell";  // modifiers: A
  death_of_AD_by_T_cell: N_1 => ; compartment*death_of_AD_by_T_cell_0(e_1, N_1, T, g_1);  // modifiers: T
  proliferation_and_death_of_androgen_independent_cancer_cell: => N_2; compartment*proliferation_and_death_of_androgen_independent_cancer_cell_0(alpha_2, N_2); proliferation_and_death_of_androgen_independent_cancer_cell is "proliferation and death of androgen-independent cancer cell";
  death_of_AI_by_T_cell: N_2 => ; compartment*death_of_AI_by_T_cell_0(e_1, N_2, T, g_1);  // modifiers: T
  Activation_of_T_cell_by_dendritic_cell: => T; compartment*Activation_of_T_cell_by_dendritic_cell_0(e_2, D, g_2);  // modifiers: D
  Natural_death_of_T_cell: T => ; compartment*natural_death_of_T_cell(myu, T);
  clonal_expansion_of_T_cell: => T; compartment*Clonal_expansion_of_T_cell(e_3, T, I_L, g_3);  // modifiers: I_L
  Production_of_cytokine_IL_2_by_stimulated_T_cells: => I_L; compartment*Production_of_cytokine_IL_2_by_stimulated_T_cells_0(e_4, T, N_1, N_2, g_4); Production_of_cytokine_IL_2_by_stimulated_T_cells is "Production of cytokine IL-2 by stimulated T cells";  // modifiers: T, N_1, N_2
  Clearance_of_I_L: I_L => ; compartment*clerance_of_I_L(omega, I_L);
  homeostasis: => A; compartment*homeostasis_0(gamma, a_0, A);
  deprivation_therapy: A => ; compartment*deprivation_therapy_0(gamma, a_0, chi);
  natural_death_of_dendritic_cell: D => ; compartment*natural_death_of_dendritic_cell_0(c, D);

  // Events:
  control_of_chi_rise: at (((N > L_1) && (rateOf(N_1)*c_1 + rateOf(N_2)*c_2 > 0)) && (chi == 0)): chi = chi + 1;
  control_of_chi_drop: at (((N < L_0) && (c_1*rateOf(N_1) + c_2*rateOf(N_2) < 0)) && (chi == 1)): chi = chi - 1;

  // Unit definitions:
  unit volume = 1e-3 litre;
  unit substance = 1e-3 mole;
end
