// SBML level 2 version 4
// dcterms:bibliographicCitation: urn:miriam:pubmed:15094015
// dcterms:bibliographicCitation: urn:miriam:pubmed:25475114

function Constant_flux__irreversible(v)
  v;
end
Constant_flux__irreversible is "Constant flux (irreversible)";

function function_for_substrateless_production(k, X1)
  k*X1;
end

function function_for_R3(K3, X1, Substrate)
  K3*X1*Substrate;
end

function function_for_R26(k, X1, X2, S1)
  k*X1*X2*S1;
end

function function_for_transport(k, kv, S)
  k*kv*S;
end

function function_for_indirect_transport(x, kv, S)
  x*kv*S;
end

function function_for_indirect_production(x, S)
  x*S;
end

model Tiwari2019___Mathematical_model_of_NFKB_regulatory_module_with_ROS()
  // Tiwari2019 - Mathematical model of NFKB regulatory module with TNF and ROS
  // It is a dynamic model containing elements of two different model as one. It contains the impact of TNF on SOD and impact of ROS on A20 behavior.
  // isDescribedBy pubmed:15094015
  // isDescribedBy pubmed:25475114
  // isDerivedFrom pubmed:15094015 pubmed:25475114
  // isPartOf reactome:R-HSA-5676594
  // occursIn ncit:C132890
  // hasTaxon taxonomy:10090

  // Compartments:
  compartment Cytosol = 1;  // GO:0005737
  compartment Nucleus = 1;  // GO:0005634

  // Species:
  species IKK_neutral in Cytosol = 0;  // isHomologTo uniprot:Q60680
  species IKK_active in Cytosol = 0;  // isHomologTo uniprot:Q60680
  species IKK_inact in Cytosol = 0;  // isHomologTo uniprot:Q60680
  species IKKactive_IkB in Cytosol = 0;  // hasPart uniprot:Q9Z1E3; hasPart uniprot:Q60680
  species IkB in Cytosol = 0;  // uniprot:Q9Z1E3
  species IKKactive_IkB_NFKB in Cytosol = 0;  // hasPart uniprot:P25799; hasPart uniprot:Q60680; hasPart uniprot:Q9Z1E3
  species IkB_NFKB in Cytosol = 0.06;  // hasPart uniprot:Q9Z1E3; hasPart uniprot:P25799
  species NFKB in Cytosol = 0;  // isHomologTo uniprot:P25799
  species NFKB_nuc in Nucleus = 0;  // isHomologTo uniprot:P25799
  species IkB_nuc in Nucleus = 0;  // isVersionOf uniprot:Q9Z1E3
  species IkB_NFKB_nuc in Nucleus = 0;  // hasPart uniprot:P25799; hasPart uniprot:Q9Z1E3
  species IkB_mRNA in Nucleus = 0;  // encodes unipathway.reaction:Q9Z1E3
  species A20_mRNA in Nucleus = 0;  // encodes uniprot:Q60769
  species A20 in Cytosol = 0;  // uniprot:Q60769
  // if({Time} > 3600,1,0)
  species $TNF in Cytosol;  // uniprot:P06804
  // it's an arbitarory proetin used to model nfkb induced transcription
  species cgen_mRNA in Nucleus = 0;
  species ROS in Cytosol = 2;
  species SOD in Cytosol = 0;

  // Parameters:
  Kv = 5;
  a1 = 0.5;
  a2 = 0.2;
  t1 = 0.1;
  a3 = 1;
  t2 = 0.1;
  c1a = 5e-7;
  c2a = 0;
  c3a = 0.0004;
  c4a = 0.5;
  c5a = 0.0001;
  c6a = 2e-5;
  c1 = 5e-7;
  c2 = 0;
  c3 = 0.0004;
  c4 = 0.5;
  c5 = 0.0003;
  k1 = 0.0025;
  k2 = 0.1;
  k3 = 0.0015;
  Kprod = 2.5e-5;
  Kdeg = 0.000125;
  i1 = 0.0025;
  e2a = 0.01;
  i1a = 0.001;
  e1a = 0.0005;
  c1c = 5e-7;
  c2c = 0;
  c3c = 0.0004;
  TNF_R = 0;
  Initial_for_Kv = Kv;

  // Assignment rules:
  TNF := TNF_R;
  NFKB_total := IKKactive_IkB_NFKB + NFKB + IkB_NFKB + 1/Initial_for_Kv*NFKB_nuc + 1/Initial_for_Kv*IkB_NFKB_nuc;
  IkB_mRNA_amp := IkB_mRNA*10000;
  A20_mRNA_amp := A20_mRNA*10000;
  cgen_mRNA_amp := cgen_mRNA*10000;

  // Reactions:
  IKKn_production: => IKK_neutral; Cytosol*Constant_flux__irreversible(Kprod);
  IKKn_degradation: IKK_neutral => ; Cytosol*Kdeg*IKK_neutral;  // hasProperty GO:0030163
  IKKn_activation: IKK_neutral => IKK_active; Cytosol*function_for_R3(k1, TNF, IKK_neutral);  // modifiers: TNF; hasProperty ncit:C64382
  NFKB_export: NFKB => ; Cytosol*i1*NFKB;  // hasProperty GO:0006606
  IkBn_NFKBn_binding: NFKB_nuc + IkB_nuc => IkB_NFKB_nuc; Nucleus*a1*NFKB_nuc*IkB_nuc;  // hasProperty GO:0005515
  IkB_NFKB_n_export: IkB_NFKB_nuc => ; Nucleus*function_for_transport(e2a, Kv, IkB_NFKB_nuc);  // hasProperty GO:0006611
  IkB_NFKB_binding: NFKB + IkB => IkB_NFKB; Cytosol*a1*NFKB*IkB;  // hasProperty GO:0005515
  IkB_degradation: IkB_NFKB => NFKB; Cytosol*c6a*IkB_NFKB;  // hasProperty GO:0030163
  IkBnuc_export: IkB_nuc => ; Nucleus*function_for_transport(e1a, Kv, IkB_nuc);  // hasProperty GO:0006611
  IkB_export: IkB => ; Cytosol*i1a*IkB;  // hasProperty GO:0006606
  IkB_transcription: => IkB_mRNA; Nucleus*function_for_substrateless_production(c1a, NFKB_nuc);  // modifiers: NFKB_nuc; GO:0006351
  IKKa_spon_inactivation: IKK_active => IKK_inact; Cytosol*k3*IKK_active;  // isInstanceOf GO:0043687
  IKKinact_degradation: IKK_inact => ; Cytosol*Kdeg*IKK_inact;  // hasProperty GO:0030163
  IKKa_degradation: IKK_active => ; Cytosol*Kdeg*IKK_active;  // hasProperty GO:0030163
  IKKa_IkB_binding: IKK_active + IkB => IKKactive_IkB; Cytosol*a2*IKK_active*IkB;  // hasPart GO:0005515
  IKKa_IkBNFKB_binding: IKK_active + IkB_NFKB => IKKactive_IkB_NFKB; Cytosol*a3*IKK_active*IkB_NFKB;  // hasProperty GO:0005515
  IkBmRNA_degradation: IkB_mRNA => ; Nucleus*c3a*IkB_mRNA;  // hasProperty GO:0006402
  IkB_translation: => IkB; function_for_substrateless_production(c4a, IkB_mRNA);  // modifiers: IkB_mRNA; GO:0006412
  IkB_con_degradation: IkB => ; Cytosol*c5a*IkB;  // hasProperty GO:0030163
  A20_transcription: => A20_mRNA; Nucleus*function_for_substrateless_production(c1, NFKB_nuc);  // modifiers: NFKB_nuc; GO:0006351
  A20mRNA_degradation: A20_mRNA => ; Nucleus*c3*A20_mRNA;  // hasPart GO:0006402
  A20_translation: => A20; function_for_substrateless_production(c4, A20_mRNA);  // modifiers: A20_mRNA; GO:0006412
  A20_degradation: A20 => ; Cytosol*c5*A20;  // hasProperty GO:0030163
  IKKa_inactivation_1: IKK_active => IKK_inact; Cytosol*function_for_R26(k2, TNF, A20, IKK_active);  // modifiers: TNF, A20; isInstanceOf GO:0043687
  cgen_transcription: => cgen_mRNA; Nucleus*function_for_substrateless_production(c1c, NFKB_nuc);  // modifiers: NFKB_nuc; GO:0006351
  cgen_mRNA_degradation: cgen_mRNA => ; Nucleus*c3c*cgen_mRNA;  // hasProperty GO:0006402
  IkB_degradation_1: IKKactive_IkB_NFKB => IKK_active + NFKB; Cytosol*t2*IKKactive_IkB_NFKB;  // hasPart GO:0030163
  IkB_degradation_2: IKKactive_IkB => IKK_active; Cytosol*t1*IKKactive_IkB;  // hasProperty GO:0030163
  NFKBc_induced_NFKBn_production: => NFKB_nuc; function_for_indirect_transport(i1, Kv, NFKB);  // modifiers: NFKB; hasProperty ncit:C18103
  IkBn_induced_IkBc_production: => IkB; function_for_indirect_production(e1a, IkB_nuc);  // modifiers: IkB_nuc; hasPart ncit:C18103
  IkBc_induced_IkBn_production: => IkB_nuc; function_for_indirect_transport(i1a, Kv, IkB);  // modifiers: IkB; hasProperty ncit:C18103
  IkB_NFKB_n_induced_IkB_NFKBc_production: => IkB_NFKB; function_for_indirect_production(e2a, IkB_NFKB_nuc);  // modifiers: IkB_NFKB_nuc; hasProperty ncit:C18103
  IkB_degradation_ROS: IkB_NFKB => NFKB; Cytosol*function_for_R3(K3, ROS, IkB_NFKB);  // modifiers: ROS
    K3 = 1e-6;
  SOD_synthesis: => SOD; function_for_substrateless_production(k, NFKB_nuc);  // modifiers: NFKB_nuc
    k = 0.002;
  SOD_Degradation: SOD => ; Cytosol*SOD_Degradation_k1*SOD;
    SOD_Degradation_k1 = 0.001;

  // Events:
  TNF_stimulation: at (time > 363600): TNF_R = 1;

  // Unit definitions:
  unit substance = 1e-6 mole;
end
