// SBML level 2 version 4
// dcterms:bibliographicCitation: urn:miriam:pubmed:9652094

model Novak1998___Mathematical_model_of_fission_yeast_cell_cycle()
  // Novak1998 - Mathematical model of fission yeast cell cycle
  // Mathematical model of the fission yeast cell cycle with checkpoint
  // controls at the G1/S, G2/M and metaphase/anaphase transitions. Model encoded by Matthieu Maire and submitted to BioModels by Krishna kumar Tiwari.
  // isDescribedBy pubmed:9652094
  // hasProperty mamo:MAMO_0000046

  // Parameters:
  kx = 0 unit_0;
  k2c has unit_0;
  kw = 0.5 unit_0;
  ks has unit_0;
  k25r has unit_0;
  AAE = 0 unit_1;
  kwr_ = 0.2 unit_0;
  km = 0.1 unit_0;
  Cdc13_Cdc2 = 0.58888888 unit_1;
  ki = 200 unit_0;
  Puc1 = 0.013 unit_1;
  Mik1 = 0 unit_1;
  Japr = 0.01 unit_1;
  V2c_ = 0.16 unit_0;
  kwee has unit_0;
  kcdc25 has unit_0;
  J25r = 0.2 unit_1;
  kai_ = 0.25 unit_0;
  Vmik = 0.002 unit_0;
  MPF has unit_1;
  k25 = 0.5 unit_0;
  J25 = 0.2 unit_1;
  kas = 0.25 unit_0;
  kap = 4 unit_0;
  kai has unit_0;
  Jap = 0.01 unit_1;
  kmr has unit_0;
  k4 has unit_0;
  Jw = 0.2 unit_1;
  k3 = 0.15 unit_0;
  kad = 0.1 unit_0;
  k2 has unit_0;
  k1 = 0.03 unit_0;
  kmr_ = 0 unit_0;
  Jai = 0.1 unit_1;
  kaa = 0.001 unit_0;
  Jmr = 0.2 unit_1;
  Jm = 0.2 unit_1;
  Jaa = 0.1 unit_1;
  AAE_total = 1.2 unit_1;
  Wee1 = 0 unit_1;
  k25r_ = 0.2 unit_0;
  Vmik_ = 0.2 unit_0;
  kaa_ = 1 unit_0;
  Rum1 = 0 unit_1;
  mass = 1 unit_1;
  Cdc13_P_Cdc2 = 0.1111111 unit_1;
  V25_ = 0.4 unit_0;
  Vwee = 0.01 unit_0;
  Rum1_Cdc13_Cdc2 = 0 unit_1;
  APC = 0 unit_1;
  alpha = 0.1 unit_1;
  V2c = 0.03 unit_0;
  Cdc25P = 0 unit_1;
  V2_ = 1 unit_0;
  mu = 0.005776 unit_0;
  kwr has unit_0;
  Jwr = 0.2 unit_1;
  V2 = 0.03 unit_0;
  k4_v2 = 20 unit_0;
  k4_v1 = 0.15 unit_0;
  Vwee_ = 0.93 unit_0;
  kapr_ = 3 unit_0;
  V25 = 0.01 unit_0;
  kapr = 0.04 unit_0;
  kir = 1 unit_0;

  // Assignment rules:
  k2c := V2c*(1 - APC) + V2c_*APC;
  ks := piecewise(0.5, (APC == 0.2) || (APC < 0.2), 0);
  k25r := k25r_ + ks;
  kwee := Vwee*((1 - Wee1)*1 + Vwee_*Wee1 + Vmik*(1 - Mik1))*1 + Vmik_*Mik1;
  kcdc25 := V25*(1 - Cdc25P) + V25_*Cdc25P;
  MPF := Cdc13_Cdc2 + alpha*Cdc13_P_Cdc2;
  kai := kai_ + kx;
  kmr := kmr_ + ks;
  k4 := k4_v1 + k4_v2*(Puc1*mass + MPF);
  k2 := V2*(1 - APC) + V2_*APC;
  kwr := kwr_ + ks;
  Rum1_total := Rum1 + Rum1_Cdc13_Cdc2;
  Cdc13_total := Cdc13_Cdc2 + Cdc13_P_Cdc2 + Rum1_Cdc13_Cdc2;

  // Rate rules:
  AAE' = (kaa + kaa_*MPF)*(AAE_total - AAE)/(Jaa + AAE_total - AAE) - (kai*AAE/(Jai + AAE) + kad*AAE);
  Cdc13_Cdc2' = k1*mass + kcdc25*Cdc13_P_Cdc2 + Rum1_Cdc13_Cdc2*(kir + k4) - (kwee*Cdc13_Cdc2 + ki*Cdc13_Cdc2*Rum1 + k2*Cdc13_Cdc2);
  Mik1' = kmr*(1 - Mik1)/(Jmr + 1 - Mik1) - km*Mik1/(Jm + Mik1);
  AAE_total' = kas*MPF - kad*AAE_total;
  Wee1' = kwr*(1 - Wee1)/(Jwr + 1 - Wee1) - kw*MPF*Wee1/(Jw + Wee1);
  Rum1' = k3 + Rum1_Cdc13_Cdc2*(kir + k2c) - (k4*Rum1 + ki*Cdc13_Cdc2*Rum1);
  mass' = mu*mass;
  Cdc13_P_Cdc2' = kwee*Cdc13_Cdc2 - (kcdc25*Cdc13_P_Cdc2 + k2*Cdc13_P_Cdc2);
  Rum1_Cdc13_Cdc2' = ki*Rum1*Cdc13_Cdc2 - Rum1_Cdc13_Cdc2*(k4 + k2c + kir);
  APC' = (kapr + kapr_*AAE)*(1 - APC)/(Japr + 1 - APC) - kap*(Puc1*mass + MPF)*APC/(Jap + APC);
  Cdc25P' = k25*MPF*(1 - Cdc25P)/(J25 + 1 - Cdc25P) - k25r*Cdc25P/(J25r + Cdc25P);

  // Events:
  cell_division: at (mass >= 1): mass = 0.5;
  kx_to_3: at (time >= 120): kx = 3;
  kx_to_2: at (time >= 138): kx = 2;
  kx_to_1: at (time >= 141): kx = 1;
  kx_to_0: at (time >= 144): kx = 0;

  // Unit definitions:
  unit unit_0 = 1 / second; unit_0 is "1/s";
  unit unit_1 = dimensionless^0;
end
