// SBML level 2 version 4
// dcterms:bibliographicCitation: urn:miriam:pubmed:10098216

function Rate_Law_for_reaction_for_CDK_production(k1, size, k_prime_6, k_double_prime_6, CDK, TRI)
  k1*size + (k_prime_6 + k_double_prime_6*CDK)*TRI;
end

function Rate_Law_for_reaction_for_CDK_consumbtion(k2_single_prime, APC, k2_double_prime, CDK, l1, CKI, l2, TRI)
  (k2_single_prime*(1 - APC) + k2_double_prime)*CDK + l1*CDK*CKI - l2*TRI;
end

function Rate_Law_for_reaction_for_APC_production(k_prime_3, k_duoble_prime_3, ACT, APC, j3)
  (k_prime_3 + k_duoble_prime_3*ACT)*(1 - APC)/(j3 + 1 - APC);
end

function Rate_Law_for_reaction_for_TRI_consumbtion(v_prime_2, APC, v_double_prime_2, TRI, k_prime_6, k_double_prime_6, CDK)
  (v_prime_2*(1 - APC) + v_double_prime_2*APC)*TRI + (k_prime_6 + k_double_prime_6*CDK)*TRI;
end

function Rate_Law_for_reaction_for_ACT_production(kaa, ACTt, ACT, kai)
  kaa*(ACTt - ACT) - kai*ACT;
end

function Rate_Law_for_reaction_for_size(muo, size)
  muo*size;
end

function Rate_Law_for_reaction_for_ACT_consumbtion(k_prime_ad, APC, k_double_prime_ad, ACT)
  k_prime_ad*(1 - APC + k_double_prime_ad*APC)*ACT;
end

function Rate_Law_for_reaction_for_APC_consumbtion(k_prime_4, k_double_prime, CDK, APC, j4)
  (k_prime_4 + k_double_prime*CDK)*APC/(j4 + APC);
end

function Rate_Law_for_reaction_for_ACTt_production(kas)
  kas;
end

function Rate_Law_for_reaction_for_ACTt_consumbtion(k_prime_ad, APC, k_double_prime_ad, ACTt)
  (k_prime_ad*(1 - APC) + k_double_prime_ad*APC)*ACTt;
end

function Rate_Law_for_reaction_for_CKI_production(k5, v2, APC, v_double_prime_2, TRI)
  k5 + (v2*(1 - APC) + v_double_prime_2*APC)*TRI;
end

function Rate_Law_for_reaction_for_CKI_consumbtion(k_prime_6, k_double_prime_6, CDK, CKI, i1, i2, TRI)
  (k_prime_6 + k_double_prime_6*CDK)*CKI + i1*CDK*CKI - i2*TRI;
end

function Rate_Law_for_reaction_for_TRI_production(l1, CDK, CKI, i2, TRI)
  l1*CDK*CKI - i2*TRI;
end

model Novak1998_Model_scenarios_for_evolution_of_the_eukaryotic_cell_cycle()
  // Novak1998-Model scenarios for evolution of the eukaryotic cell cycle.
  // Progress through the division cycle of present day eukaryotic cells is controlled by a complex network consisting of (i) cyclin-dependent kinases (CDKs) and their associated cyclins, (ii) kinases and phosphatases that regulate CDK activity, and (iii) stoichiometric inhibitors that sequester cyclin-CDK dimers. Presumably regulation of cell division in the earliest ancestors of eukaryotes was a considerably simpler affair. Nasmyth (1995) recently proposed a mechanism for control of a putative, primordial, eukaryotic cell cycle, based on antagonistic interactions between a cyclin-CDK and the anaphase promoting complex (APC) that labels the cyclin subunit for proteolysis. We recast this idea in mathematical form and show that the model exhibits hysteretic behaviour between alternative steady states: a Gl-like state (APC on, CDK activity low, DNA unreplicated and replication complexes assembled) and an S/M-like state (APC off, CDK activity high, DNA replicated and replication complexes disassembled). In our model, the transition from G1 to S/M ('Start') is driven by cell growth, and the reverse transition ('Finish') is driven by completion of DNA synthesis and proper alignment of chromosomes on the metaphase plate. This simple and effective mechanism for coupling growth and division and for accurately copying and partitioning a genome consisting of numerous chromosomes, each with multiple origins of replication, could represent the core of the eukaryotic cell cycle. Furthermore, we show how other controls could be added to this core and speculate on the reasons why stoichiometric inhibitors and CDK inhibitory phosphorylation might have been appended to the primitive alternation between cyclin accumulation and degradation.
  // hasTaxon ncit:C12596
  // isDescribedBy pubmed:10098216
  // hasProperty GO:0007049 ncit:C17767 mamo:MAMO_0000046

  // Compartments:
  compartment compartment = 1;

  // Species:
  species CDK in compartment = 0.5;
  species APC in compartment = 0.5;
  species size in compartment = 1;
  species ACTt in compartment = 1;
  species ACT in compartment = 1;
  species CKI in compartment = 1;
  species TRI in compartment = 1;

  // Parameters:
  k1 = 0.05;
  k_prime_2 = 0.05;
  k_double_prime_2 = 1;
  k_prime_3 = 0.001;
  k_double_prime_3 = 3;
  k_prime_4 = 0;
  k_double_prime_4 = 2;
  kas = 0.05;
  k_prime_ad = 0.005;
  k_double_prime_ad = 1;
  kaa = 1;
  j3 = 0.05;
  j4 = 0.05;
  kai = 0.5;
  muo = 0.0058;
  k5 = 0.15;
  k_prime_6 = 0.15;
  k_double_prime_6 = 9;
  l1 = 200;
  l2 = 1;
  v_prime_2 = 0.05;
  v_double_prime_2 = 0.15;

  // Reactions:
  reaction_for_CDK_production: => CDK; compartment*Rate_Law_for_reaction_for_CDK_production(k1, size, k_prime_6, k_double_prime_6, CDK, TRI);  // modifiers: size, TRI
  reaction_for_CDK_consumbtion: CDK => ; compartment*Rate_Law_for_reaction_for_CDK_consumbtion(k_prime_2, APC, k_double_prime_2, CDK, l1, CKI, l2, TRI);  // modifiers: APC, CKI, TRI
  reaction_for_APC_production: => APC; compartment*Rate_Law_for_reaction_for_APC_production(k_prime_3, k_double_prime_3, ACT, APC, j3);  // modifiers: ACT
  reaction_for_APC_consumbtion: APC => ; compartment*Rate_Law_for_reaction_for_APC_consumbtion(k_prime_4, k_double_prime_4, CDK, APC, j4);  // modifiers: CDK
  reaction_for_size: => size; compartment*Rate_Law_for_reaction_for_size(muo, size);
  reaction_for_ACTt_production: => ACTt; compartment*Rate_Law_for_reaction_for_ACTt_production(kas);
  reaction_for_ACTt_consumbtion: ACTt => ; compartment*Rate_Law_for_reaction_for_ACTt_consumbtion(k_prime_ad, APC, k_double_prime_ad, ACTt);  // modifiers: APC
  reaction_for_ACT_production: => ACT; compartment*Rate_Law_for_reaction_for_ACT_production(kaa, ACTt, ACT, kai);  // modifiers: ACTt
  reaction_for_ACT_consumbtion: ACT => ; compartment*Rate_Law_for_reaction_for_ACT_consumbtion(k_prime_ad, APC, k_double_prime_ad, ACT);  // modifiers: APC
  reaction_for_CKI_production: => CKI; compartment*Rate_Law_for_reaction_for_CKI_production(k5, v_prime_2, APC, v_double_prime_2, TRI);  // modifiers: APC, TRI
  reaction_for_CKI_consumbtion: CKI => ; compartment*Rate_Law_for_reaction_for_CKI_consumbtion(k_prime_6, k_double_prime_6, CDK, CKI, l1, l2, TRI);  // modifiers: CDK, TRI
  reaction_for_TRI_production: => TRI; compartment*Rate_Law_for_reaction_for_TRI_production(l1, CDK, CKI, l2, TRI);  // modifiers: CDK, CKI
  reaction_for_TRI_consumbtion: TRI => ; compartment*Rate_Law_for_reaction_for_TRI_consumbtion(v_prime_2, APC, k_double_prime_6, TRI, k_prime_6, k_double_prime_6, CDK);  // modifiers: APC, CDK

  // Events:
  event_for_size: at (size == 2): size = 1;

  // Unit definitions:
  unit volume = 1e-3 litre;
  unit substance = 1e-3 mole;
end
