// SBML level 2 version 4
// dcterms:bibliographicCitation: urn:miriam:pubmed:15363676

function Rate_Law_for_reaction_for__cycA_Kip1__production(k25, CycA, Kip1)
  k25*CycA*Kip1;
end
Rate_Law_for_reaction_for__cycA_Kip1__production is "Rate Law for reaction for "cycA:Kip1" production";

function Rate_Law_for_reaction_cdc20_decay(k14, cdc20, J4, k12)
  k14*(cdc20/(J4 + cdc20)) + k12*cdc20;
end

function Rate_Law_for_reaction_for__cycA_Kip1__decay(k25r, _CycA_Kip1, V6, k30, Cdc20)
  k25r*_CycA_Kip1 + V6*_CycA_Kip1 + k30*Cdc20*_CycA_Kip1;
end
Rate_Law_for_reaction_for__cycA_Kip1__decay is "Rate Law for reaction for "cycA:Kip1" decay";

function Rate_Law_for_reaction_for__cycD_Kip1__decay(k24r, _CycD_Kip1, V6, k10)
  k24r*_CycD_Kip1 + V6*_CycD_Kip1 + k10*_CycD_Kip1;
end
Rate_Law_for_reaction_for__cycD_Kip1__decay is "Rate Law for reaction for "cycD:Kip1" decay";

function Rate_Law_for_reaction_for__cycD_Kip1__production(k24, CycD, Kip1)
  k24*CycD*Kip1;
end
Rate_Law_for_reaction_for__cycD_Kip1__production is "Rate Law for reaction for "cycD:Kip1" production";

function Rate_Law_for_reaction_for__cycE_Kip1__production(k25, CycE, Kip1)
  k25*CycE*Kip1;
end
Rate_Law_for_reaction_for__cycE_Kip1__production is "Rate Law for reaction for "cycE:Kip1" production";

function Rate_Law_for_reaction_for_cdc20T_decay(k12, Cdc20T)
  k12*Cdc20T;
end

function Rate_Law_for_reaction_for_cdc20T_production(epsilon, k_prime_11, k11, cycB)
  epsilon*(k_prime_11 + k11*cycB);
end

function Rate_Law_for_reaction_for_Cdh1_decay(V4, cdh1, j4)
  V4*(cdh1/(j4 + cdh1));
end

function Rate_Law_for_reaction_for_Cdh1_production(k3, cdh1, j3, k_prime_3, cdc20)
  (k_prime_3 + k3*cdc20)*((1 - cdh1)/(j3 + 1 - cdh1));
end

function Rate_Law_for_reaction_for_cdc20_production(k13, IEP, cdc20T, cdc20, j13)
  k13*IEP*((cdc20T - cdc20)/(j13 + cdc20T - cdc20));
end

function Rate_Law_for_reaction_for_cycA_decay(k30, Cdc20, CycA, k25, Kip1)
  k30*Cdc20*CycA + k25*CycA*Kip1;
end

function Rate_Law_for_reaction_for__cycE_Kip1__decay(k25r, _CycE_Kip1, V6, V8)
  k25r*_CycE_Kip1 + V6*_CycE_Kip1 + V8*_CycE_Kip1;
end
Rate_Law_for_reaction_for__cycE_Kip1__decay is "Rate Law for reaction for "cycE:Kip1" decay";

function Rate_Law_for_reaction_for_cycB_decay(V2, cycB)
  V2*cycB;
end

function Rate_Law_for_reaction_for_cycB_production(epsilon, k_prime_1, k1, cycB, j1)
  epsilon*(k_prime_1 + k1*(cycB/j1)^2/(1 + (cycB/j1)^2));
end

function Rate_Law_for_reaction_for_cycD_decay(k24, CycD, Kip1, k10)
  k24*CycD*Kip1 + k10*CycD;
end

function Rate_Law_for_reaction_for_cycA_production(epsilon, k29, E2FA, mass, k25r, _CycA_Kip1, V6)
  epsilon*k29*E2FA*mass + k25r*_CycA_Kip1 + V6*_CycA_Kip1;
end

function Rate_Law_for_reaction_for_Kip1_decay(V6, Kip1, k24, CycD, k25, CycE, CycA)
  V6*Kip1 + k24*CycD*Kip1 + k25*Kip1*(CycE + CycA);
end

function Rate_Law_for_reaction_for_PPX_production(epsilon, k33)
  epsilon*k33;
end

function Rate_Law_for_reaction_for_ERG_production(epsilon, k15, DRG, j15)
  epsilon*(k15/(1 + (DRG/j15)^2));
end

function Rate_Law_for_reaction_for_cycE_decay(V8, CycE, k25, Kip1)
  V8*CycE + k25*CycE*Kip1;
end

function Rate_Law_for_reaction_for_IEP_production(k31, CycB, IEP, j31)
  k31*CycB*((1 - IEP)/(j31 + 1 - IEP));
end

function Rate_Law_for_reaction_for_E2F_decay(k_prime_23, k23, CycA, CycB, E2F)
  (k_prime_23 + k23*(CycA + CycB))*E2F;
end

function Rate_Law_for_reaction_for_E2F_production(k22, E2FT, E2F)
  k22*(E2FT - E2F);
end

function Rate_Law_for_reaction_for_ERG_decay(k16, ERG)
  k16*ERG;
end

function Rate_Law_for_reaction_for_GM_production(k25, mass, _H_Rb_hypo_RbT_)
  k25*mass*_H_Rb_hypo_RbT_;
end

function Rate_Law_for_reaction_reaction_for_IEP_decay(k32, PPX, IEP, j32)
  k32*PPX*(IEP/(j32 + IEP));
end

function Rate_Law_for_reaction_for_cycE_production(epsilon, k_prime_2, k2, E2FA, k25r, _CycE_Kip1, V6)
  epsilon*(k_prime_2 + k2*E2FA) + k25r*_CycE_Kip1 + V6*_CycE_Kip1;
end

function Rate_Law_for_reaction_for_mass(epsilon, muo, GM)
  epsilon*muo*GM;
end

function Rate_Law_for_reaction_for_DRG_production(epsilon, k_prime_17, ERG, k17, DRG, j17)
  epsilon*(k_prime_17*ERG + k17*(DRG/j17)^2/(1 + (DRG/j17)^2));
end

function Rate_Law_for_reaction_for_Kip1_production(epsilon, k5, k24r, _CycD_Kip1, k10)
  epsilon*k5 + k24r*_CycD_Kip1 + k10*_CycD_Kip1;
end

function Rate_Law_for_reaction_for_PPX_decay(k34, PPX)
  k34*PPX;
end

function Rate_Law_for_reaction_for_DRG_decay(k18, DRG)
  k18*DRG;
end

function Rate_Law_for_reaction_GM_decay(k28, GM)
  k28*GM;
end

function Rate_Law_for_reaction_for_cycD_production(epsilon, k9, DRG, V6, _CycD_Kip1, k24r)
  epsilon*k9*DRG + V6*_CycD_Kip1 + k24r*_CycD_Kip1;
end

model Nov_k2004_A_Model_for_Restriction_Point_Control_of_the_Mammalian_Cell_Cycle()
  // Novak2004 - A Model for Restriction Point Control of the Mammalian Cell Cycle
  // Inhibition of protein synthesis by cycloheximide blocks subsequent division of a mammalian cell, but only if the cell is exposed to the drug before the "restriction point" (i.e. within the first several hours after birth). If exposed to cycloheximide after the restriction point, a cell proceeds with DNA synthesis, mitosis and cell division and halts in the next cell cycle. If cycloheximide is later removed from the culture medium, treated cells will return to the division cycle, showing a complex pattern of division times post-treatment, as first measured by Zetterberg and colleagues. We simulate these physiological responses of mammalian cells to transient inhibition of growth, using a set of nonlinear differential equations based on a realistic model of the molecular events underlying progression through the cell cycle. The model relies on our earlier work on the regulation of cyclin-dependent protein kinases during the cell division cycle of yeast. The yeast model is supplemented with equations describing the effects of retinoblastoma protein on cell growth and the synthesis of cyclins A and E, and with a primitive representation of the signaling pathway that controls synthesis of cyclin D.
  // isDescribedBy pubmed:15363676
  // biomodels.db:MODEL2006080001
  // hasTaxon bao:0000362
  // hasProperty GO:0007049 GO:0070848 ncit:C17767 mamo:MAMO_0000046

  // Compartments:
  compartment compartment = 1;

  // Species:
  species ERG in compartment = 0;
  species DRG in compartment = 0;
  species cycD in compartment = 0;
  species cycD_Kip1 in compartment = 0; cycD_Kip1 is "cycD:Kip1";
  species cycE in compartment = 0;
  species cycE_Kip1 in compartment = 0; cycE_Kip1 is "cycE:Kip1";
  species cycA in compartment = 0;
  species cycA_Kip1 in compartment = 0; cycA_Kip1 is "cycA:Kip1";
  species Kip1 in compartment = 0;
  species E2F in compartment = 0;
  species cycB in compartment = 0;
  species Cdh1 in compartment = 0;
  species cdc20T in compartment = 0;
  species Cdc20 in compartment = 0;
  species PPX in compartment = 0;
  species IEP in compartment = 0;
  species GM in compartment = 0;
  species mass in compartment = 2;
  species $E2FT in compartment = 5;
  species $PP1T in compartment = 1;
  species $RbT in compartment = 10;
  species $cycET in compartment;
  species $PP1A in compartment;
  species $Rb_hypo in compartment;
  species $CycDT in compartment;
  species $E2FA in compartment;
  species $E2F_RB in compartment; E2F_RB is "E2F:RB";

  // Parameters:
  k_prime_1 = 0.1;
  k1 = 0.6;
  k_prime_2 = 0.05;
  k2 = 20;
  k_double_prime_2 = 1;
  k_prime_3 = 7.5;
  k3 = 140;
  k4 = 40;
  k5 = 20;
  k_prime_6 = 10;
  k6 = 100;
  k_prime_7 = 0;
  k7 = 0.6;
  k_prime_8 = 0.1;
  k8 = 2;
  k9 = 2.5;
  k10 = 5;
  k_prime_11 = 0;
  k11 = 1.5;
  k12 = 1.5;
  k13 = 5;
  k14 = 2.5;
  k15 = 0.25;
  k16 = 0.25;
  k_prime_17 = 0.35;
  k17 = 10;
  k18 = 10;
  k_prime_19 = 0;
  k19 = 20;
  k20 = 10;
  k22 = 1;
  k_prime_23 = 0.005;
  k23 = 1;
  k24 = 1000;
  k24r = 10;
  k25 = 1000;
  k25r = 10;
  k26 = 10000;
  k26r = 200;
  k27 = 0.2;
  k28 = 0.2;
  k29 = 0.05;
  k30 = 20;
  k31 = 0.7;
  k32 = 1.8;
  k33 = 0.05;
  k34 = 0.05;
  muo = 0.061;
  j1 = 0.1;
  j3 = 0.01;
  j4 = 0.01;
  j8 = 0.1;
  j13 = 0.005;
  j14 = 0.005;
  j15 = 0.1;
  j17 = 0.3;
  j31 = 0.01;
  j32 = 0.01;
  K21 = 1;
  phi_E = 25;
  Phi_B = 2;
  gamma_A = 0.3;
  gamma_B = 1;
  nE = 0.5;
  nA = 0.5;
  nB = 1;
  lembda_D = 3.3;
  lembda_E = 5;
  lembda_A = 3;
  lembda_B = 5;
  psi_E = 1;
  psi_B = 0.05;
  epsilon = 1;
  H_Rb_hypo_RbT = 1; H_Rb_hypo_RbT is "H(Rb_hypo/RbT)";
  var RB_hypo_RbT; RB_hypo_RbT is "RB_hypo/RbT";
  quantity_to_number_factor = 6.022141e20;

  // Assignment rules:
  V2 := k_prime_2*(1 - Cdh1) + k2*Cdh1 + k_double_prime_2*Cdc20;
  V4 := k4*(gamma_A*cycA + gamma_B*cycB);
  L := k26r/k26 + k20/k26*(lembda_D*cycD + lembda_E*cycE + lembda_A*cycA + lembda_B*cycB);
  V6 := k_prime_6 + k6*(nE*cycE + nA*cycA + nB*cycB);
  PP1A := PP1T/(1 + K21*(phi_E*(cycE + cycA) + Phi_B*cycB));
  cycET := cycE + cycE_Kip1;
  V8 := k_prime_8*(k8*psi_E*(cycE + cycA + psi_B*cycB*quantity_to_number_factor*compartment)/(j8 + cycET));
  CycDT := cycD + cycD_Kip1;
  Rb_hypo := RbT/(1 + k20*(lembda_D*CycDT + lembda_E*cycE + lembda_A*cycA + lembda_B*cycB)/(k_prime_19*(PP1T - PP1A) + k19*PP1A));
  E2F_RB := 2*E2FT*Rb_hypo/(E2FT + Rb_hypo + L + ((E2FT + Rb_hypo + L)^2 - 4*E2FT*Rb_hypo)^(1/2));
  E2FA := (E2FT - E2F_RB)*E2F/E2FT;
  RB_hypo_RbT := Rb_hypo/RbT;

  // Reactions:
  reaction_for_ERG_production: => ERG; compartment*Rate_Law_for_reaction_for_ERG_production(epsilon, k15, DRG, j15);  // modifiers: DRG
  reaction_for_ERG_decay: ERG => ; compartment*Rate_Law_for_reaction_for_ERG_decay(k16, ERG);
  reaction_for_DRG_production: => DRG; compartment*Rate_Law_for_reaction_for_DRG_production(epsilon, k_prime_17, ERG, k17, DRG, j17);  // modifiers: ERG
  reaction_for_DRG_decay: DRG => ; compartment*Rate_Law_for_reaction_for_DRG_decay(k18, DRG);
  reaction_for_cycD_production: => cycD; compartment*Rate_Law_for_reaction_for_cycD_production(epsilon, k9, DRG, V6, cycD_Kip1, k24r);  // modifiers: DRG, cycD_Kip1
  reaction_for_cycD_decay: cycD => ; compartment*Rate_Law_for_reaction_for_cycD_decay(k24, cycD, Kip1, k10);  // modifiers: Kip1
  reaction_for__cycD_Kip1__production: => cycD_Kip1; compartment*Rate_Law_for_reaction_for__cycD_Kip1__production(k24, cycD, Kip1); reaction_for__cycD_Kip1__production is "reaction for "cycD:Kip1" production";  // modifiers: cycD, Kip1
  reaction_for__cycD_Kip1__decay: cycD_Kip1 => ; compartment*Rate_Law_for_reaction_for__cycD_Kip1__decay(k24r, cycD_Kip1, V6, k10); reaction_for__cycD_Kip1__decay is "reaction for "cycD:Kip1" decay";
  reaction_for_cycE_production: => cycE; compartment*Rate_Law_for_reaction_for_cycE_production(epsilon, k_prime_2, k2, E2FA, k25r, cycE_Kip1, V6);  // modifiers: E2FA, cycE_Kip1
  reaction_for_cycE_decay: cycE => ; compartment*Rate_Law_for_reaction_for_cycE_decay(V8, cycE, k25, Kip1);  // modifiers: Kip1
  reaction_for__cycE_Kip1__production: => cycE_Kip1; compartment*Rate_Law_for_reaction_for__cycE_Kip1__production(k25, cycE, Kip1); reaction_for__cycE_Kip1__production is "reaction for "cycE:Kip1" production";  // modifiers: cycE, Kip1
  reaction_for__cycE_Kip1__decay: cycE_Kip1 => ; compartment*Rate_Law_for_reaction_for__cycE_Kip1__decay(k25r, cycE_Kip1, V6, V8); reaction_for__cycE_Kip1__decay is "reaction for "cycE:Kip1" decay";
  reaction_for_cycA_production: => cycA; compartment*Rate_Law_for_reaction_for_cycA_production(epsilon, k29, E2FA, mass, k25r, cycA_Kip1, V6);  // modifiers: E2FA, mass, cycA_Kip1
  reaction_for_cycA_decay: cycA => ; compartment*Rate_Law_for_reaction_for_cycA_decay(k30, Cdc20, cycA, k25, Kip1);  // modifiers: Cdc20, Kip1
  reaction_for__cycA_Kip1__production: => cycA_Kip1; compartment*Rate_Law_for_reaction_for__cycA_Kip1__production(k25, cycA, Kip1); reaction_for__cycA_Kip1__production is "reaction for "cycA:Kip1" production";  // modifiers: cycA, Kip1
  reaction_for__cycA_Kip1__decay: cycA_Kip1 => ; compartment*Rate_Law_for_reaction_for__cycA_Kip1__decay(k25r, cycA_Kip1, V6, k30, Cdc20); reaction_for__cycA_Kip1__decay is "reaction for "cycA:Kip1" decay";  // modifiers: Cdc20
  reaction_for_Kip1_production: => Kip1; compartment*Rate_Law_for_reaction_for_Kip1_production(epsilon, k5, k24r, cycD_Kip1, k10);  // modifiers: cycD_Kip1
  reaction_for_Kip1_decay: Kip1 => ; compartment*Rate_Law_for_reaction_for_Kip1_decay(V6, Kip1, k24, cycD, k25, cycE, cycA);  // modifiers: cycD, cycE, cycA
  reaction_for_E2F_production: => E2F; compartment*Rate_Law_for_reaction_for_E2F_production(k22, E2FT, E2F);  // modifiers: E2FT
  reaction_for_E2F_decay: E2F => ; compartment*Rate_Law_for_reaction_for_E2F_decay(k_prime_23, k23, cycA, cycB, E2F);  // modifiers: cycA, cycB
  reaction_for_cycB_production: => cycB; compartment*Rate_Law_for_reaction_for_cycB_production(epsilon, k_prime_1, k1, cycB, j1);
  reaction_for_cycB_decay: cycB => ; compartment*Rate_Law_for_reaction_for_cycB_decay(V2, cycB);
  reaction_for_Cdh1_production: => Cdh1; compartment*Rate_Law_for_reaction_for_Cdh1_production(k3, Cdh1, j3, k_prime_3, Cdc20);  // modifiers: Cdc20
  reaction_for_Cdh1_decay: Cdh1 => ; compartment*Rate_Law_for_reaction_for_Cdh1_decay(V4, Cdh1, j4);
  reaction_for_cdc20T_production: => cdc20T; compartment*Rate_Law_for_reaction_for_cdc20T_production(epsilon, k_prime_11, k11, cycB);  // modifiers: cycB
  reaction_for_cdc20T_decay: cdc20T => ; compartment*Rate_Law_for_reaction_for_cdc20T_decay(k12, cdc20T);
  reaction_for_cdc20_production: => Cdc20; compartment*Rate_Law_for_reaction_for_cdc20_production(k13, IEP, cdc20T, Cdc20, j13);  // modifiers: IEP, cdc20T
  reaction_cdc20_decay: Cdc20 => ; compartment*Rate_Law_for_reaction_cdc20_decay(k14, Cdc20, j4, k12);
  reaction_for_PPX_production: => PPX; compartment*Rate_Law_for_reaction_for_PPX_production(epsilon, k33);
  reaction_for_PPX_decay: PPX => ; compartment*Rate_Law_for_reaction_for_PPX_decay(k34, PPX);
  reaction_for_IEP_production: => IEP; compartment*Rate_Law_for_reaction_for_IEP_production(k31, cycB, IEP, j31);  // modifiers: cycB
  reaction_reaction_for_IEP_decay: IEP => ; compartment*Rate_Law_for_reaction_reaction_for_IEP_decay(k32, PPX, IEP, j32);  // modifiers: PPX
  reaction_for_GM_production: => GM; compartment*Rate_Law_for_reaction_for_GM_production(k25, mass, H_Rb_hypo_RbT);  // modifiers: mass
  reaction_GM_decay: GM => ; compartment*Rate_Law_for_reaction_GM_decay(k28, GM);
  reaction_for_mass: => mass; compartment*Rate_Law_for_reaction_for_mass(epsilon, muo, GM);  // modifiers: GM

  // Events:
  H_Rb_hypo_RbT__Event: at (RB_hypo_RbT > 0.8): H_Rb_hypo_RbT = 0; H_Rb_hypo_RbT__Event is "H(Rb_hypo/RbT) Event";
  mass_event: at (Cdh1 >= 0.2): mass = mass/2;

  // Unit definitions:
  unit volume = 1e-3 litre;
  unit substance = 1e-3 mole;
end
