// SBML level 2 version 4

model HER2Low()
  // Kemmer2022 - Disentangling ERBB Signaling in Breast Cancer Subtypes – a Model-Based Analysis
  // This is a dynamic pathway model capturing ERBB receptor signaling as well as downstream MAPK and PI3K signaling pathways. The effect of different growth factors and drugs on the formation of active receptor dimers is explicitly included. The model was established and calibrated on time-resolved data of the luminal breast cancer cell lines MCF7 and T47D across an array of four ligands and five drugs. For the description of the full modeling project including condition-specific parameters, observables, measurement data and experimental conditions the model is provided in PEtab format in addition to the classical SBML version.
  // hasProperty mamo:MAMO_0000046

  // Compartments:
  compartment cytoplasm = 1;

  // Species:
  species R1 in cytoplasm = 1/cytoplasm;
  species R1R1 in cytoplasm = 1/cytoplasm;
  species R2 in cytoplasm = 1/cytoplasm;
  species R1R2 in cytoplasm = 1/cytoplasm;
  species R3 in cytoplasm = 1/cytoplasm;
  species R1R3 in cytoplasm = 1/cytoplasm;
  species R2R3 in cytoplasm = 1/cytoplasm;
  species R1R2_off in cytoplasm = 1/cytoplasm;
  species R2R3_off in cytoplasm = 1/cytoplasm;
  species R2R2_off in cytoplasm = 1/cytoplasm;
  species AKT in cytoplasm = 1/cytoplasm;
  species pAKT in cytoplasm = AKT*Kd_pAKT_basal*dephospho_pAKT/(dephospho_pAKT*mutation);
  species cRAF in cytoplasm = 1/cytoplasm;
  species pcRAF in cytoplasm = cRAF*Kd_pcRAF_basal*deact_cRAF/deact_cRAF;
  species MEK in cytoplasm = 1/cytoplasm;
  species pMEK in cytoplasm = MEK*(cRAF*Kd_pcRAF_basal*deact_cRAF*phospho_MEK + deact_cRAF*phospho_MEK_basal)/(deact_cRAF*dephospho_pMEK);
  species ppMEK in cytoplasm = MEK*(cRAF*Kd_pcRAF_basal*deact_cRAF*phospho_MEK + deact_cRAF*phospho_MEK_basal)^2/(deact_cRAF^2*dephospho_pMEK^2);
  species ERK in cytoplasm = 1/cytoplasm;
  species pERK in cytoplasm = ERK*phospho_ERK*(MEK*(cRAF*Kd_pcRAF_basal*deact_cRAF*phospho_MEK + deact_cRAF*phospho_MEK_basal)^2/(deact_cRAF^2*dephospho_pMEK^2))/dephospho_pERK;
  species ppERK in cytoplasm = ERK*phospho_ERK*(MEK*(cRAF*Kd_pcRAF_basal*deact_cRAF*phospho_MEK + deact_cRAF*phospho_MEK_basal)^2/(deact_cRAF^2*dephospho_pMEK^2))/dephospho_pERK*phospho_ERK*(MEK*(cRAF*Kd_pcRAF_basal*deact_cRAF*phospho_MEK + deact_cRAF*phospho_MEK_basal)^2/(deact_cRAF^2*dephospho_pMEK^2))/dephospho_pERK;
  species S6K in cytoplasm = 1/cytoplasm;
  species ppS6K in cytoplasm = (phospho_S6K_AKT*S6K*(AKT*Kd_pAKT_basal*dephospho_pAKT/(dephospho_pAKT*mutation)) + phospho_S6K_ERK*S6K*(ERK*phospho_ERK*(MEK*(cRAF*Kd_pcRAF_basal*deact_cRAF*phospho_MEK + deact_cRAF*phospho_MEK_basal)^2/(deact_cRAF^2*dephospho_pMEK^2))/dephospho_pERK*phospho_ERK*(MEK*(cRAF*Kd_pcRAF_basal*deact_cRAF*phospho_MEK + deact_cRAF*phospho_MEK_basal)^2/(deact_cRAF^2*dephospho_pMEK^2))/dephospho_pERK))/dephospho_S6K;
  species ligand in cytoplasm = 1/cytoplasm;
  species drug in cytoplasm = 1/cytoplasm;

  // Parameters:
  build_R1R1 = 0.1;
  drug_R1R1 = 0.1191489;
  decay_R1R1 = 0.1382979;
  build_R1R2 = 0.1574468;
  drug_R1R2 = 0.1765957;
  decay_R1R2 = build_R1R2/Kd_R1R2;
  build_R1R3 = 0.2148936;
  drug_R1R3 = 0.2340426;
  decay_R1R3 = build_R1R3/Kd_R1R3;
  build_R2R3 = 0.2723404;
  drug_R2R3 = 0.2914894;
  decay_R2R3 = build_R2R3/Kd_R2R3;
  build_R1R2off = Kd_R1R2off*decay_R1R2off;
  decay_R1R2off = 0.3489362;
  build_R2R3off = Kd_R2R3off*decay_R2R3off;
  decay_R2R3off = 0.387234;
  build_R2R2off = Kd_R2R2off*decay_R2R2off;
  decay_R2R2off = 0.4255319;
  degrade_R1R1 = 0.4446809;
  degrade_R1R2 = 0.4638298;
  degrade_R1R3 = 0.4829787;
  degrade_R2R3 = 0.5021277;
  degrade_R3_lumretuzumab = 0.5212766;
  phospho_AKT_R1R1 = Kd_pAKT_R1R1*dephospho_pAKT;
  phospho_AKT_R1R2 = Kd_pAKT_R1R2*dephospho_pAKT;
  phospho_AKT_R1R3 = Kd_pAKT_R1R3*dephospho_pAKT;
  phospho_AKT_R2R3 = Kd_pAKT_R2R3*dephospho_pAKT;
  phospho_AKT_basal = Kd_pAKT_basal*dephospho_pAKT;
  dephospho_pAKT = 0.6361702;
  mutation = 0.6553191;
  phospho_cRAF_R1R1 = degrade_R1R1*ActRatio_pcRAF_R1R1*deact_cRAF;
  drug_cRAF_R1R1 = 0.693617;
  phospho_cRAF_R1R2 = Kd_pcRAF_R1R2*deact_cRAF;
  drug_cRAF_R1R2 = 0.7319149;
  phospho_cRAF_R1R3 = Kd_pcRAF_R1R3*deact_cRAF;
  drug_cRAF_R1R3 = 0.7702128;
  phospho_cRAF_R2R3 = Kd_pcRAF_R2R3*deact_cRAF;
  drug_cRAF_R2R3 = 0.8085106;
  phospho_cRAF_basal = Kd_pcRAF_basal*deact_cRAF;
  deact_cRAF = 0.8468085;
  phospho_MEK = 0.8659574;
  phospho_MEK_basal = 0.8851064;
  dephospho_pMEK = 0.9042553;
  phospho_ERK = 0.9234043;
  dephospho_pERK = 0.9425532;
  phospho_S6K_AKT = 0.9617021;
  phospho_S6K_ERK = 0.9808511;
  dephospho_S6K = 1;

  // Reactions:
  R1R1dimerizationNISS: 2 R1 => R1R1; build_R1R1*(1/(1 + drug_R1R1))*R1*R1*ligand*cytoplasm;  // modifiers: ligand
  R1R1decay: R1R1 => 2 R1; decay_R1R1*R1R1*cytoplasm;
  R1R2dimerizationNISS: R1 + R2 => R1R2; build_R1R2*(1/(1 + drug_R1R2))*R1*R2*ligand*cytoplasm;  // modifiers: ligand
  R1R2decay: R1R2 => R1 + R2; decay_R1R2*R1R2*cytoplasm;
  R1R3dimerizationNISS: R1 + R3 => R1R3; build_R1R3*(1/(1 + drug_R1R3))*R1*R3*ligand*cytoplasm;  // modifiers: ligand
  R1R3decay: R1R3 => R1 + R3; decay_R1R3*R1R3*cytoplasm;
  R2R3dimerizationNISS: R2 + R3 => R2R3; build_R2R3*(1/(1 + drug_R2R3))*R2*R3*ligand*cytoplasm;  // modifiers: ligand
  R2R3decay: R2R3 => R2 + R3; decay_R2R3*R2R3*cytoplasm;
  R1R2dimerizationbydrugNISS: R1 + R2 => R1R2_off; build_R1R2off*R1*R2*drug*cytoplasm;  // modifiers: drug
  R1R2offdecay: R1R2_off => R1 + R2; decay_R1R2off*R1R2_off*cytoplasm;
  R2R3dimerizationbydrugNISS: R2 + R3 => R2R3_off; build_R2R3off*R2*R3*drug*cytoplasm;  // modifiers: drug
  R2R3_offdecay: R2R3_off => R2 + R3; decay_R2R3off*R2R3_off*cytoplasm;
  R2R2dimerizationbydrugNISS: 2 R2 => R2R2_off; build_R2R2off*R2*R2*drug*cytoplasm;  // modifiers: drug
  R2R2_offdecay: R2R2_off => 2 R2; decay_R2R2off*R2R2_off*cytoplasm;
  R1R1degradationNISS: R1R1 => ; degrade_R1R1*R1R1*cytoplasm;
  R1R2degradationNISS: R1R2 => ; degrade_R1R2*R1R2*cytoplasm;
  R1R3degradationNISS: R1R3 => ; degrade_R1R3*R1R3*cytoplasm;
  R2R3degradationNISS: R2R3 => ; degrade_R2R3*R2R3*cytoplasm;
  R3degradationbylumNISS: R3 => ; degrade_R3_lumretuzumab*R3*drug*cytoplasm;  // modifiers: drug
  AKTtopAKTbyR1R1NISS: AKT => pAKT; phospho_AKT_R1R1*AKT*R1R1*cytoplasm;  // modifiers: R1R1
  AKTtopAKTbyR1R2NISS: AKT => pAKT; phospho_AKT_R1R2*AKT*R1R2*cytoplasm;  // modifiers: R1R2
  AKTtopAKTbyR1R3NISS: AKT => pAKT; phospho_AKT_R1R3*AKT*R1R3*cytoplasm;  // modifiers: R1R3
  AKTtopAKTbyR2R3NISS: AKT => pAKT; phospho_AKT_R2R3*AKT*R2R3*cytoplasm;  // modifiers: R2R3
  basalAKTtopAKT: AKT => pAKT; phospho_AKT_basal*AKT*cytoplasm;
  pAKTtoAKT: pAKT => AKT; dephospho_pAKT*pAKT*mutation*cytoplasm;
  cRAFactivationbyR1R1NISS: cRAF => pcRAF; phospho_cRAF_R1R1*(1/(1 + drug_cRAF_R1R1))*cRAF*R1R1*cytoplasm;  // modifiers: R1R1
  cRAFactivationbyR1R2NISS: cRAF => pcRAF; phospho_cRAF_R1R2*(1/(1 + drug_cRAF_R1R2))*cRAF*R1R2*cytoplasm;  // modifiers: R1R2
  cRAFactivationbyR1R3NISS: cRAF => pcRAF; phospho_cRAF_R1R3*(1/(1 + drug_cRAF_R1R3))*cRAF*R1R3*cytoplasm;  // modifiers: R1R3
  cRAFactivationbyR2R3NISS: cRAF => pcRAF; phospho_cRAF_R2R3*(1/(1 + drug_cRAF_R2R3))*cRAF*R2R3*cytoplasm;  // modifiers: R2R3
  basalcRAFactivation: cRAF => pcRAF; phospho_cRAF_basal*cRAF*cytoplasm;
  cRAFinactivation: pcRAF => cRAF; pcRAF*deact_cRAF*cytoplasm;
  MEKtopMEK: MEK => pMEK; phospho_MEK*MEK*pcRAF*cytoplasm;  // modifiers: pcRAF
  pMEKtoppMEK: pMEK => ppMEK; phospho_MEK*pMEK*pcRAF*cytoplasm;  // modifiers: pcRAF
  basalMEKtopMEK: MEK => pMEK; phospho_MEK_basal*MEK*cytoplasm;
  basalpMEKtoppMEK: pMEK => ppMEK; phospho_MEK_basal*pMEK*cytoplasm;
  ppMEKtopMEK: ppMEK => pMEK; dephospho_pMEK*ppMEK*cytoplasm;
  pMEKtoMEK: pMEK => MEK; dephospho_pMEK*pMEK*cytoplasm;
  ERKtopERK: ERK => pERK; phospho_ERK*ERK*ppMEK*cytoplasm;  // modifiers: ppMEK
  pERKtoppERK: pERK => ppERK; phospho_ERK*pERK*ppMEK*cytoplasm;  // modifiers: ppMEK
  ppERKtopERK: ppERK => pERK; dephospho_pERK*ppERK*cytoplasm;
  pERKtoERK: pERK => ERK; dephospho_pERK*pERK*cytoplasm;
  S6KtoppS6KbypAKT: S6K => ppS6K; phospho_S6K_AKT*S6K*pAKT*cytoplasm;  // modifiers: pAKT
  S6KtoppS6KbyppERK: S6K => ppS6K; phospho_S6K_ERK*S6K*ppERK*cytoplasm;  // modifiers: ppERK
  ppS6KtoS6K: ppS6K => S6K; dephospho_S6K*ppS6K*cytoplasm;
  ligandinductionNISS: => ligand; 0*cytoplasm;
  drugadditionNISS: => drug; 0*cytoplasm;

  // Events:
  at (time >= 60): ligand = 1;
  at (time >= 0): drug = 1;

  // Unit definitions:
  unit time = 60 second;
end
