// SBML level 3 version 1

function Function_for_J3(K2, a2, b2, c1, c2, default_compartment, g, koff, r)
  (K2*koff*2*c1*r - koff*2*c2 - c2*2*g*b2 - c2*a2)/default_compartment;
end

function Function_for_J0(K1, K2, R, a1, a2, c1, c2, default_compartment, g, koff, r, sr)
  (sr - g*r + koff*2*c1 - K1*koff*2*R*r + koff*2*c2 - K2*koff*2*c1*r + 2*c1*a1 + c2*a2*2)/default_compartment;
end

function Function_for_J2(K1, K2, R, a1, b1, b2, c1, c2, default_compartment, g, koff, r)
  (K1*koff*R*r - koff*c1 + koff*c2 - K2*koff*c1*r + c2*g*b2 - c1*a1 - c1*g*b1)/default_compartment;
end

function Function_for_J1(K1, R, b1, c1, default_compartment, g, koff, r, sR)
  (sR - R + koff*2*c1 - K1*koff*2*R*r + 2*c1*g*b1)/default_compartment;
end

model __main()
  // Li2021-MicroRNAs noncanonical feedback model
  // (I am not the first author of the paper who contributed to the experimental data, I did the modeling) Bistable switches and oscillators have long been considered key mechanisms underlying cell fate decisions and pattern formation in biology. Previous studies of these dynamical behaviors focused on regulatory networks with intuitive feedback loops. It was therefore unclear whether other common biochemical reactions can act as bistable switches or oscillators crucial for cellular and physiological dynamics. In this work, we used mass-action-based models to show that elementary production, degradation and binding reactions involving as few as two RNA species (e.g.an mRNA and a microRNA) can generate bistability and oscillation. We showed that both bistability and oscillation depend on cooperativity of two microRNA binding sites on the mRNA. We therefore termed our model the two-site mRNA-microRNA (MMI2) model. Remarkably, the network structure of the MMI2 model does not have any explicit feedback loop. We estimated that this simple reaction network is applicable to nearly half of human protein-coding genes. Using in vitro and in vivo experiments, we showed the function of a newly proposed MMI2-based switch in governing motor neuron lineage segregation in the spinal cord of mammalian embryos. Our findings reveal a previously underappreciated post-transcriptional mechanism that may have widespread functions in cell fate decisions, oscillatory cell dynamics and tissue patterning. Furthermore, our results challenge the long-standing idea of using intuitive feedback loops to explain bistability and oscillation. In addition to its significance in biology, the MMI2 model enables nontrivial mathematical analysis due to its simplicity. Using algebraic geometry and chemical reaction network theory, we obtained key conditions for bistability of the MMI2 model. These conditions include an inequality that reveals to a hidden feedback loop arising from regulated degradation. For these reasons, we expect that our model will not only provide useful insights into a wide range of problems in cell and developmental biology, but also enable new analytical approaches in systems biology and mathematical biology.
  // hasProperty mamo:MAMO_0000046
  // model units - substance: substance, time: time, volume: volume, area: area, length: length, extent: substance

  // Compartments:
  compartment default_compartment = 1 volume;  // SBO:0000410

  // Species:
  // mRNA
  species R in default_compartment = 0.0009199966/default_compartment;
  // 1:1 complex
  species c1 in default_compartment = 0.002633887/default_compartment;
  // microRNA
  species r in default_compartment = 0.2637073/default_compartment;
  // 2:1 complex
  species c2 in default_compartment = 0.3992006/default_compartment;

  // Parameters:
  sR = 3;
  a1 = 1;
  a2 = 4;
  b1 = 5;
  b2 = 1;
  g = 0.24;
  sr = 1;
  K1 = 1000;
  K2 = 1000;
  koff = 10;

  // Assignment rules:
  Signal_sR := sR;

  // Reactions:
  J1: -> R; default_compartment*Function_for_J1(K1, R, b1, c1, default_compartment, g, koff, r, sR);  // modifiers: c1, r
  J0: -> r; default_compartment*Function_for_J0(K1, K2, R, a1, a2, c1, c2, default_compartment, g, koff, r, sr);  // modifiers: R, c2, c1
  J2: -> c1; default_compartment*Function_for_J2(K1, K2, R, a1, b1, b2, c1, c2, default_compartment, g, koff, r);  // modifiers: R, c2, r
  J3: -> c2; default_compartment*Function_for_J3(K2, a2, b2, c1, c2, default_compartment, g, koff, r);  // modifiers: c1, r

  // Events:
  // Event 1 for demonstrating bistability.
  // Turning on signal for mRNA production.
  _E0: at (time > 30): sR = 10;
  // Event 2 for demonstrating bistability.
  // Turning off signal for mRNA production.
  _E1: at (time > 70): sR = 3;
  // Event for demonstrating oscillation.
  // Changing rate constants to region of stable limit cycle.
  _E2: at (time > 100): g = 0.2, a2 = 12, b2 = 7, b1 = 1, sR = 4.8;

  // Unit definitions:
  unit length = metre;
  unit area = metre^2;
  unit volume = litre;
  unit time = second;
  unit substance = mole;
end
