// SBML level 2 version 4

function isotopic_irreversible(v, S, Stot)
  v*S/Stot;
end

model New_Model()
  // Millard2023 - Gluconolactone-Gluconate extracellular bypass in Escherichia coli
  // This model was used for instationary 13C metabolic flux analysis of the extracellular GL-GNT by-pass of E. coli
  // hasProperty mamo:MAMO_0000046
  // isDescribedBy doi:10.1101/2023.11.29.569206

  // Compartments:
  compartment cytosol = 1;
  compartment extracellular = 1;

  // Species:
  species G6P_0 in cytosol = 1;
  species $GLC_e_0 in extracellular = 15.87597;
  species GAP_0 in cytosol = 1;
  species PYR_0 in cytosol = 1;
  species _6PGL_0 in cytosol = 1;
  species _6PG_0 in cytosol = 1;
  species $GL_e_0 in extracellular = 0.01;
  species $GNT_e_0 in extracellular = 0.01;
  species GAP_1 in cytosol = 0;
  species $GNT_e_1 in extracellular = 0;
  species PYR_1 in cytosol = 0;
  species _6PG_1 in cytosol = 0;
  species $_6PG_tot in cytosol;
  species $GAP_tot in cytosol;
  species $GNT_e_tot in extracellular;
  species $PYR_tot in cytosol;
  species X in cytosol = 0.05354229;
  species $GL_e_1 in extracellular = 0;
  species $GL_tot in extracellular;
  species _6PGL_1 in cytosol = 0;
  species G6P_1 in cytosol = 0;
  species $GLC_e_1 in extracellular = 0.4571476;
  species $_6PGL_tot in cytosol;
  species $G6P_tot in cytosol;
  species $GLC_e_tot in extracellular;

  // Parameters:
  _v1_PTS = 8.691253;
  _mu = 0.4059567;
  __t_PULSE_GLC_1 = 4.863736;
  __c_PULSE_GLC_1 = 13.21904;
  _partition_r5_r2r5_PPP = 0.149;
  _partition_r6_r6r8_intra = 0.001;
  r9_k_deg_GL = 3.04;
  Initial_for___c_PULSE_GLC_1 = __c_PULSE_GLC_1;
  Initial_for___t_PULSE_GLC_1 = __t_PULSE_GLC_1;
  ModelValue_18 = _partition_r5_r2r5_PPP; ModelValue_18 is "Initial for _partition_r5_r2r5_PPP";
  ModelValue_19 = _partition_r6_r6r8_intra; ModelValue_19 is "Initial for _partition_r6_r6r8_intra";
  Initial_for__v1_PTS = _v1_PTS;
  Initial_for_r9_k_deg_GL = r9_k_deg_GL;
  Initial_for_v11_GNT_uptake = v11_GNT_uptake;
  Initial_for_v2_EMP_high = v2_EMP_high;
  Initial_for_v3_EMP_low = v3_EMP_low;
  Initial_for_v5_G6PDH = v5_G6PDH;
  Initial_for_v6_PGL = v6_PGL;
  Initial_for_v7_PPP = v7_PPP;

  // Assignment rules:
  v2_EMP_high := Initial_for__v1_PTS*(1 - ModelValue_18);
  _6PG_tot := _6PG_0 + _6PG_1;
  GAP_tot := GAP_0 + GAP_1;
  GNT_e_tot := GNT_e_0 + GNT_e_1;
  PYR_tot := PYR_0 + PYR_1;
  GL_tot := GL_e_0 + GL_e_1;
  G6P_tot := G6P_0 + G6P_1;
  _6PGL_tot := _6PGL_0 + _6PGL_1;
  GLC_e_tot := GLC_e_0 + GLC_e_1;
  enr_GAP := GAP_1/(GAP_0 + GAP_1);
  enr_GL_e := GL_e_1/(GL_e_1 + GL_e_0);
  enr_GLC_e := GLC_e_1/(GLC_e_0 + GLC_e_1);
  v5_G6PDH := Initial_for__v1_PTS*ModelValue_18;
  v6_PGL := Initial_for_v5_G6PDH*ModelValue_19;
  v9_GL_degradation := Initial_for_r9_k_deg_GL*GL_tot;
  v11_GNT_uptake := v9_GL_degradation;
  enr_PYR := PYR_1/(PYR_0 + PYR_1);
  enr_6PG := _6PG_1/(_6PG_0 + _6PG_1);
  v7_PPP := Initial_for_v11_GNT_uptake + Initial_for_v6_PGL;
  v3_EMP_low := Initial_for_v2_EMP_high*2 + Initial_for_v7_PPP*0.83*2;
  v8_GL_export := Initial_for_v5_G6PDH*(1 - ModelValue_19);
  v4_PYR_out := Initial_for_v3_EMP_low;
  enr_GNT_e := GNT_e_1/(GNT_e_0 + GNT_e_1);

  // Rate rules:
  GLC_e_0' = -X*r1_0_PTS;
  GL_e_0' = X*r8_0_GL_export - r9_0_GL_degradation;
  GNT_e_0' = r9_0_GL_degradation - X*r11_0_GNT_uptake;
  GNT_e_1' = r9_1_GL_degradation - r11_1_GNT_uptake*X;
  GL_e_1' = X*r8_1_GL_export - r9_1_GL_degradation;
  GLC_e_1' = -X*r1_1_PTS;

  // Reactions:
  r1_0_PTS: $GLC_e_0 => G6P_0; isotopic_irreversible(_v1_PTS, GLC_e_0, GLC_e_tot);  // modifiers: GLC_e_tot
  r2_0_EMP_high: G6P_0 => 2 GAP_0; cytosol*isotopic_irreversible(v2_EMP_high, G6P_0, G6P_tot);  // modifiers: G6P_tot
  r3_0_EMP_low: GAP_0 => PYR_0; cytosol*isotopic_irreversible(v3_EMP_low, GAP_0, GAP_tot);  // modifiers: GAP_tot
  r4_0_PYR_out: PYR_0 => ; cytosol*isotopic_irreversible(v4_PYR_out, PYR_0, PYR_tot);  // modifiers: PYR_tot
  r5_0_G6PDH: G6P_0 => _6PGL_0; cytosol*isotopic_irreversible(v5_G6PDH, G6P_0, G6P_tot);  // modifiers: G6P_tot
  r6_0_PGL: _6PGL_0 => _6PG_0; cytosol*isotopic_irreversible(v6_PGL, _6PGL_0, _6PGL_tot);  // modifiers: _6PGL_tot
  r7_0_PPP: _6PG_0 => 1.66 GAP_0; cytosol*isotopic_irreversible(v7_PPP, _6PG_0, _6PG_tot);  // modifiers: _6PG_tot
  r8_0_GL_export: _6PGL_0 => $GL_e_0; isotopic_irreversible(v8_GL_export, _6PGL_0, _6PGL_tot);  // modifiers: _6PGL_tot
  r9_0_GL_degradation: $GL_e_0 => $GNT_e_0; extracellular*isotopic_irreversible(v9_GL_degradation, GL_e_0, GL_tot);  // modifiers: GL_tot
  r11_0_GNT_uptake: $GNT_e_0 => _6PG_0; isotopic_irreversible(v11_GNT_uptake, GNT_e_0, GNT_e_tot);  // modifiers: GNT_e_tot
  r3_1_EMP_low: GAP_1 => PYR_1; cytosol*isotopic_irreversible(v3_EMP_low, GAP_1, GAP_tot);  // modifiers: GAP_tot
  r4_1_PYR_out: PYR_1 => ; cytosol*isotopic_irreversible(v4_PYR_out, PYR_1, PYR_tot);  // modifiers: PYR_tot
  r7_1_PPP: _6PG_1 => 1.66 GAP_1; cytosol*isotopic_irreversible(v7_PPP, _6PG_1, _6PG_tot);  // modifiers: _6PG_tot
  r11_1_GNT_uptake: $GNT_e_1 => _6PG_1; isotopic_irreversible(v11_GNT_uptake, GNT_e_1, GNT_e_tot);  // modifiers: GNT_e_tot
  r_growth: X => 2 X; cytosol*_mu*X;
  r9_1_GL_degradation: $GL_e_1 => $GNT_e_1; extracellular*isotopic_irreversible(v9_GL_degradation, GL_e_1, GL_tot);  // modifiers: GL_tot
  r5_1_G6PDH: G6P_1 => _6PGL_1; cytosol*isotopic_irreversible(v5_G6PDH, G6P_1, G6P_tot);  // modifiers: G6P_tot
  r1_1_PTS: $GLC_e_1 => G6P_1; isotopic_irreversible(_v1_PTS, GLC_e_1, GLC_e_tot);  // modifiers: GLC_e_tot
  r2_1_EMP_high: G6P_1 => 2 GAP_1; cytosol*isotopic_irreversible(v2_EMP_high, G6P_1, G6P_tot);  // modifiers: G6P_tot
  r6_1_PGL: _6PGL_1 => _6PG_1; cytosol*isotopic_irreversible(v6_PGL, _6PGL_1, _6PGL_tot);  // modifiers: _6PGL_tot
  r8_1_GL_export: _6PGL_1 => $GL_e_1; isotopic_irreversible(v8_GL_export, _6PGL_1, _6PGL_tot);  // modifiers: _6PGL_tot

  // Events:
  pulse_GLC: at (time >= Initial_for___t_PULSE_GLC_1): GLC_e_1 = GLC_e_1 + Initial_for___c_PULSE_GLC_1;

  // Unit definitions:
  unit volume = 1e-3 litre;
  unit substance = 1e-3 mole;
end
