// SBML level 2 version 1

model Riya_2024_Interplay_between_the_immunologic_network_inflammasome_and_autophagy_in_non_small_cell_lung_cancer_NSCLC_()
  // Riya 2024 - Interplay between the immunologic network, inflammasome, and autophagy in non-small cell lung cancer (NSCLC).
  // In later stages of NSCLC, we observed that the overexpression of IL-6 and IL-17 cytokines leads to macroautophagic and inflammatory responses, which contribute to disease progression.
  // isDescribedBy pubmed:38279220
  // hasProperty mamo:MAMO_0000046
  // biomodels.db:MODEL2402030002

  // Compartments:
  compartment TUMOR_CELL = 1;
  compartment TYPE_III_IMMUNE_RESPONSE = 1;
  compartment MONOCYTE_TO_M1_POLARIZATION = 1;
  compartment DENDRITIC_CELL = 1;
  compartment NK_CELL = 1;
  compartment MDSC = 1;
  compartment T_CELL_MEDIATED_IMMUNE_RESPONSE = 1; T_CELL_MEDIATED_IMMUNE_RESPONSE is "T-CELL MEDIATED IMMUNE RESPONSE";
  compartment M2_MACROPHAGE = 1;

  // Species:
  substanceOnly species $LPS_TUMOR_CELL in TUMOR_CELL = 1500;  // substance in MWBUILTINUNIT_molecule
  substanceOnly species $TLR_4 in TUMOR_CELL = 1500;  // substance in MWBUILTINUNIT_molecule
  substanceOnly species LPs_TLR_complex in TUMOR_CELL = 1500; LPs_TLR_complex is "LPs-TLR complex";  // substance in MWBUILTINUNIT_molecule
  substanceOnly species Myd88_TIRAP in TUMOR_CELL = 10000; Myd88_TIRAP is "Myd88/TIRAP";  // substance in MWBUILTINUNIT_molecule
  substanceOnly species TRIF_TRAM in TUMOR_CELL = 2000; TRIF_TRAM is "TRIF/TRAM";  // substance in MWBUILTINUNIT_molecule
  substanceOnly species $IL_1B in TUMOR_CELL = 1500; IL_1B is "IL-1B";  // substance in MWBUILTINUNIT_molecule
  substanceOnly species $IL_1B_R in TUMOR_CELL = 1500; IL_1B_R is "IL-1B R";  // substance in MWBUILTINUNIT_molecule
  substanceOnly species IL_1B_complex in TUMOR_CELL = 1500; IL_1B_complex is "IL-1B complex";  // substance in MWBUILTINUNIT_molecule
  substanceOnly species Irak_1_4 in TUMOR_CELL = 15000; Irak_1_4 is "Irak 1/4";  // substance in MWBUILTINUNIT_molecule
  substanceOnly species TRAF_6 in TUMOR_CELL = 27000;  // substance in MWBUILTINUNIT_molecule
  substanceOnly species Tak1 in TUMOR_CELL = 50000;  // substance in MWBUILTINUNIT_molecule
  substanceOnly species NEMO_complex in TUMOR_CELL = 97000;  // substance in MWBUILTINUNIT_molecule
  substanceOnly species MKK in TUMOR_CELL = 97000;  // substance in MWBUILTINUNIT_molecule
  substanceOnly species Erk1_2 in TUMOR_CELL = 170000; Erk1_2 is "Erk1/2";  // substance in MWBUILTINUNIT_molecule
  substanceOnly species p38 in TUMOR_CELL = 170000;  // substance in MWBUILTINUNIT_molecule
  substanceOnly species JNK in TUMOR_CELL = 170000;  // substance in MWBUILTINUNIT_molecule
  substanceOnly species PDGF_b in TUMOR_CELL = 208000; PDGF_b is "PDGF-b";  // substance in MWBUILTINUNIT_molecule
  substanceOnly species CCL_2_TUMOR_CELL in TUMOR_CELL = 208000; CCL_2_TUMOR_CELL is "CCL-2";  // substance in MWBUILTINUNIT_molecule
  substanceOnly species IL_6_TC in TUMOR_CELL = 208000; IL_6_TC is "IL-6 TC";  // substance in MWBUILTINUNIT_molecule
  substanceOnly species TNFa in TUMOR_CELL = 208000;  // substance in MWBUILTINUNIT_molecule
  substanceOnly species VEGF_TUMOR_CELL in TUMOR_CELL = 208000;  // substance in MWBUILTINUNIT_molecule
  substanceOnly species M_CSF_TUMOR_CELL in TUMOR_CELL = 208000; M_CSF_TUMOR_CELL is "M-CSF";  // substance in MWBUILTINUNIT_molecule
  substanceOnly species Pro_inflammatory_cytokine_gene in TUMOR_CELL = 250000; Pro_inflammatory_cytokine_gene is "Pro-inflammatory cytokine gene";  // substance in MWBUILTINUNIT_molecule
  substanceOnly species NFkB_TUMOR_CELL in TUMOR_CELL = 170000;  // substance in MWBUILTINUNIT_molecule
  substanceOnly species Irf3 in TUMOR_CELL = 170000;  // substance in MWBUILTINUNIT_molecule
  substanceOnly species AP1_TUMOR_CELL in TUMOR_CELL = 190000;  // substance in MWBUILTINUNIT_molecule
  substanceOnly species PDGF in TYPE_III_IMMUNE_RESPONSE = 200000;  // substance in MWBUILTINUNIT_molecule
  substanceOnly species $PDGF_R in TYPE_III_IMMUNE_RESPONSE = 5000;  // substance in MWBUILTINUNIT_molecule
  substanceOnly species PDGF_complex in TYPE_III_IMMUNE_RESPONSE = 5000;  // substance in MWBUILTINUNIT_molecule
  substanceOnly species PI3K in TYPE_III_IMMUNE_RESPONSE = 15000;  // substance in MWBUILTINUNIT_molecule
  substanceOnly species Akt in TYPE_III_IMMUNE_RESPONSE = 34000;  // substance in MWBUILTINUNIT_molecule
  substanceOnly species mTOR in TYPE_III_IMMUNE_RESPONSE = 60000;  // substance in MWBUILTINUNIT_molecule
  substanceOnly species VEGF_TYPE_III_IMMUNE_RESPONSE in TYPE_III_IMMUNE_RESPONSE = 150000;  // substance in MWBUILTINUNIT_molecule
  substanceOnly species TNF_a in TYPE_III_IMMUNE_RESPONSE = 700000;  // substance in MWBUILTINUNIT_molecule
  substanceOnly species $TNF_a_R in TYPE_III_IMMUNE_RESPONSE = 5000;  // substance in MWBUILTINUNIT_molecule
  substanceOnly species TNF_a_complex in TYPE_III_IMMUNE_RESPONSE = 5000; TNF_a_complex is "TNF-a complex";  // substance in MWBUILTINUNIT_molecule
  substanceOnly species JN_Kinase in TYPE_III_IMMUNE_RESPONSE = 9000;  // substance in MWBUILTINUNIT_molecule
  substanceOnly species IL_17_A_F in TYPE_III_IMMUNE_RESPONSE = 700000; IL_17_A_F is "IL-17 A/F";  // substance in MWBUILTINUNIT_molecule
  substanceOnly species $IL_17_RA_C in TYPE_III_IMMUNE_RESPONSE = 20000; IL_17_RA_C is "IL-17 RA/C";  // substance in MWBUILTINUNIT_molecule
  substanceOnly species IL_17_complex in TYPE_III_IMMUNE_RESPONSE = 20000; IL_17_complex is "IL-17 complex";  // substance in MWBUILTINUNIT_molecule
  substanceOnly species Act_1 in TYPE_III_IMMUNE_RESPONSE = 35000;  // substance in MWBUILTINUNIT_molecule
  substanceOnly species TRAF6 in TYPE_III_IMMUNE_RESPONSE = 50000;  // substance in MWBUILTINUNIT_molecule
  substanceOnly species Tak_1 in TYPE_III_IMMUNE_RESPONSE = 100000;  // substance in MWBUILTINUNIT_molecule
  substanceOnly species MAPK in TYPE_III_IMMUNE_RESPONSE = 150000;  // substance in MWBUILTINUNIT_molecule
  substanceOnly species Nemo_complex_TYPE_III_IMMUNE_RESPONSE in TYPE_III_IMMUNE_RESPONSE = 250000;  // substance in MWBUILTINUNIT_molecule
  substanceOnly species IL6 in TYPE_III_IMMUNE_RESPONSE = 800000;  // substance in MWBUILTINUNIT_molecule
  substanceOnly species IL8 in TYPE_III_IMMUNE_RESPONSE = 500000;  // substance in MWBUILTINUNIT_molecule
  substanceOnly species IL4_13 in TYPE_III_IMMUNE_RESPONSE = 500000; IL4_13 is "IL4/13";  // substance in MWBUILTINUNIT_molecule
  substanceOnly species Cyclin_D1_TYPE_III_IMMUNE_RESPONSE in TYPE_III_IMMUNE_RESPONSE = 500000;  // substance in MWBUILTINUNIT_molecule
  substanceOnly species Bcl_xL_TYPE_III_IMMUNE_RESPONSE in TYPE_III_IMMUNE_RESPONSE = 500000; Bcl_xL_TYPE_III_IMMUNE_RESPONSE is "Bcl-xL";  // substance in MWBUILTINUNIT_molecule
  substanceOnly species Bcl_2_TYPE_III_IMMUNE_RESPONSE in TYPE_III_IMMUNE_RESPONSE = 500000; Bcl_2_TYPE_III_IMMUNE_RESPONSE is "Bcl-2";  // substance in MWBUILTINUNIT_molecule
  substanceOnly species IFN_g_TYPE_III_IMMUNE_RESPONSE in TYPE_III_IMMUNE_RESPONSE = 60000;  // substance in MWBUILTINUNIT_molecule
  substanceOnly species $IFNgR in TYPE_III_IMMUNE_RESPONSE = 5000;  // substance in MWBUILTINUNIT_molecule
  substanceOnly species IFNg_complex in TYPE_III_IMMUNE_RESPONSE = 5000;  // substance in MWBUILTINUNIT_molecule
  substanceOnly species IL6_TC in TYPE_III_IMMUNE_RESPONSE = 200000;  // substance in MWBUILTINUNIT_molecule
  substanceOnly species $CD126 in TYPE_III_IMMUNE_RESPONSE = 10000;  // substance in MWBUILTINUNIT_molecule
  substanceOnly species IL6_complex in TYPE_III_IMMUNE_RESPONSE = 10000;  // substance in MWBUILTINUNIT_molecule
  substanceOnly species JAK1_JAK2 in TYPE_III_IMMUNE_RESPONSE = 19000; JAK1_JAK2 is "JAK1/JAK2";  // substance in MWBUILTINUNIT_molecule
  substanceOnly species C_EBP_b_d_TYPE_III_IMMUNE_RESPONSE in TYPE_III_IMMUNE_RESPONSE = 150000; C_EBP_b_d_TYPE_III_IMMUNE_RESPONSE is "C/EBP-b/d";  // substance in MWBUILTINUNIT_molecule
  substanceOnly species NFkB_TYPE_III_IMMUNE_RESPONSE in TYPE_III_IMMUNE_RESPONSE = 500000;  // substance in MWBUILTINUNIT_molecule
  substanceOnly species Survival_genes in TYPE_III_IMMUNE_RESPONSE = 400000;  // substance in MWBUILTINUNIT_molecule
  substanceOnly species AP1_TYPE_III_IMMUNE_RESPONSE in TYPE_III_IMMUNE_RESPONSE = 300000;  // substance in MWBUILTINUNIT_molecule
  substanceOnly species Inflammatory_gene in TYPE_III_IMMUNE_RESPONSE = 400000;  // substance in MWBUILTINUNIT_molecule
  substanceOnly species STAT_3_TYPE_III_IMMUNE_RESPONSE in TYPE_III_IMMUNE_RESPONSE = 150000;  // substance in MWBUILTINUNIT_molecule
  substanceOnly species HIF_a_gene in TYPE_III_IMMUNE_RESPONSE = 200000; HIF_a_gene is "HIF-a gene";  // substance in MWBUILTINUNIT_molecule
  substanceOnly species HIF_a in TYPE_III_IMMUNE_RESPONSE = 190000; HIF_a is "HIF-a";  // substance in MWBUILTINUNIT_molecule
  substanceOnly species VEGF_gene in TYPE_III_IMMUNE_RESPONSE = 250000;  // substance in MWBUILTINUNIT_molecule
  substanceOnly species PIC_gene in TYPE_III_IMMUNE_RESPONSE = 400000;  // substance in MWBUILTINUNIT_molecule
  substanceOnly species CCL_2_MONOCYTE_TO_M1_POLARIZATION in MONOCYTE_TO_M1_POLARIZATION = 208000; CCL_2_MONOCYTE_TO_M1_POLARIZATION is "CCL-2";  // substance in MWBUILTINUNIT_molecule
  substanceOnly species $CCR_2 in MONOCYTE_TO_M1_POLARIZATION = 5000; CCR_2 is "CCR-2";  // substance in MWBUILTINUNIT_molecule
  substanceOnly species CCL_2_complex in MONOCYTE_TO_M1_POLARIZATION = 5000; CCL_2_complex is "CCL-2 complex";  // substance in MWBUILTINUNIT_molecule
  substanceOnly species STAT_3_MONOCYTE_TO_M1_POLARIZATION in MONOCYTE_TO_M1_POLARIZATION = 135600;  // substance in MWBUILTINUNIT_molecule
  substanceOnly species C_EBP_b_gene in MONOCYTE_TO_M1_POLARIZATION = 150000; C_EBP_b_gene is "C/EBP-b gene";  // substance in MWBUILTINUNIT_molecule
  substanceOnly species C_EBP_b in MONOCYTE_TO_M1_POLARIZATION = 99000; C_EBP_b is "C/EBP-b";  // substance in MWBUILTINUNIT_molecule
  substanceOnly species Inflammatory_cytokine_gene in MONOCYTE_TO_M1_POLARIZATION = 110000;  // substance in MWBUILTINUNIT_molecule
  substanceOnly species IL_1b_MONOCYTE_TO_M1_POLARIZATION in MONOCYTE_TO_M1_POLARIZATION = 100000; IL_1b_MONOCYTE_TO_M1_POLARIZATION is "IL-1b";  // substance in MWBUILTINUNIT_molecule
  substanceOnly species IL_23_MONOCYTE_TO_M1_POLARIZATION in MONOCYTE_TO_M1_POLARIZATION = 100000; IL_23_MONOCYTE_TO_M1_POLARIZATION is "IL-23";  // substance in MWBUILTINUNIT_molecule
  substanceOnly species $IL_23_R_MONOCYTE_TO_M1_POLARIZATION in MONOCYTE_TO_M1_POLARIZATION = 10000; IL_23_R_MONOCYTE_TO_M1_POLARIZATION is "IL-23 R";  // substance in MWBUILTINUNIT_molecule
  substanceOnly species IL_23_complex_MONOCYTE_TO_M1_POLARIZATION in MONOCYTE_TO_M1_POLARIZATION = 10000; IL_23_complex_MONOCYTE_TO_M1_POLARIZATION is "IL-23 complex";  // substance in MWBUILTINUNIT_molecule
  substanceOnly species JAK2_TYK2 in MONOCYTE_TO_M1_POLARIZATION = 29800; JAK2_TYK2 is "JAK2/TYK2";  // substance in MWBUILTINUNIT_molecule
  substanceOnly species IL6_gene in MONOCYTE_TO_M1_POLARIZATION = 350000;  // substance in MWBUILTINUNIT_molecule
  substanceOnly species IL_6_MONOCYTE_TO_M1_POLARIZATION in MONOCYTE_TO_M1_POLARIZATION = 167400; IL_6_MONOCYTE_TO_M1_POLARIZATION is "IL-6";  // substance in MWBUILTINUNIT_molecule
  substanceOnly species Mo_IFNg in MONOCYTE_TO_M1_POLARIZATION = 60000;  // substance in MWBUILTINUNIT_molecule
  substanceOnly species $IFNgR1_R2 in MONOCYTE_TO_M1_POLARIZATION = 20000; IFNgR1_R2 is "IFNgR1/R2";  // substance in MWBUILTINUNIT_molecule
  substanceOnly species Mo_IFNg_complex in MONOCYTE_TO_M1_POLARIZATION = 20000;  // substance in MWBUILTINUNIT_molecule
  substanceOnly species Mo_JAK1_JAK2 in MONOCYTE_TO_M1_POLARIZATION = 38000; Mo_JAK1_JAK2 is "Mo_JAK1/JAK2";  // substance in MWBUILTINUNIT_molecule
  substanceOnly species Mo_IL17_A_F in MONOCYTE_TO_M1_POLARIZATION = 700000; Mo_IL17_A_F is "Mo_IL17 A/F";  // substance in MWBUILTINUNIT_molecule
  substanceOnly species $Mo_I7_RA_C in MONOCYTE_TO_M1_POLARIZATION = 20000; Mo_I7_RA_C is "Mo-I7 RA/C";  // substance in MWBUILTINUNIT_molecule
  substanceOnly species Mo_IL_17_complex in MONOCYTE_TO_M1_POLARIZATION = 20000;  // substance in MWBUILTINUNIT_molecule
  substanceOnly species Mo_Act_1 in MONOCYTE_TO_M1_POLARIZATION = 38000;  // substance in MWBUILTINUNIT_molecule
  substanceOnly species Mo_TRAF6 in MONOCYTE_TO_M1_POLARIZATION = 76000;  // substance in MWBUILTINUNIT_molecule
  substanceOnly species Mo_Tak_1 in MONOCYTE_TO_M1_POLARIZATION = 140000;  // substance in MWBUILTINUNIT_molecule
  substanceOnly species Mo_NEMO_complex in MONOCYTE_TO_M1_POLARIZATION = 200000;  // substance in MWBUILTINUNIT_molecule
  substanceOnly species Mo_C_EBP_b_d in MONOCYTE_TO_M1_POLARIZATION = 200000; Mo_C_EBP_b_d is "Mo_C/EBP-b/d";  // substance in MWBUILTINUNIT_molecule
  substanceOnly species Mo_MAPK in MONOCYTE_TO_M1_POLARIZATION = 200000;  // substance in MWBUILTINUNIT_molecule
  substanceOnly species Mo_NFkB in MONOCYTE_TO_M1_POLARIZATION = 300000;  // substance in MWBUILTINUNIT_molecule
  substanceOnly species Mo_AP1 in MONOCYTE_TO_M1_POLARIZATION = 300000;  // substance in MWBUILTINUNIT_molecule
  substanceOnly species DC_IFNg in DENDRITIC_CELL = 60000;  // substance in MWBUILTINUNIT_molecule
  substanceOnly species $DC_IFNgR1_R2 in DENDRITIC_CELL = 5000; DC_IFNgR1_R2 is "DC_IFNgR1/R2";  // substance in MWBUILTINUNIT_molecule
  substanceOnly species DC_IFNg_complex in DENDRITIC_CELL = 5000;  // substance in MWBUILTINUNIT_molecule
  substanceOnly species DC_JAK1_Tyk2 in DENDRITIC_CELL = 9000; DC_JAK1_Tyk2 is "DC_JAK1/Tyk2";  // substance in MWBUILTINUNIT_molecule
  substanceOnly species STAT1_DENDRITIC_CELL in DENDRITIC_CELL = 18000;  // substance in MWBUILTINUNIT_molecule
  substanceOnly species IL12_gene in DENDRITIC_CELL = 40000;  // substance in MWBUILTINUNIT_molecule
  substanceOnly species IL12_DENDRITIC_CELL in DENDRITIC_CELL = 35000;  // substance in MWBUILTINUNIT_molecule
  substanceOnly species IL12_NK_CELL in NK_CELL = 35000;  // substance in MWBUILTINUNIT_molecule
  substanceOnly species $IL_12_b1_b2 in NK_CELL = 5000; IL_12_b1_b2 is "IL 12 b1/b2";  // substance in MWBUILTINUNIT_molecule
  substanceOnly species IL_12_complex in NK_CELL = 5000;  // substance in MWBUILTINUNIT_molecule
  substanceOnly species NK_JAK2_Tyk2 in NK_CELL = 9000; NK_JAK2_Tyk2 is "NK_JAK2/Tyk2";  // substance in MWBUILTINUNIT_molecule
  substanceOnly species NK_STAT4 in NK_CELL = 18000;  // substance in MWBUILTINUNIT_molecule
  substanceOnly species NK_IFNg_gene in NK_CELL = 30000;  // substance in MWBUILTINUNIT_molecule
  substanceOnly species NK_IFNg in NK_CELL = 29000;  // substance in MWBUILTINUNIT_molecule
  substanceOnly species IL1b in MDSC = 100000;  // substance in MWBUILTINUNIT_molecule
  substanceOnly species $IL1b_R in MDSC = 10000;  // substance in MWBUILTINUNIT_molecule
  substanceOnly species IL1b_complex in MDSC = 10000;  // substance in MWBUILTINUNIT_molecule
  substanceOnly species JAK1 in MDSC = 19000;  // substance in MWBUILTINUNIT_molecule
  substanceOnly species STAT1_MDSC in MDSC = 38000;  // substance in MWBUILTINUNIT_molecule
  substanceOnly species TGF_b_MDSC in MDSC = 76000; TGF_b_MDSC is "TGF-b";  // substance in MWBUILTINUNIT_molecule
  substanceOnly species IL_10 in MDSC = 76000; IL_10 is "IL-10";  // substance in MWBUILTINUNIT_molecule
  substanceOnly species Suppressive_genes in MDSC = 80000;  // substance in MWBUILTINUNIT_molecule
  substanceOnly species IL4_IL13_MDSC in MDSC = 420000; IL4_IL13_MDSC is "IL4/ IL13";  // substance in MWBUILTINUNIT_molecule
  substanceOnly species $CD124 in MDSC = 10000;  // substance in MWBUILTINUNIT_molecule
  substanceOnly species IL4_13_complex_MDSC in MDSC = 10000; IL4_13_complex_MDSC is "IL4/13_complex";  // substance in MWBUILTINUNIT_molecule
  substanceOnly species JAK1_3_Tyk_2 in MDSC = 19000; JAK1_3_Tyk_2 is "JAK1/3-Tyk 2";  // substance in MWBUILTINUNIT_molecule
  substanceOnly species STAT6_MDSC in MDSC = 38000;  // substance in MWBUILTINUNIT_molecule
  substanceOnly species M_VEGF in MDSC = 280000;  // substance in MWBUILTINUNIT_molecule
  substanceOnly species $VEGF_R in MDSC = 10000;  // substance in MWBUILTINUNIT_molecule
  substanceOnly species VEGF_complex in MDSC = 10000;  // substance in MWBUILTINUNIT_molecule
  substanceOnly species Erk in MDSC = 19000;  // substance in MWBUILTINUNIT_molecule
  substanceOnly species Cyclin_D1_MDSC in MDSC = 38000;  // substance in MWBUILTINUNIT_molecule
  substanceOnly species Bcl_xL_MDSC in MDSC = 38000; Bcl_xL_MDSC is "Bcl-xL";  // substance in MWBUILTINUNIT_molecule
  substanceOnly species c_myc_MDSC in MDSC = 38000; c_myc_MDSC is "c-myc";  // substance in MWBUILTINUNIT_molecule
  substanceOnly species Survival_gene in MDSC = 40000;  // substance in MWBUILTINUNIT_molecule
  substanceOnly species IL_23_T_CELL_MEDIATED_IMMUNE_RESPONSE in T_CELL_MEDIATED_IMMUNE_RESPONSE = 100000;  // substance in MWBUILTINUNIT_molecule
  substanceOnly species $IL_23_R_T_CELL_MEDIATED_IMMUNE_RESPONSE in T_CELL_MEDIATED_IMMUNE_RESPONSE = 15000; IL_23_R_T_CELL_MEDIATED_IMMUNE_RESPONSE is "IL-23 R";  // substance in MWBUILTINUNIT_molecule
  substanceOnly species IL_23_complex_T_CELL_MEDIATED_IMMUNE_RESPONSE in T_CELL_MEDIATED_IMMUNE_RESPONSE = 15000;  // substance in MWBUILTINUNIT_molecule
  substanceOnly species JAK_2_TYK_2 in T_CELL_MEDIATED_IMMUNE_RESPONSE = 44000; JAK_2_TYK_2 is "JAK 2/TYK 2";  // substance in MWBUILTINUNIT_molecule
  substanceOnly species STAT_4 in T_CELL_MEDIATED_IMMUNE_RESPONSE = 85000;  // substance in MWBUILTINUNIT_molecule
  substanceOnly species STAT_3_T_CELL_MEDIATED_IMMUNE_RESPONSE in T_CELL_MEDIATED_IMMUNE_RESPONSE = 477000;  // substance in MWBUILTINUNIT_molecule
  substanceOnly species IFN_g_T_CELL_MEDIATED_IMMUNE_RESPONSE in T_CELL_MEDIATED_IMMUNE_RESPONSE = 110000; IFN_g_T_CELL_MEDIATED_IMMUNE_RESPONSE is "IFN-g";  // substance in MWBUILTINUNIT_molecule
  substanceOnly species IFN_g_gene in T_CELL_MEDIATED_IMMUNE_RESPONSE = 90000; IFN_g_gene is "IFN-g gene";  // substance in MWBUILTINUNIT_molecule
  substanceOnly species RORgt_gene in T_CELL_MEDIATED_IMMUNE_RESPONSE = 500000;  // substance in MWBUILTINUNIT_molecule
  substanceOnly species RORgt in T_CELL_MEDIATED_IMMUNE_RESPONSE = 495000;  // substance in MWBUILTINUNIT_molecule
  substanceOnly species Th_17 in T_CELL_MEDIATED_IMMUNE_RESPONSE = 370000;  // substance in MWBUILTINUNIT_molecule
  substanceOnly species IL_17A_F in T_CELL_MEDIATED_IMMUNE_RESPONSE = 730000; IL_17A_F is "IL 17A/F";  // substance in MWBUILTINUNIT_molecule
  substanceOnly species IL_6_T_CELL_MEDIATED_IMMUNE_RESPONSE in T_CELL_MEDIATED_IMMUNE_RESPONSE = 730000;  // substance in MWBUILTINUNIT_molecule
  substanceOnly species Naive_CD4_cell in T_CELL_MEDIATED_IMMUNE_RESPONSE = 900000; Naive_CD4_cell is "Naive CD4+ cell";  // substance in MWBUILTINUNIT_molecule
  substanceOnly species IL12_T_CELL_MEDIATED_IMMUNE_RESPONSE in T_CELL_MEDIATED_IMMUNE_RESPONSE = 35000;  // substance in MWBUILTINUNIT_molecule
  substanceOnly species $IL12_B1_B2 in T_CELL_MEDIATED_IMMUNE_RESPONSE = 5000; IL12_B1_B2 is "IL12 B1/B2";  // substance in MWBUILTINUNIT_molecule
  substanceOnly species Th_IL_12_complex in T_CELL_MEDIATED_IMMUNE_RESPONSE = 5000;  // substance in MWBUILTINUNIT_molecule
  substanceOnly species T_bet in T_CELL_MEDIATED_IMMUNE_RESPONSE = 64000; T_bet is "T-bet";  // substance in MWBUILTINUNIT_molecule
  substanceOnly species Th1_phenotype in T_CELL_MEDIATED_IMMUNE_RESPONSE = 110000;  // substance in MWBUILTINUNIT_molecule
  substanceOnly species Immune_Response in T_CELL_MEDIATED_IMMUNE_RESPONSE = 58000;  // substance in MWBUILTINUNIT_molecule
  substanceOnly species T_bet_gene in T_CELL_MEDIATED_IMMUNE_RESPONSE = 90000; T_bet_gene is "T-bet gene";  // substance in MWBUILTINUNIT_molecule
  substanceOnly species CD8_T_cell in T_CELL_MEDIATED_IMMUNE_RESPONSE = 9000; CD8_T_cell is "CD8+ T cell";  // substance in MWBUILTINUNIT_molecule
  substanceOnly species Th_IL6 in T_CELL_MEDIATED_IMMUNE_RESPONSE = 432000;  // substance in MWBUILTINUNIT_molecule
  substanceOnly species $IL6R_T_CELL_MEDIATED_IMMUNE_RESPONSE in T_CELL_MEDIATED_IMMUNE_RESPONSE = 100000;  // substance in MWBUILTINUNIT_molecule
  substanceOnly species Th_IL6_complex in T_CELL_MEDIATED_IMMUNE_RESPONSE = 100000;  // substance in MWBUILTINUNIT_molecule
  substanceOnly species JAK_1_JAK_2 in T_CELL_MEDIATED_IMMUNE_RESPONSE = 198000; JAK_1_JAK_2 is "JAK 1/JAK 2";  // substance in MWBUILTINUNIT_molecule
  substanceOnly species IL_4_IL_13 in T_CELL_MEDIATED_IMMUNE_RESPONSE = 420000; IL_4_IL_13 is "IL 4/IL 13";  // substance in MWBUILTINUNIT_molecule
  substanceOnly species $IL4_13_Ra_Ra1 in T_CELL_MEDIATED_IMMUNE_RESPONSE = 50000; IL4_13_Ra_Ra1 is "IL4/13 Ra/Ra1";  // substance in MWBUILTINUNIT_molecule
  substanceOnly species IL4_13_complex_T_CELL_MEDIATED_IMMUNE_RESPONSE in T_CELL_MEDIATED_IMMUNE_RESPONSE = 50000; IL4_13_complex_T_CELL_MEDIATED_IMMUNE_RESPONSE is "IL4/13 complex";  // substance in MWBUILTINUNIT_molecule
  substanceOnly species JAK1_3_Tyk2 in T_CELL_MEDIATED_IMMUNE_RESPONSE = 99000; JAK1_3_Tyk2 is "JAK1/3-Tyk2";  // substance in MWBUILTINUNIT_molecule
  substanceOnly species STAT_6 in T_CELL_MEDIATED_IMMUNE_RESPONSE = 190000;  // substance in MWBUILTINUNIT_molecule
  substanceOnly species GATA_3 in T_CELL_MEDIATED_IMMUNE_RESPONSE = 249000;  // substance in MWBUILTINUNIT_molecule
  substanceOnly species GATA_3_gene in T_CELL_MEDIATED_IMMUNE_RESPONSE = 250000;  // substance in MWBUILTINUNIT_molecule
  substanceOnly species Th2 in T_CELL_MEDIATED_IMMUNE_RESPONSE = 312000;  // substance in MWBUILTINUNIT_molecule
  substanceOnly species Tumor_progression in T_CELL_MEDIATED_IMMUNE_RESPONSE = 249000;  // substance in MWBUILTINUNIT_molecule
  substanceOnly species TGF_b_T_CELL_MEDIATED_IMMUNE_RESPONSE in T_CELL_MEDIATED_IMMUNE_RESPONSE = 76000; TGF_b_T_CELL_MEDIATED_IMMUNE_RESPONSE is "TGF- b";  // substance in MWBUILTINUNIT_molecule
  substanceOnly species $TGF_b_R in T_CELL_MEDIATED_IMMUNE_RESPONSE = 10000; TGF_b_R is "TGF-b R";  // substance in MWBUILTINUNIT_molecule
  substanceOnly species TGF_b_complex in T_CELL_MEDIATED_IMMUNE_RESPONSE = 10000; TGF_b_complex is "TGF-b complex";  // substance in MWBUILTINUNIT_molecule
  substanceOnly species Smad_2_3 in T_CELL_MEDIATED_IMMUNE_RESPONSE = 19000; Smad_2_3 is "Smad 2/3";  // substance in MWBUILTINUNIT_molecule
  substanceOnly species Smad_4 in T_CELL_MEDIATED_IMMUNE_RESPONSE = 38000;  // substance in MWBUILTINUNIT_molecule
  substanceOnly species Smad_4_gene in T_CELL_MEDIATED_IMMUNE_RESPONSE = 60000;  // substance in MWBUILTINUNIT_molecule
  substanceOnly species FoxP3_gene in T_CELL_MEDIATED_IMMUNE_RESPONSE = 80000;  // substance in MWBUILTINUNIT_molecule
  substanceOnly species FoxP3 in T_CELL_MEDIATED_IMMUNE_RESPONSE = 74000;  // substance in MWBUILTINUNIT_molecule
  substanceOnly species Treg in T_CELL_MEDIATED_IMMUNE_RESPONSE = 49000;  // substance in MWBUILTINUNIT_molecule
  substanceOnly species Immune_tolerance in T_CELL_MEDIATED_IMMUNE_RESPONSE = 340000;  // substance in MWBUILTINUNIT_molecule
  substanceOnly species Arginase in T_CELL_MEDIATED_IMMUNE_RESPONSE = 76000;  // substance in MWBUILTINUNIT_molecule
  substanceOnly species iNOS in T_CELL_MEDIATED_IMMUNE_RESPONSE = 76000;  // substance in MWBUILTINUNIT_molecule
  substanceOnly species IL10 in T_CELL_MEDIATED_IMMUNE_RESPONSE = 50000;  // substance in MWBUILTINUNIT_molecule
  substanceOnly species IL4_IL13_M2_MACROPHAGE in M2_MACROPHAGE = 420000; IL4_IL13_M2_MACROPHAGE is "IL4/IL13";  // substance in MWBUILTINUNIT_molecule
  substanceOnly species $IL4_13_R in M2_MACROPHAGE = 10000; IL4_13_R is "IL4/13 R";  // substance in MWBUILTINUNIT_molecule
  substanceOnly species IL4_IL13_complex in M2_MACROPHAGE = 10000; IL4_IL13_complex is "IL4/IL13 complex";  // substance in MWBUILTINUNIT_molecule
  substanceOnly species JAK_1_3_Tyk2 in M2_MACROPHAGE = 10500; JAK_1_3_Tyk2 is "JAK 1/3-Tyk2";  // substance in MWBUILTINUNIT_molecule
  substanceOnly species STAT6_M2_MACROPHAGE in M2_MACROPHAGE = 21200;  // substance in MWBUILTINUNIT_molecule
  substanceOnly species GATA3_gene in M2_MACROPHAGE = 50000;  // substance in MWBUILTINUNIT_molecule
  substanceOnly species GATA3 in M2_MACROPHAGE = 40000;  // substance in MWBUILTINUNIT_molecule
  substanceOnly species M2_homeostasis in M2_MACROPHAGE = 79900;  // substance in MWBUILTINUNIT_molecule
  substanceOnly species M2_IL17A_F in M2_MACROPHAGE = 700000; M2_IL17A_F is "M2_IL17A/F";  // substance in MWBUILTINUNIT_molecule
  substanceOnly species $M2_IL17A_F_R in M2_MACROPHAGE = 10000; M2_IL17A_F_R is "M2_IL17A/F R";  // substance in MWBUILTINUNIT_molecule
  substanceOnly species IL_17A_F_complex in M2_MACROPHAGE = 10000; IL_17A_F_complex is "IL 17A//F complex";  // substance in MWBUILTINUNIT_molecule
  substanceOnly species Act1 in M2_MACROPHAGE = 19000;  // substance in MWBUILTINUNIT_molecule
  substanceOnly species M2_TRAF6 in M2_MACROPHAGE = 50000;  // substance in MWBUILTINUNIT_molecule
  substanceOnly species M2_Tak1 in M2_MACROPHAGE = 97000;  // substance in MWBUILTINUNIT_molecule
  substanceOnly species Nemo_complex_M2_MACROPHAGE in M2_MACROPHAGE = 290000; Nemo_complex_M2_MACROPHAGE is "Nemo-complex";  // substance in MWBUILTINUNIT_molecule
  substanceOnly species C_EBP_b_d_M2_MACROPHAGE in M2_MACROPHAGE = 190000; C_EBP_b_d_M2_MACROPHAGE is "C-EBP_b/d";  // substance in MWBUILTINUNIT_molecule
  substanceOnly species M2_Erk1_2 in M2_MACROPHAGE = 380000; M2_Erk1_2 is "M2_Erk1/2";  // substance in MWBUILTINUNIT_molecule
  substanceOnly species AP_1 in M2_MACROPHAGE = 350000;  // substance in MWBUILTINUNIT_molecule
  substanceOnly species M2_NFkB in M2_MACROPHAGE = 520000;  // substance in MWBUILTINUNIT_molecule
  substanceOnly species PSM_gene in M2_MACROPHAGE = 500000;  // substance in MWBUILTINUNIT_molecule
  substanceOnly species M2_VEGF in M2_MACROPHAGE = 149000;  // substance in MWBUILTINUNIT_molecule
  substanceOnly species Bcl_xL_M2_MACROPHAGE in M2_MACROPHAGE = 149000; Bcl_xL_M2_MACROPHAGE is "Bcl- xL";  // substance in MWBUILTINUNIT_molecule
  substanceOnly species Bcl_2_M2_MACROPHAGE in M2_MACROPHAGE = 149000; Bcl_2_M2_MACROPHAGE is "Bcl- 2";  // substance in MWBUILTINUNIT_molecule
  substanceOnly species cyclin_D1 in M2_MACROPHAGE = 149000;  // substance in MWBUILTINUNIT_molecule
  substanceOnly species c_myc_M2_MACROPHAGE in M2_MACROPHAGE = 149000; c_myc_M2_MACROPHAGE is "c- myc";  // substance in MWBUILTINUNIT_molecule
  substanceOnly species LPS_M2_MACROPHAGE in M2_MACROPHAGE = 1500;  // substance in MWBUILTINUNIT_molecule
  substanceOnly species $TLR4 in M2_MACROPHAGE = 1500;  // substance in MWBUILTINUNIT_molecule
  substanceOnly species LPS_TLR4_complex in M2_MACROPHAGE = 1500;  // substance in MWBUILTINUNIT_molecule
  substanceOnly species Myd88 in M2_MACROPHAGE = 2980;  // substance in MWBUILTINUNIT_molecule
  substanceOnly species IRAK1_4 in M2_MACROPHAGE = 5900; IRAK1_4 is "IRAK1/4";  // substance in MWBUILTINUNIT_molecule
  substanceOnly species M_CSF_M2_MACROPHAGE in M2_MACROPHAGE = 208000; M_CSF_M2_MACROPHAGE is "M- CSF";  // substance in MWBUILTINUNIT_molecule
  substanceOnly species $M_CSF_R in M2_MACROPHAGE = 10000; M_CSF_R is "M-CSF R";  // substance in MWBUILTINUNIT_molecule
  substanceOnly species M_CSF_complex in M2_MACROPHAGE = 10000; M_CSF_complex is "M-CSF complex";  // substance in MWBUILTINUNIT_molecule
  substanceOnly species PI3k in M2_MACROPHAGE = 200000;  // substance in MWBUILTINUNIT_molecule
  substanceOnly species AKt in M2_MACROPHAGE = 386000;  // substance in MWBUILTINUNIT_molecule
  substanceOnly species Nlrp3_gene in M2_MACROPHAGE = 500000;  // substance in MWBUILTINUNIT_molecule
  substanceOnly species Nlrp3_complex in M2_MACROPHAGE = 330000;  // substance in MWBUILTINUNIT_molecule
  substanceOnly species Nlrp3 in M2_MACROPHAGE = 480000;  // substance in MWBUILTINUNIT_molecule
  substanceOnly species $ASC in M2_MACROPHAGE = 480000;  // substance in MWBUILTINUNIT_molecule
  substanceOnly species $Pro_caspase_1 in M2_MACROPHAGE = 480000; Pro_caspase_1 is "Pro-caspase 1";  // substance in MWBUILTINUNIT_molecule
  substanceOnly species PC_gene in M2_MACROPHAGE = 200000;  // substance in MWBUILTINUNIT_molecule
  substanceOnly species IL_1b_M2_MACROPHAGE in M2_MACROPHAGE = 800000; IL_1b_M2_MACROPHAGE is "IL- 1b";  // substance in MWBUILTINUNIT_molecule
  substanceOnly species IL_18 in M2_MACROPHAGE = 800000; IL_18 is "IL-18";  // substance in MWBUILTINUNIT_molecule
  substanceOnly species Capase_1 in M2_MACROPHAGE = 660000;  // substance in MWBUILTINUNIT_molecule
  substanceOnly species Chronic_Inflammation in M2_MACROPHAGE = 690000;  // substance in MWBUILTINUNIT_molecule
  substanceOnly species IL_6_M2_MACROPHAGE in M2_MACROPHAGE = 435000;  // substance in MWBUILTINUNIT_molecule
  substanceOnly species $IL6R_M2_MACROPHAGE in M2_MACROPHAGE = 100000;  // substance in MWBUILTINUNIT_molecule
  substanceOnly species IL6_com in M2_MACROPHAGE = 100000;  // substance in MWBUILTINUNIT_molecule
  substanceOnly species MKK4_7 in M2_MACROPHAGE = 190000; MKK4_7 is "MKK4/7";  // substance in MWBUILTINUNIT_molecule
  substanceOnly species JNk in M2_MACROPHAGE = 300000;  // substance in MWBUILTINUNIT_molecule
  substanceOnly species Autophagy_genes in M2_MACROPHAGE = 950000;  // substance in MWBUILTINUNIT_molecule
  substanceOnly species Beclin_1 in M2_MACROPHAGE = 860000; Beclin_1 is "Beclin-1";  // substance in MWBUILTINUNIT_molecule
  substanceOnly species Atg_5 in M2_MACROPHAGE = 460000;  // substance in MWBUILTINUNIT_molecule
  substanceOnly species LC3II in M2_MACROPHAGE = 900000;  // substance in MWBUILTINUNIT_molecule
  substanceOnly species ATG_3 in M2_MACROPHAGE = 280000;  // substance in MWBUILTINUNIT_molecule
  substanceOnly species ULK1_2 in M2_MACROPHAGE = 360000; ULK1_2 is "ULK1/2";  // substance in MWBUILTINUNIT_molecule
  substanceOnly species ATG_12 in M2_MACROPHAGE = 350000;  // substance in MWBUILTINUNIT_molecule
  substanceOnly species ATG_7 in M2_MACROPHAGE = 175000;  // substance in MWBUILTINUNIT_molecule
  substanceOnly species VPS_34_15 in M2_MACROPHAGE = 78000; VPS_34_15 is "VPS 34/15";  // substance in MWBUILTINUNIT_molecule
  substanceOnly species $FIP200 in M2_MACROPHAGE = 150000;  // substance in MWBUILTINUNIT_molecule
  substanceOnly species $ATG_13 in M2_MACROPHAGE = 150000;  // substance in MWBUILTINUNIT_molecule
  substanceOnly species ULK_complex in M2_MACROPHAGE = 50000;  // substance in MWBUILTINUNIT_molecule
  substanceOnly species $ATG_14L in M2_MACROPHAGE = 100000;  // substance in MWBUILTINUNIT_molecule
  substanceOnly species $Ambra1 in M2_MACROPHAGE = 100000;  // substance in MWBUILTINUNIT_molecule
  substanceOnly species $UVRAG in M2_MACROPHAGE = 100000;  // substance in MWBUILTINUNIT_molecule
  substanceOnly species PI3KC3_complex in M2_MACROPHAGE = 75000;  // substance in MWBUILTINUNIT_molecule
  substanceOnly species $Bcl2_Beclin_complex in M2_MACROPHAGE = 100000; Bcl2_Beclin_complex is "Bcl2/Beclin complex";  // substance in MWBUILTINUNIT_molecule
  substanceOnly species Phagophore in M2_MACROPHAGE = 52000;  // substance in MWBUILTINUNIT_molecule
  substanceOnly species $ATG_10 in M2_MACROPHAGE = 150000;  // substance in MWBUILTINUNIT_molecule
  substanceOnly species $ATG_16L in M2_MACROPHAGE = 150000;  // substance in MWBUILTINUNIT_molecule
  substanceOnly species ATGs_complex in M2_MACROPHAGE = 140000;  // substance in MWBUILTINUNIT_molecule
  substanceOnly species $ATG_4B in M2_MACROPHAGE = 150000;  // substance in MWBUILTINUNIT_molecule
  substanceOnly species $Pro_LC3 in M2_MACROPHAGE = 150000; Pro_LC3 is "Pro-LC3";  // substance in MWBUILTINUNIT_molecule
  substanceOnly species Autophagosome in M2_MACROPHAGE = 101000;  // substance in MWBUILTINUNIT_molecule
  substanceOnly species $Lysosome in M2_MACROPHAGE = 100000;  // substance in MWBUILTINUNIT_molecule
  substanceOnly species Autolysosome in M2_MACROPHAGE = 99000;  // substance in MWBUILTINUNIT_molecule
  substanceOnly species Autophagy in M2_MACROPHAGE = 195000;  // substance in MWBUILTINUNIT_molecule

  // Reactions:
  _1: $LPS_TUMOR_CELL + $TLR_4 => LPs_TLR_complex; _1_kforward*LPS_TUMOR_CELL*TLR_4;
    _1_kforward = 6.69e-6 MWDERIVEDUNIT_1__molecule_second;
  _2: LPs_TLR_complex => Myd88_TIRAP + TRIF_TRAM; _2_Vm1*LPs_TLR_complex/(_2_Km1 + LPs_TLR_complex);
    _2_Vm1 = 34 MWDERIVEDUNIT_molecule__second; _2_Km1 = 17 MWBUILTINUNIT_molecule;
  _3: $IL_1B + $IL_1B_R => IL_1B_complex; _3_kforward*IL_1B*IL_1B_R;
    _3_kforward = 6.69e-6 MWDERIVEDUNIT_1__molecule_second;
  _4: IL_1B_complex => Myd88_TIRAP; _4_Vm1*IL_1B_complex/(_4_Km1 + IL_1B_complex);
    _4_Vm1 = 34 MWDERIVEDUNIT_molecule__second; _4_Km1 = 17 MWBUILTINUNIT_molecule;
  _5: Myd88_TIRAP => Irak_1_4; _5_Vm1*Myd88_TIRAP/(_5_Km1 + Myd88_TIRAP);
    _5_Vm1 = 180 MWDERIVEDUNIT_molecule__second; _5_Km1 = 90 MWBUILTINUNIT_molecule;
  _6: Irak_1_4 => TRAF_6; _6_Vm1*Irak_1_4/(_6_Km1 + Irak_1_4);
    _6_Vm1 = 230 MWDERIVEDUNIT_molecule__second; _6_Km1 = 115 MWBUILTINUNIT_molecule;
  _7: TRIF_TRAM => TRAF_6; _7_Vm1*TRIF_TRAM/(_7_Km1 + TRIF_TRAM);
    _7_Vm1 = 62 MWDERIVEDUNIT_molecule__second; _7_Km1 = 31 MWBUILTINUNIT_molecule;
  _8: TRAF_6 => Tak1; _8_Vm1*TRAF_6/(_8_Km1 + TRAF_6);
    _8_Vm1 = 620 MWDERIVEDUNIT_molecule__second; _8_Km1 = 310 MWBUILTINUNIT_molecule;
  _9: Tak1 => NEMO_complex + MKK; _9_Vm1*Tak1/(_9_Km1 + Tak1);
    _9_Vm1 = 1000 MWDERIVEDUNIT_molecule__second; _9_Km1 = 500 MWBUILTINUNIT_molecule;
  _10: MKK => Erk1_2 + p38 + JNK + Irf3; _10_Vm1*MKK/(_10_Km1 + MKK);
    _10_Vm1 = 1838 MWDERIVEDUNIT_molecule__second; _10_Km1 = 919 MWBUILTINUNIT_molecule;
  _11: NEMO_complex => NFkB_TUMOR_CELL; _11_Vm1*NEMO_complex/(_11_Km1 + NEMO_complex);
    _11_Vm1 = 1840 MWDERIVEDUNIT_molecule__second; _11_Km1 = 920 MWBUILTINUNIT_molecule;
  _12: Erk1_2 => AP1_TUMOR_CELL; _12_Vm1*Erk1_2/(_12_Km1 + Erk1_2);
    _12_Vm1 = 650 MWDERIVEDUNIT_molecule__second; _12_Km1 = 325 MWBUILTINUNIT_molecule;
  _13: Pro_inflammatory_cytokine_gene + NFkB_TUMOR_CELL + Irf3 + AP1_TUMOR_CELL => PDGF_b + CCL_2_TUMOR_CELL + TNFa + IL_6_TC + VEGF_TUMOR_CELL + M_CSF_TUMOR_CELL + NFkB_TUMOR_CELL + AP1_TUMOR_CELL + Irf3; _13_Vm1*Pro_inflammatory_cytokine_gene^_13_n/(_13_Kp1 + Pro_inflammatory_cytokine_gene^_13_n);
    _13_Vm1 = 2100 MWDERIVEDUNIT_molecule__second; _13_n = 1; _13_Kp1 = 1050 MWBUILTINUNIT_molecule;
  _14: PDGF_b => PDGF; _14_kforward*PDGF_b;
    _14_kforward = 0.01 MWDERIVEDUNIT_1__second;
  _15: PDGF + $PDGF_R => PDGF_complex + PDGF; Kforward*PDGF*PDGF_R;
    Kforward = 3.319e-8 MWDERIVEDUNIT_1__molecule_second;
  _16: PDGF_complex => PI3K; _16_Vm1*PDGF_complex/(_16_Km1 + PDGF_complex);
    _16_Vm1 = 110 MWDERIVEDUNIT_molecule__second; _16_Km1 = 55 MWBUILTINUNIT_molecule;
  _17: PI3K => Akt; _17_Vm1*PI3K/(_17_Km1 + PI3K);
    _17_Vm1 = 400 MWDERIVEDUNIT_molecule__second; _17_Km1 = 200 MWBUILTINUNIT_molecule;
  _18: Akt => mTOR + Nemo_complex_TYPE_III_IMMUNE_RESPONSE; _18_Vm1*Akt/(_18_Km1 + Akt);
    _18_Vm1 = 620 MWDERIVEDUNIT_molecule__second; _18_Km1 = 310 MWBUILTINUNIT_molecule;
  _19: mTOR => STAT_3_TYPE_III_IMMUNE_RESPONSE; _19_Vm1*mTOR/(_19_Km1 + mTOR);
    _19_Vm1 = 1200 MWDERIVEDUNIT_molecule__second; _19_Km1 = 600 MWBUILTINUNIT_molecule;
  _20: STAT_3_TYPE_III_IMMUNE_RESPONSE + HIF_a_gene => HIF_a + STAT_3_TYPE_III_IMMUNE_RESPONSE; _20_Vm1*HIF_a_gene^_20_n/(_20_Kp1 + HIF_a_gene^_20_n);
    _20_Vm1 = 2000 MWDERIVEDUNIT_molecule__second; _20_n = 1; _20_Kp1 = 1000 MWBUILTINUNIT_molecule;
  _21: HIF_a + VEGF_gene => VEGF_TYPE_III_IMMUNE_RESPONSE + HIF_a; _21_Vm1*VEGF_gene^_21_n/(_21_Kp1 + VEGF_gene^_21_n);
    _21_Vm1 = 1600 MWDERIVEDUNIT_molecule__second; _21_n = 1; _21_Kp1 = 800 MWBUILTINUNIT_molecule;
  _22: TNFa => TNF_a; _22_kforward*TNFa;
    _22_kforward = 0.01 MWDERIVEDUNIT_1__second;
  _23: TNF_a + $TNF_a_R => TNF_a_complex + TNF_a; _23_kforward*TNF_a*TNF_a_R;
    _23_kforward = 8e-9 MWDERIVEDUNIT_1__molecule_second;
  _24: TNF_a_complex => JN_Kinase + Nemo_complex_TYPE_III_IMMUNE_RESPONSE; _24_Vm1*TNF_a_complex/(_24_Km1 + TNF_a_complex);
    _24_Vm1 = 150 MWDERIVEDUNIT_molecule__second; _24_Km1 = 75 MWBUILTINUNIT_molecule;
  _25: JN_Kinase => NFkB_TYPE_III_IMMUNE_RESPONSE; _25_Vm1*JN_Kinase/(_25_Km1 + JN_Kinase);
    _25_Vm1 = 180 MWDERIVEDUNIT_molecule__second; _25_Km1 = 90 MWBUILTINUNIT_molecule;
  _27: CCL_2_TUMOR_CELL => CCL_2_MONOCYTE_TO_M1_POLARIZATION; _27_kforward*CCL_2_TUMOR_CELL;
    _27_kforward = 0.01 MWDERIVEDUNIT_1__second;
  _28: CCL_2_MONOCYTE_TO_M1_POLARIZATION + $CCR_2 => CCL_2_complex + CCL_2_MONOCYTE_TO_M1_POLARIZATION; _28_kforward*CCL_2_MONOCYTE_TO_M1_POLARIZATION*CCR_2;
    _28_kforward = 3.231e-8 MWDERIVEDUNIT_1__molecule_second;
  _29: CCL_2_complex => JAK2_TYK2; _29_Vm1*CCL_2_complex/(_29_Km1 + CCL_2_complex);
    _29_Vm1 = 110 MWDERIVEDUNIT_molecule__second; _29_Km1 = 55;
  _30: STAT_3_MONOCYTE_TO_M1_POLARIZATION + C_EBP_b_gene => C_EBP_b + STAT_3_MONOCYTE_TO_M1_POLARIZATION; _30_Vm1*C_EBP_b_gene^_30_n/(_30_Kp1 + C_EBP_b_gene^_30_n);
    _30_Vm1 = 1000 MWDERIVEDUNIT_molecule__second; _30_n = 1; _30_Kp1 = 500 MWBUILTINUNIT_molecule;
  _31: C_EBP_b + Inflammatory_cytokine_gene => IL_1b_MONOCYTE_TO_M1_POLARIZATION + IL_23_MONOCYTE_TO_M1_POLARIZATION + C_EBP_b; _31_Vm1*Inflammatory_cytokine_gene^_31_n/(_31_Kp1 + Inflammatory_cytokine_gene^_31_n);
    _31_Vm1 = 1100 MWDERIVEDUNIT_molecule__second; _31_n = 1; _31_Kp1 = 550 MWBUILTINUNIT_molecule;
  _32: IL_23_MONOCYTE_TO_M1_POLARIZATION + $IL_23_R_MONOCYTE_TO_M1_POLARIZATION => IL_23_complex_MONOCYTE_TO_M1_POLARIZATION + IL_23_MONOCYTE_TO_M1_POLARIZATION; _32_kforward*IL_23_MONOCYTE_TO_M1_POLARIZATION*IL_23_R_MONOCYTE_TO_M1_POLARIZATION;
    _32_kforward = 1.0278e-7 MWDERIVEDUNIT_1__molecule_second;
  _33: IL_23_complex_MONOCYTE_TO_M1_POLARIZATION => JAK2_TYK2; Vm*IL_23_complex_MONOCYTE_TO_M1_POLARIZATION/(Km + IL_23_complex_MONOCYTE_TO_M1_POLARIZATION);
    Vm = 220 MWDERIVEDUNIT_molecule__second; Km = 110 MWBUILTINUNIT_molecule;
  _34: JAK2_TYK2 => STAT_3_MONOCYTE_TO_M1_POLARIZATION; _34_Vm1*JAK2_TYK2/(_34_Km1 + JAK2_TYK2);
    _34_Vm1 = 620 MWDERIVEDUNIT_molecule__second; _34_Km1 = 310 MWBUILTINUNIT_molecule;
  _35: IL_23_MONOCYTE_TO_M1_POLARIZATION => IL_23_T_CELL_MEDIATED_IMMUNE_RESPONSE; _35_kforward*IL_23_MONOCYTE_TO_M1_POLARIZATION;
    _35_kforward = 0.0106019 MWDERIVEDUNIT_1__second;
  _36: IL_23_T_CELL_MEDIATED_IMMUNE_RESPONSE + $IL_23_R_T_CELL_MEDIATED_IMMUNE_RESPONSE => IL_23_complex_T_CELL_MEDIATED_IMMUNE_RESPONSE + IL_23_T_CELL_MEDIATED_IMMUNE_RESPONSE; _36_kforward*IL_23_T_CELL_MEDIATED_IMMUNE_RESPONSE*IL_23_R_T_CELL_MEDIATED_IMMUNE_RESPONSE;
    _36_kforward = 6.5e-9 MWDERIVEDUNIT_1__molecule_second;
  _37: IL_23_complex_T_CELL_MEDIATED_IMMUNE_RESPONSE => JAK_2_TYK_2; _37_Vm1*IL_23_complex_T_CELL_MEDIATED_IMMUNE_RESPONSE/(_37_Km1 + IL_23_complex_T_CELL_MEDIATED_IMMUNE_RESPONSE);
    _37_Vm1 = 400 MWDERIVEDUNIT_molecule__second; _37_Km1 = 200 MWBUILTINUNIT_molecule;
  _38: JAK_2_TYK_2 => STAT_3_T_CELL_MEDIATED_IMMUNE_RESPONSE + STAT_4; _38_Vm1*JAK_2_TYK_2/(_38_Km1 + JAK_2_TYK_2);
    _38_Vm1 = 700 MWDERIVEDUNIT_molecule__second; _38_Km1 = 350 MWBUILTINUNIT_molecule;
  _39: STAT_4 + IFN_g_gene => IFN_g_T_CELL_MEDIATED_IMMUNE_RESPONSE + STAT_4; _39_Vm1*IFN_g_gene^_39_n/(_39_Kp1 + IFN_g_gene^_39_n);
    _39_Vm1 = 900 MWDERIVEDUNIT_molecule__second; _39_n = 1; _39_Kp1 = 450 MWBUILTINUNIT_molecule;
  _40: STAT_3_T_CELL_MEDIATED_IMMUNE_RESPONSE + RORgt_gene => RORgt + STAT_3_T_CELL_MEDIATED_IMMUNE_RESPONSE; _40_Vm1*RORgt_gene^_40_n/(_40_Kp1 + RORgt_gene^_40_n);
    _40_Vm1 = 5100 MWDERIVEDUNIT_molecule__second; _40_n = 1; _40_Kp1 = 2550 MWBUILTINUNIT_molecule;
  _41: RORgt + Naive_CD4_cell => Th_17 + RORgt; _41_Vm1*Naive_CD4_cell^n1/(_41_Kp1 + Naive_CD4_cell^n1);
    _41_Kp1 = 1900 MWBUILTINUNIT_molecule; _41_Vm1 = 3800 MWDERIVEDUNIT_molecule__second; n1 = 1;
  _42: Th_17 => IL_17A_F + IL_6_T_CELL_MEDIATED_IMMUNE_RESPONSE; _42_Vm1*Th_17/(_42_Km1 + Th_17);
    _42_Vm1 = 7600 MWDERIVEDUNIT_molecule__second; _42_Km1 = 3800 MWBUILTINUNIT_molecule;
  _43: IL_17A_F => IL_17_A_F + Mo_IL17_A_F + M2_IL17A_F; _43_kforward*IL_17A_F;
    _43_kforward = 0.00959 MWDERIVEDUNIT_1__second;
  _44: $IL_17_RA_C + IL_17_A_F => IL_17_complex + IL_17_A_F; _44_kforward*IL_17_RA_C*IL_17_A_F;
    _44_kforward = 6.59e-9 MWDERIVEDUNIT_1__molecule_second;
  _45: IL_17_complex => Act_1; _45_Vm1*IL_17_complex/(_45_Km1 + IL_17_complex);
    _45_Vm1 = 440 MWDERIVEDUNIT_molecule__second; _45_Km1 = 220 MWBUILTINUNIT_molecule;
  _46: Act_1 => TRAF6; _46_Vm1*Act_1/(_46_Km1 + Act_1);
    _46_Vm1 = 660 MWDERIVEDUNIT_molecule__second; _46_Km1 = 330 MWBUILTINUNIT_molecule;
  _47: TRAF6 => Tak_1; _47_Vm1*TRAF6/(_47_Km1 + TRAF6);
    _47_Vm1 = 1180 MWDERIVEDUNIT_molecule__second; _47_Km1 = 590 MWBUILTINUNIT_molecule;
  _48: Tak_1 => MAPK + Nemo_complex_TYPE_III_IMMUNE_RESPONSE + C_EBP_b_d_TYPE_III_IMMUNE_RESPONSE; _48_Vm1*Tak_1/(_48_Km1 + Tak_1);
    _48_Vm1 = 2000 MWDERIVEDUNIT_molecule__second; _48_Km1 = 1000 MWBUILTINUNIT_molecule;
  _49: Nemo_complex_TYPE_III_IMMUNE_RESPONSE => NFkB_TYPE_III_IMMUNE_RESPONSE; _49_Vm1*Nemo_complex_TYPE_III_IMMUNE_RESPONSE/(_49_Km1 + Nemo_complex_TYPE_III_IMMUNE_RESPONSE);
    _49_Vm1 = 5200 MWDERIVEDUNIT_molecule__second; _49_Km1 = 2600 MWBUILTINUNIT_molecule;
  _50: MAPK => AP1_TYPE_III_IMMUNE_RESPONSE; _50_Vm1*MAPK/(_50_Km1 + MAPK);
    _50_Vm1 = 4000 MWDERIVEDUNIT_molecule__second; _50_Km1 = 2000 MWBUILTINUNIT_molecule;
  _51: C_EBP_b_d_TYPE_III_IMMUNE_RESPONSE + NFkB_TYPE_III_IMMUNE_RESPONSE + AP1_TYPE_III_IMMUNE_RESPONSE + PIC_gene => IL6 + IL8 + IL4_13 + TNF_a + AP1_TYPE_III_IMMUNE_RESPONSE + NFkB_TYPE_III_IMMUNE_RESPONSE + C_EBP_b_d_TYPE_III_IMMUNE_RESPONSE; _51_Vm1*PIC_gene^_51_n/(_51_Kp1 + PIC_gene^_51_n);
    _51_Vm1 = 3480 MWDERIVEDUNIT_molecule__second; _51_n = 1; _51_Kp1 = 1740 MWBUILTINUNIT_molecule;
  _52: NFkB_TYPE_III_IMMUNE_RESPONSE + Survival_genes => Cyclin_D1_TYPE_III_IMMUNE_RESPONSE + Bcl_xL_TYPE_III_IMMUNE_RESPONSE + Bcl_2_TYPE_III_IMMUNE_RESPONSE + NFkB_TYPE_III_IMMUNE_RESPONSE; _52_Vm1*Survival_genes^_52_n/(_52_Kp1 + Survival_genes^_52_n);
    _52_Vm1 = 4000 MWDERIVEDUNIT_molecule__second; _52_n = 1; _52_Kp1 = 2000 MWBUILTINUNIT_molecule;
  _53: STAT_3_MONOCYTE_TO_M1_POLARIZATION + IL6_gene + Mo_NFkB + Mo_C_EBP_b_d + Mo_AP1 => IL_6_MONOCYTE_TO_M1_POLARIZATION + Mo_AP1 + Mo_NFkB + STAT_3_MONOCYTE_TO_M1_POLARIZATION + Mo_C_EBP_b_d; _53_Vm1*IL6_gene^_53_n/(_53_Km1 + IL6_gene^_53_n);
    _53_Vm1 = 1680 MWDERIVEDUNIT_molecule__second; _53_Km1 = 840 MWBUILTINUNIT_molecule; _53_n = 1;
  _54: IFN_g_T_CELL_MEDIATED_IMMUNE_RESPONSE => IFN_g_TYPE_III_IMMUNE_RESPONSE + Mo_IFNg + DC_IFNg; _54_kforward*IFN_g_T_CELL_MEDIATED_IMMUNE_RESPONSE;
    _54_kforward = 0.009322 MWDERIVEDUNIT_1__second;
  _55: $IFNgR + IFN_g_TYPE_III_IMMUNE_RESPONSE => IFNg_complex + IFN_g_TYPE_III_IMMUNE_RESPONSE; _55_kforward*IFNgR*IFN_g_TYPE_III_IMMUNE_RESPONSE;
    _55_kforward = 7.15e-8 MWDERIVEDUNIT_1__molecule_second;
  _56: IFNg_complex => PI3K; _56_Vm1*IFNg_complex/(_56_Km1 + IFNg_complex);
    _56_Vm1 = 100 MWDERIVEDUNIT_molecule__second; _56_Km1 = 50 MWBUILTINUNIT_molecule;
  _57: NFkB_TYPE_III_IMMUNE_RESPONSE + Inflammatory_gene => IL6 + NFkB_TYPE_III_IMMUNE_RESPONSE; _57_Vm1*Inflammatory_gene^_57_n/(_57_Kp1 + Inflammatory_gene^_57_n);
    _57_Vm1 = 2700 MWDERIVEDUNIT_molecule__second; _57_n = 1; _57_Kp1 = 1350 MWBUILTINUNIT_molecule;
  _58: IL_6_TC => IL6_TC + Th_IL6 + IL_6_M2_MACROPHAGE; _58_kforward*IL_6_TC;
    _58_kforward = 0.01 MWDERIVEDUNIT_1__second;
  _59: IL6_TC + $CD126 => IL6_complex + IL6_TC; _59_kforward*IL6_TC*CD126;
    _59_kforward = 9.5e-9 MWDERIVEDUNIT_1__molecule_second;
  _60: IL6_complex => JAK1_JAK2; _60_Vm1*IL6_complex/(_60_Km1 + IL6_complex);
    _60_Vm1 = 120 MWDERIVEDUNIT_molecule__second; _60_Km1 = 60 MWBUILTINUNIT_molecule;
  _61: JAK1_JAK2 => STAT_3_TYPE_III_IMMUNE_RESPONSE; _61_Vm1*JAK1_JAK2/(_61_Km1 + JAK1_JAK2);
    _61_Vm1 = 500 MWDERIVEDUNIT_molecule__second; _61_Km1 = 250 MWBUILTINUNIT_molecule;
  _62: $IFNgR1_R2 + Mo_IFNg => Mo_IFNg_complex + Mo_IFNg; _62_kforward*IFNgR1_R2*Mo_IFNg;
    _62_kforward = 7.5e-8 MWDERIVEDUNIT_1__molecule_second;
  _63: Mo_IFNg_complex => Mo_JAK1_JAK2; _63_Vm1*Mo_IFNg_complex/(_63_Km1 + Mo_IFNg_complex);
    _63_Vm1 = 400 MWDERIVEDUNIT_molecule__second; _63_Km1 = 200 MWBUILTINUNIT_molecule;
  _64: Mo_JAK1_JAK2 => STAT_3_MONOCYTE_TO_M1_POLARIZATION; _64_Vm1*Mo_JAK1_JAK2/(_64_Km1 + Mo_JAK1_JAK2);
    _64_Vm1 = 800 MWDERIVEDUNIT_molecule__second; _64_Km1 = 400 MWBUILTINUNIT_molecule;
  _65: Mo_IL17_A_F + $Mo_I7_RA_C => Mo_IL_17_complex + Mo_IL17_A_F; _65_kforward*Mo_IL17_A_F*Mo_I7_RA_C;
    _65_kforward = 8.029e-9 MWDERIVEDUNIT_1__molecule_second;
  _66: Mo_IL_17_complex => Mo_Act_1; _66_Vm1*Mo_IL_17_complex/(_66_Km1 + Mo_IL_17_complex);
    _66_Vm1 = 400 MWDERIVEDUNIT_molecule__second; _66_Km1 = 200 MWBUILTINUNIT_molecule;
  _67: Mo_Act_1 => Mo_TRAF6; _67_Vm1*Mo_Act_1/(_67_Km1 + Mo_Act_1);
    _67_Vm1 = 800 MWDERIVEDUNIT_molecule__second; _67_Km1 = 400 MWBUILTINUNIT_molecule;
  _68: Mo_TRAF6 => Mo_Tak_1; _68_Vm1*Mo_TRAF6/(_68_Km1 + Mo_TRAF6);
    _68_Vm1 = 1500 MWDERIVEDUNIT_molecule__second; _68_Km1 = 750 MWBUILTINUNIT_molecule;
  _69: Mo_Tak_1 => Mo_NEMO_complex + Mo_C_EBP_b_d + Mo_MAPK; _69_Vm1*Mo_Tak_1/(_69_Km1 + Mo_Tak_1);
    _69_Vm1 = 2500 MWDERIVEDUNIT_molecule__second; _69_Km1 = 1250 MWBUILTINUNIT_molecule;
  _70: Mo_NEMO_complex => Mo_NFkB; _70_Vm1*Mo_NEMO_complex/(_70_Km1 + Mo_NEMO_complex);
    _70_Vm1 = 3600 MWDERIVEDUNIT_molecule__second; _70_Km1 = 1800 MWBUILTINUNIT_molecule;
  _71: Mo_MAPK => Mo_AP1; _71_Vm1*Mo_MAPK/(_71_Km1 + Mo_MAPK);
    _71_Vm1 = 3600 MWDERIVEDUNIT_molecule__second; _71_Km1 = 1800 MWBUILTINUNIT_molecule;
  _72: DC_IFNg + $DC_IFNgR1_R2 => DC_IFNg_complex + DC_IFNg; _72_kforward*DC_IFNg*DC_IFNgR1_R2;
    _72_kforward = 8e-8 MWDERIVEDUNIT_1__molecule_second;
  _73: DC_IFNg_complex => DC_JAK1_Tyk2; _73_Vm1*DC_IFNg_complex/(_73_Km1 + DC_IFNg_complex);
    _73_Vm1 = 110 MWDERIVEDUNIT_molecule__second; _73_Km1 = 55;
  _74: DC_JAK1_Tyk2 => STAT1_DENDRITIC_CELL; _74_Vm1*DC_JAK1_Tyk2/(_74_Km1 + DC_JAK1_Tyk2);
    _74_Vm1 = 200 MWDERIVEDUNIT_molecule__second; _74_Km1 = 100 MWBUILTINUNIT_molecule;
  _75: STAT1_DENDRITIC_CELL + IL12_gene => IL12_DENDRITIC_CELL + STAT1_DENDRITIC_CELL; _75_Vm1*IL12_gene^_75_n/(_75_Kp1 + IL12_gene^_75_n);
    _75_Vm1 = 370 MWDERIVEDUNIT_molecule__second; _75_n = 1; _75_Kp1 = 185 MWBUILTINUNIT_molecule;
  _76: IL12_DENDRITIC_CELL => IL12_NK_CELL + IL12_T_CELL_MEDIATED_IMMUNE_RESPONSE; _76_kforward*IL12_DENDRITIC_CELL;
    _76_kforward = 0.00973 MWDERIVEDUNIT_1__second;
  _77: $IL_12_b1_b2 + IL12_NK_CELL => IL_12_complex + IL12_NK_CELL; _77_kforward*IL_12_b1_b2*IL12_NK_CELL;
    _77_kforward = 1.999e-7 MWDERIVEDUNIT_1__molecule_second;
  _78: IL_12_complex => NK_JAK2_Tyk2; _78_Vm1*IL_12_complex/(_78_Km1 + IL_12_complex);
    _78_Vm1 = 104 MWDERIVEDUNIT_molecule__second; _78_Km1 = 52 MWBUILTINUNIT_molecule;
  _79: NK_JAK2_Tyk2 => NK_STAT4; _79_Vm1*NK_JAK2_Tyk2/(_79_Km1 + NK_JAK2_Tyk2);
    _79_Vm1 = 200; _79_Km1 = 100;
  _80: NK_STAT4 + NK_IFNg_gene => NK_IFNg + NK_STAT4; _80_Vm1*NK_IFNg_gene^_80_n/(_80_Kp1 + NK_IFNg_gene^_80_n);
    _80_Vm1 = 300 MWDERIVEDUNIT_molecule__second; _80_n = 1; _80_Kp1 = 150 MWBUILTINUNIT_molecule;
  _81: IL12_T_CELL_MEDIATED_IMMUNE_RESPONSE + $IL12_B1_B2 => Th_IL_12_complex + IL12_T_CELL_MEDIATED_IMMUNE_RESPONSE; _81_kforward*IL12_T_CELL_MEDIATED_IMMUNE_RESPONSE*IL12_B1_B2;
    _81_kforward = 1e-7 MWDERIVEDUNIT_1__molecule_second;
  _82: Th_IL_12_complex => JAK_2_TYK_2; _82_Vm1*Th_IL_12_complex/(_82_Km1 + Th_IL_12_complex);
    _82_Vm1 = 100 MWDERIVEDUNIT_molecule__second; _82_Km1 = 50 MWBUILTINUNIT_molecule;
  _83: STAT_4 + T_bet_gene => T_bet + STAT_4; _83_Vm1*T_bet_gene^_83_n/(_83_Kp1 + T_bet_gene^_83_n);
    _83_Vm1 = 650 MWDERIVEDUNIT_molecule__second; _83_n = 1; _83_Kp1 = 325 MWBUILTINUNIT_molecule;
  _84: T_bet + Naive_CD4_cell => Th1_phenotype + T_bet; _84_Vm1*Naive_CD4_cell^_84_n/(_84_Kp1 + Naive_CD4_cell^_84_n);
    _84_Vm1 = 1200 MWDERIVEDUNIT_molecule__second; _84_n = 1; _84_Kp1 = 600 MWBUILTINUNIT_molecule;
  _85: Th1_phenotype => IFN_g_T_CELL_MEDIATED_IMMUNE_RESPONSE; _85_Vm1*Th1_phenotype/(_85_Km1 + Th1_phenotype);
    _85_Vm1 = 500 MWDERIVEDUNIT_molecule__second; _85_Km1 = 250 MWBUILTINUNIT_molecule;
  _87: Th_IL_12_complex => CD8_T_cell; _87_Vm1*Th_IL_12_complex/(_87_Km1 + Th_IL_12_complex);
    _87_Vm1 = 110 MWDERIVEDUNIT_molecule__second; _87_Km1 = 55 MWBUILTINUNIT_molecule;
  _88: CD8_T_cell => Immune_Response; _88_Vm1*CD8_T_cell/(_88_Km1 + CD8_T_cell);
    _88_Vm1 = 150 MWDERIVEDUNIT_molecule__second; _88_Km1 = 75 MWBUILTINUNIT_molecule;
  _89: IL6 => Th_IL6 + IL_6_M2_MACROPHAGE; _89_kforward*IL6;
    _89_kforward = 0.001 MWDERIVEDUNIT_1__second;
  _90: IL_6_MONOCYTE_TO_M1_POLARIZATION => Th_IL6 + IL_6_M2_MACROPHAGE; _90_kforward*IL_6_MONOCYTE_TO_M1_POLARIZATION;
    _90_kforward = 0.01 MWDERIVEDUNIT_1__second;
  _91: Th_IL6 + $IL6R_T_CELL_MEDIATED_IMMUNE_RESPONSE => Th_IL6_complex + Th_IL6; _91_kforward*Th_IL6*IL6R_T_CELL_MEDIATED_IMMUNE_RESPONSE;
    _91_kforward = 6.687e-9 MWDERIVEDUNIT_1__molecule_second;
  _92: Th_IL6_complex => JAK_1_JAK_2; _92_Vm1*Th_IL6_complex/(_92_Km1 + Th_IL6_complex);
    _92_Vm1 = 2200 MWDERIVEDUNIT_molecule__second; _92_Km1 = 1100 MWBUILTINUNIT_molecule;
  _93: JAK_1_JAK_2 => STAT_3_T_CELL_MEDIATED_IMMUNE_RESPONSE; _93_Vm1*JAK_1_JAK_2/(_93_Km1 + JAK_1_JAK_2);
    _93_Vm1 = 3800 MWDERIVEDUNIT_molecule__second; _93_Km1 = 1900 MWBUILTINUNIT_molecule;
  _94: IL4_13 => IL_4_IL_13 + IL4_IL13_M2_MACROPHAGE + IL4_IL13_MDSC; _94_kforward*IL4_13;
    _94_kforward = 0.00928 MWDERIVEDUNIT_1__second;
  _95: IL_4_IL_13 + $IL4_13_Ra_Ra1 => IL4_13_complex_T_CELL_MEDIATED_IMMUNE_RESPONSE + IL_4_IL_13; _95_kforward*IL_4_IL_13*IL4_13_Ra_Ra1;
    _95_kforward = 1.6268e-8 MWDERIVEDUNIT_1__molecule_second;
  _96: IL4_13_complex_T_CELL_MEDIATED_IMMUNE_RESPONSE => JAK1_3_Tyk2; _96_Vm1*IL4_13_complex_T_CELL_MEDIATED_IMMUNE_RESPONSE/(_96_Km1 + IL4_13_complex_T_CELL_MEDIATED_IMMUNE_RESPONSE);
    _96_Vm1 = 1100 MWDERIVEDUNIT_molecule__second; _96_Km1 = 550 MWBUILTINUNIT_molecule;
  _97: JAK1_3_Tyk2 => STAT_6; _97_Vm1*JAK1_3_Tyk2/(_97_Km1 + JAK1_3_Tyk2);
    _97_Vm1 = 2100 MWDERIVEDUNIT_molecule__second; _97_Km1 = 1050 MWBUILTINUNIT_molecule;
  _98: STAT_6 + GATA_3_gene => GATA_3 + STAT_6; _98_Vm1*GATA_3_gene^_98_n/(_98_Kp1 + GATA_3_gene^_98_n);
    _98_Vm1 = 2600 MWDERIVEDUNIT_molecule__second; _98_n = 1; _98_Kp1 = 1300 MWBUILTINUNIT_molecule;
  _99: Naive_CD4_cell + GATA_3 => Th2 + GATA_3; _99_Vm1*Naive_CD4_cell^_99_n/(_99_Kp1 + Naive_CD4_cell^_99_n);
    _99_Vm1 = 3200 MWDERIVEDUNIT_molecule__second; _99_n = 1; _99_Kp1 = 1600 MWBUILTINUNIT_molecule;
  _100: Th2 => Tumor_progression + Immune_tolerance; _100_Vm1*Th2/(_100_Km1 + Th2);
    _100_Vm1 = 800 MWDERIVEDUNIT_molecule__second; _100_Km1 = 400 MWBUILTINUNIT_molecule;
  _101: IL4_IL13_M2_MACROPHAGE + $IL4_13_R => IL4_IL13_complex + IL4_IL13_M2_MACROPHAGE; _101_kforward*IL4_IL13_M2_MACROPHAGE*IL4_13_R;
    _101_kforward = 1.581e-8 MWDERIVEDUNIT_1__molecule_second;
  _102: IL4_IL13_complex => JAK_1_3_Tyk2 + PI3k; _102_Vm1*IL4_IL13_complex/(_102_Km1 + IL4_IL13_complex);
    _102_Vm1 = 160 MWDERIVEDUNIT_molecule__second; _102_Km1 = 80 MWBUILTINUNIT_molecule;
  _103: JAK_1_3_Tyk2 => STAT6_M2_MACROPHAGE; _103_Vm1*JAK_1_3_Tyk2/(_103_Km1 + JAK_1_3_Tyk2);
    _103_Vm1 = 410 MWDERIVEDUNIT_molecule__second; _103_Km1 = 205 MWBUILTINUNIT_molecule;
  _104: STAT6_M2_MACROPHAGE + GATA3_gene => GATA3 + STAT6_M2_MACROPHAGE; _104_Vm1*GATA3_gene^_104_n/(_104_Kp1 + GATA3_gene^_104_n);
    _104_Vm1 = 450 MWDERIVEDUNIT_molecule__second; _104_n = 1; _104_Kp1 = 225 MWBUILTINUNIT_molecule;
  _105: GATA3 => M2_homeostasis; _105_Vm1*GATA3/(_105_Km1 + GATA3);
    _105_Vm1 = 850 MWDERIVEDUNIT_molecule__second; _105_Km1 = 425 MWBUILTINUNIT_molecule;
  _106: IL_1b_MONOCYTE_TO_M1_POLARIZATION => IL1b; _106_kforward*IL_1b_MONOCYTE_TO_M1_POLARIZATION;
    _106_kforward = 0.009512 MWDERIVEDUNIT_1__second;
  _107: IL1b + $IL1b_R => IL1b_complex + IL1b; _107_kforward*IL1b*IL1b_R;
    _107_kforward = 6.91e-8 MWDERIVEDUNIT_1__molecule_second;
  _108: IL1b_complex => JAK1; _108_Vm1*IL1b_complex/(_108_Km1 + IL1b_complex);
    _108_Vm1 = 212 MWDERIVEDUNIT_molecule__second; _108_Km1 = 106 MWBUILTINUNIT_molecule;
  _109: JAK1 => STAT1_MDSC; _109_Vm1*JAK1/(_109_Km1 + JAK1);
    _109_Vm1 = 500 MWDERIVEDUNIT_molecule__second; _109_Km1 = 250 MWBUILTINUNIT_molecule;
  _110: STAT1_MDSC + Suppressive_genes + STAT6_MDSC => IL_10 + TGF_b_MDSC + Arginase + iNOS + STAT1_MDSC + STAT6_MDSC; _110_Vm1*Suppressive_genes^_110_n/(_110_Kp1 + Suppressive_genes^_110_n);
    _110_Vm1 = 780 MWDERIVEDUNIT_molecule__second; _110_n = 1; _110_Kp1 = 390 MWBUILTINUNIT_molecule;
  _111: IL4_IL13_MDSC + $CD124 => IL4_13_complex_MDSC + IL4_IL13_MDSC; _111_kforward*IL4_IL13_MDSC*CD124;
    _111_kforward = 1.5e-8 MWDERIVEDUNIT_1__molecule_second;
  _112: IL4_13_complex_MDSC => JAK1_3_Tyk_2; _112_Vm1*IL4_13_complex_MDSC/(_112_Km1 + IL4_13_complex_MDSC);
    _112_Vm1 = 280 MWDERIVEDUNIT_molecule__second; _112_Km1 = 140 MWBUILTINUNIT_molecule;
  _113: JAK1_3_Tyk_2 => STAT6_MDSC; _113_Vm1*JAK1_3_Tyk_2/(_113_Km1 + JAK1_3_Tyk_2);
    _113_Vm1 = 450 MWDERIVEDUNIT_molecule__second; _113_Km1 = 225 MWBUILTINUNIT_molecule;
  _114: VEGF_TYPE_III_IMMUNE_RESPONSE => M_VEGF; _114_kforward*VEGF_TYPE_III_IMMUNE_RESPONSE;
    _114_kforward = 0.009654 MWDERIVEDUNIT_1__second;
  _115: VEGF_TUMOR_CELL => M_VEGF; _115_kforward*VEGF_TUMOR_CELL;
    _115_kforward = 0.00533 MWDERIVEDUNIT_1__second;
  _116: M_VEGF + $VEGF_R => VEGF_complex + M_VEGF; _116_kforward*M_VEGF*VEGF_R;
    _116_kforward = 2.423e-8 MWDERIVEDUNIT_1__molecule_second;
  _117: VEGF_complex => Erk; _117_Vm1*VEGF_complex/(_117_Km1 + VEGF_complex);
    _117_Vm1 = 300 MWDERIVEDUNIT_molecule__second; _117_Km1 = 150 MWBUILTINUNIT_molecule;
  _118: Erk + Survival_gene => Cyclin_D1_MDSC + Bcl_xL_MDSC + c_myc_MDSC + Erk; _118_Vm1*Survival_gene^_118_n/(_118_Kp1 + Survival_gene^_118_n);
    _118_Vm1 = 390 MWDERIVEDUNIT_molecule__second; _118_n = 1; _118_Kp1 = 195 MWBUILTINUNIT_molecule;
  _119: TGF_b_MDSC => TGF_b_T_CELL_MEDIATED_IMMUNE_RESPONSE; _119_kforward*TGF_b_MDSC;
    _119_kforward = 0.009905 MWDERIVEDUNIT_1__second;
  _120: TGF_b_T_CELL_MEDIATED_IMMUNE_RESPONSE + $TGF_b_R => TGF_b_complex + TGF_b_T_CELL_MEDIATED_IMMUNE_RESPONSE; _120_kforward*TGF_b_T_CELL_MEDIATED_IMMUNE_RESPONSE*TGF_b_R;
    _120_kforward = 9.14e-8 MWDERIVEDUNIT_1__molecule_second;
  _121: TGF_b_complex => Smad_2_3; _121_Vm1*TGF_b_complex/(_121_Km1 + TGF_b_complex);
    _121_Vm1 = 220 MWDERIVEDUNIT_molecule__second; _121_Km1 = 110 MWBUILTINUNIT_molecule;
  _122: Smad_2_3 + Smad_4_gene => Smad_4 + Smad_2_3; _122_Vm1*Smad_4_gene^_122_n/(_122_Kp1 + Smad_4_gene^_122_n);
    _122_Vm1 = 390 MWDERIVEDUNIT_molecule__second; _122_n = 1; _122_Kp1 = 195 MWBUILTINUNIT_molecule;
  _123: Smad_4 + FoxP3_gene => FoxP3 + Smad_4; _123_Vm1*FoxP3_gene^_123_n/(_123_Kp1 + FoxP3_gene^_123_n);
    _123_Vm1 = 760 MWDERIVEDUNIT_molecule__second; _123_n = 1; _123_Kp1 = 380 MWBUILTINUNIT_molecule;
  _124: FoxP3 + Naive_CD4_cell => Treg + FoxP3; _124_Vm1*Naive_CD4_cell^_124_n/(_124_Kp1 + Naive_CD4_cell^_124_n);
    _124_Vm1 = 500 MWDERIVEDUNIT_molecule__second; _124_n = 1; _124_Kp1 = 250 MWBUILTINUNIT_molecule;
  _125: Treg => Immune_tolerance; _125_Vm1*Treg/(_125_Km1 + Treg);
    _125_Vm1 = 2000 MWDERIVEDUNIT_molecule__second; _125_Km1 = 1000 MWBUILTINUNIT_molecule;
  _126: Arginase => Immune_tolerance; _126_Vm1*Arginase/(_126_Km1 + Arginase);
    _126_Vm1 = 300 MWDERIVEDUNIT_molecule__second; _126_Km1 = 150 MWBUILTINUNIT_molecule;
  _127: M2_IL17A_F + $M2_IL17A_F_R => IL_17A_F_complex + M2_IL17A_F; _127_kforward*M2_IL17A_F*M2_IL17A_F_R;
    _127_kforward = 9.51e-9 MWDERIVEDUNIT_1__molecule_second;
  _128: IL_17A_F_complex => Act1; _128_Vm1*IL_17A_F_complex/(_128_Km1 + IL_17A_F_complex);
    _128_Vm1 = 280 MWDERIVEDUNIT_molecule__second; _128_Km1 = 140 MWBUILTINUNIT_molecule;
  _129: Act1 => M2_TRAF6; _129_Vm1*Act1/(_129_Km1 + Act1);
    _129_Vm1 = 400 MWDERIVEDUNIT_molecule__second; _129_Km1 = 200 MWBUILTINUNIT_molecule;
  _130: M2_TRAF6 => M2_Tak1; _130_Vm1*M2_TRAF6/(_130_Km1 + M2_TRAF6);
    _130_Vm1 = 950 MWDERIVEDUNIT_molecule__second; _130_Km1 = 475 MWBUILTINUNIT_molecule;
  _131: M2_Tak1 => Nemo_complex_M2_MACROPHAGE + C_EBP_b_d_M2_MACROPHAGE + M2_Erk1_2 + MKK4_7; _131_Vm1*M2_Tak1/(_131_Km1 + M2_Tak1);
    _131_Vm1 = 2000 MWDERIVEDUNIT_molecule__second; _131_Km1 = 1000 MWBUILTINUNIT_molecule;
  _132: M2_Erk1_2 => AP_1; _132_Vm1*M2_Erk1_2/(_132_Km1 + M2_Erk1_2);
    _132_Vm1 = 3700 MWDERIVEDUNIT_molecule__second; _132_Km1 = 1850 MWBUILTINUNIT_molecule;
  _133: Nemo_complex_M2_MACROPHAGE => M2_NFkB; _133_Vm1*Nemo_complex_M2_MACROPHAGE/(_133_Km1 + Nemo_complex_M2_MACROPHAGE);
    _133_Vm1 = 5400 MWDERIVEDUNIT_molecule__second; _133_Km1 = 2700 MWBUILTINUNIT_molecule;
  _134: M2_NFkB + C_EBP_b_d_M2_MACROPHAGE + AP_1 + PSM_gene => M2_VEGF + Bcl_xL_M2_MACROPHAGE + Bcl_2_M2_MACROPHAGE + cyclin_D1 + c_myc_M2_MACROPHAGE + C_EBP_b_d_M2_MACROPHAGE + AP_1 + M2_NFkB; _134_Vm1*PSM_gene^_134_n/(_134_Kp1 + PSM_gene^_134_n);
    _134_Vm1 = 1500 MWDERIVEDUNIT_molecule__second; _134_n = 1; _134_Kp1 = 750 MWBUILTINUNIT_molecule;
  _135: LPS_M2_MACROPHAGE + $TLR4 => LPS_TLR4_complex + LPS_M2_MACROPHAGE; _135_kforward*LPS_M2_MACROPHAGE*TLR4;
    _135_kforward = 6.68e-6 MWDERIVEDUNIT_1__molecule_second;
  _136: LPS_TLR4_complex => Myd88; _136_Vm1*LPS_TLR4_complex/(_136_Km1 + LPS_TLR4_complex);
    _136_Vm1 = 34 MWDERIVEDUNIT_molecule__second; _136_Km1 = 17 MWBUILTINUNIT_molecule;
  _137: Myd88 => IRAK1_4; _137_Vm1*Myd88/(_137_Km1 + Myd88);
    _137_Vm1 = 80 MWDERIVEDUNIT_molecule__second; _137_Km1 = 40 MWBUILTINUNIT_molecule;
  _138: IRAK1_4 => M2_TRAF6; _138_Vm1*IRAK1_4/(_138_Km1 + IRAK1_4);
    _138_Vm1 = 130 MWDERIVEDUNIT_molecule__second; _138_Km1 = 65 MWBUILTINUNIT_molecule;
  _139: M_CSF_TUMOR_CELL => M_CSF_M2_MACROPHAGE; _139_kforward*M_CSF_TUMOR_CELL;
    _139_kforward = 0.009984 MWDERIVEDUNIT_1__second;
  _140: M_CSF_M2_MACROPHAGE + $M_CSF_R => M_CSF_complex + M_CSF_M2_MACROPHAGE; _140_kforward*M_CSF_M2_MACROPHAGE*M_CSF_R;
    _140_kforward = 3.255e-8 MWDERIVEDUNIT_1__molecule_second;
  _141: M_CSF_complex => PI3k; _141_Vm1*M_CSF_complex/(_141_Km1 + M_CSF_complex);
    _141_Vm1 = 210 MWDERIVEDUNIT_molecule__second; _141_Km1 = 105 MWBUILTINUNIT_molecule;
  _142: PI3k => AKt; _142_Vm1*PI3k/(_142_Km1 + PI3k);
    _142_Vm1 = 5000 MWDERIVEDUNIT_molecule__second; _142_Km1 = 2500 MWBUILTINUNIT_molecule;
  _143: AKt => Nemo_complex_M2_MACROPHAGE; _143_Vm1*AKt/(_143_Km1 + AKt);
    _143_Vm1 = 1000 MWDERIVEDUNIT_molecule__second; _143_Km1 = 500 MWBUILTINUNIT_molecule;
  _144: M2_NFkB + Nlrp3_gene => Nlrp3 + M2_NFkB; _144_Vm1*Nlrp3_gene^_144_n/(_144_Kp1 + Nlrp3_gene^_144_n);
    _144_Vm1 = 5000 MWDERIVEDUNIT_molecule__second; _144_n = 1; _144_Kp1 = 2500 MWBUILTINUNIT_molecule;
  _145: Nlrp3 + $ASC + $Pro_caspase_1 => Nlrp3_complex + Nlrp3; _145_kforward*Nlrp3*ASC*Pro_caspase_1;
    _145_kforward = 9.99e-15 MWDERIVEDUNIT_1__molecule_molecule_second;
  _146: M2_NFkB + PC_gene => IL_1b_M2_MACROPHAGE + IL_18 + M2_NFkB; _146_Vm1*PC_gene^_146_n/(_146_Kp1 + PC_gene^_146_n);
    _146_Vm1 = 790 MWDERIVEDUNIT_molecule__second; _146_n = 1; _146_Kp1 = 395 MWBUILTINUNIT_molecule;
  _147: Nlrp3_complex => Capase_1; _147_Vm1*Nlrp3_complex/(_147_Km1 + Nlrp3_complex);
    _147_Vm1 = 6800 MWDERIVEDUNIT_molecule__second; _147_Km1 = 3400 MWBUILTINUNIT_molecule;
  _148: Capase_1 => IL_1b_M2_MACROPHAGE + IL_18; _148_Vm1*Capase_1/(_148_Km1 + Capase_1);
    _148_Vm1 = 7500 MWDERIVEDUNIT_molecule__second; _148_Km1 = 3750 MWBUILTINUNIT_molecule;
  _149: IL_1b_M2_MACROPHAGE => Chronic_Inflammation; _149_Vm1*IL_1b_M2_MACROPHAGE/(_149_Km1 + IL_1b_M2_MACROPHAGE);
    _149_Vm1 = 3500 MWDERIVEDUNIT_molecule__second; _149_Km1 = 1750 MWBUILTINUNIT_molecule;
  _151: IL_6_M2_MACROPHAGE + $IL6R_M2_MACROPHAGE => IL6_com + IL_6_M2_MACROPHAGE; _151_kforward*IL_6_M2_MACROPHAGE*IL6R_M2_MACROPHAGE;
    _151_kforward = 1.6584e-8 MWDERIVEDUNIT_1__molecule_second;
  _152: IL6_com => PI3k + M2_Erk1_2; _152_Vm1*IL6_com/(_152_Km1 + IL6_com);
    _152_Vm1 = 2000 MWDERIVEDUNIT_molecule__second; _152_Km1 = 1000 MWBUILTINUNIT_molecule;
  _153: MKK4_7 => JNk; _153_Vm1*MKK4_7/(_153_Km1 + MKK4_7);
    _153_Vm1 = 3900 MWDERIVEDUNIT_molecule__second; _153_Km1 = 1950 MWBUILTINUNIT_molecule;
  _154: M2_NFkB + Autophagy_genes => Beclin_1 + Atg_5 + LC3II + ATG_3 + ULK1_2 + ATG_12 + M2_NFkB; _154_Vm1*Autophagy_genes^_154_n/(_154_Km1 + Autophagy_genes^_154_n);
    _154_Vm1 = 2900 MWDERIVEDUNIT_molecule__second; _154_n = 1; _154_Km1 = 1450 MWBUILTINUNIT_molecule;
  _155: Autophagy_genes + M2_Erk1_2 => LC3II + Beclin_1 + M2_Erk1_2; _155_Vm1*Autophagy_genes^_155_n/(_155_Kp1 + Autophagy_genes^_155_n);
    _155_Vm1 = 4000 MWDERIVEDUNIT_molecule__second; _155_n = 1; _155_Kp1 = 2000 MWBUILTINUNIT_molecule;
  _156: AP_1 + Autophagy_genes => ATG_7 + LC3II + Atg_5 + Beclin_1 + AP_1; _156_Vm1*Autophagy_genes^_156_n/(_156_Km1 + Autophagy_genes^_156_n);
    _156_Vm1 = 1000 MWDERIVEDUNIT_molecule__second; _156_n = 1; _156_Km1 = 500 MWBUILTINUNIT_molecule;
  _157: C_EBP_b_d_M2_MACROPHAGE + Autophagy_genes => LC3II + Beclin_1 + C_EBP_b_d_M2_MACROPHAGE; _157_Vm1*Autophagy_genes^_157_n/(_157_Km1 + Autophagy_genes^_157_n);
    _157_Vm1 = 900 MWDERIVEDUNIT_molecule__second; _157_n = 1; _157_Km1 = 450 MWBUILTINUNIT_molecule;
  _158: JNk + Autophagy_genes => VPS_34_15 + ATG_7 + Atg_5 + LC3II + ATG_12 + ULK1_2 + JNk; _158_Vm1*Autophagy_genes^_158_n/(_158_Kp1 + Autophagy_genes^_158_n);
    _158_Vm1 = 800 MWDERIVEDUNIT_molecule__second; _158_n = 1; _158_Kp1 = 400 MWBUILTINUNIT_molecule;
  _159: $ATG_13 + $FIP200 + ULK1_2 => ULK_complex + ULK1_2; _159_kforward*ATG_13*FIP200*ULK1_2;
    _159_kforward = 6.43e-14 MWDERIVEDUNIT_1__molecule_molecule_second;
  _160: JNk + $Bcl2_Beclin_complex => Beclin_1 + Bcl_2_M2_MACROPHAGE + JNk; _160_kforward*JNk*Bcl2_Beclin_complex;
    _160_kforward = 1e-8 MWDERIVEDUNIT_1__molecule_second;
  _161: VPS_34_15 + Beclin_1 + $ATG_14L + $Ambra1 + $UVRAG => PI3KC3_complex + VPS_34_15 + Beclin_1; _161_kforward*VPS_34_15*Beclin_1*ATG_14L*Ambra1*UVRAG;
    _161_kforward = 5e-24 MWDERIVEDUNIT_1__molecule_molecule_molecule_molecule_second;
  _162: ULK_complex + PI3KC3_complex => Phagophore + ULK_complex + PI3KC3_complex; _162_kforward*ULK_complex*PI3KC3_complex;
    _162_kforward = 7e-8 MWDERIVEDUNIT_1__molecule_second;
  _163: ATG_12 + Atg_5 + ATG_7 + $ATG_10 + $ATG_16L => ATGs_complex + Atg_5 + ATG_12 + ATG_7; _163_Vm1*Atg_5/(_163_Km1 + Atg_5);
    _163_Vm1 = 1480 MWDERIVEDUNIT_molecule__second; _163_Km1 = 740 MWBUILTINUNIT_molecule;
  _164: ATG_3 + ATG_7 + $ATG_4B + $Pro_LC3 => LC3II + ATG_7 + ATG_3; _164_Vm1*Pro_LC3/(_164_Km1 + Pro_LC3);
    _164_Vm1 = 1400 MWDERIVEDUNIT_1__molecule_molecule_molecule_second; _164_Km1 = 700;
  _165: Phagophore + LC3II + ATGs_complex => Autophagosome + LC3II + ATGs_complex + Phagophore; _165_kforward*Phagophore*LC3II*ATGs_complex;
    _165_kforward = 1e-14 MWDERIVEDUNIT_1__molecule_molecule_second;
  _166: Autophagosome + $Lysosome => Autolysosome + Autophagosome; _166_kforward*Autophagosome*Lysosome;
    _166_kforward = 5.9e-8 MWDERIVEDUNIT_1__molecule_second;
  _167: Autolysosome => Autophagy; _167_Vm1*Autolysosome/(_167_Km1 + Autolysosome);
    _167_Vm1 = 2000 MWDERIVEDUNIT_molecule__second; _167_Km1 = 1000 MWBUILTINUNIT_molecule;
  _168: IL_10 => IL10; kForward*IL_10;
    kForward = 0.009 MWDERIVEDUNIT_1__second;
  _169: Th_IL6_complex + Treg => Immune_Response + Th_IL6_complex; _169_Vm1*Treg/(_169_Km1 + Treg);
    _169_Vm1 = 120 MWDERIVEDUNIT_molecule__second; _169_Km1 = 60 MWBUILTINUNIT_molecule;
  _170: IFN_g_T_CELL_MEDIATED_IMMUNE_RESPONSE + Th_17 => Immune_Response + IFN_g_T_CELL_MEDIATED_IMMUNE_RESPONSE; _170_Vm1*Th_17/(_170_Km1 + Th_17);
    _170_Vm1 = 2000 MWDERIVEDUNIT_molecule__second; _170_Km1 = 1000 MWBUILTINUNIT_molecule;
  _171: IL10 + Th1_phenotype => Immune_tolerance + IL10; _171_Vm1*Th1_phenotype/(_171_Km1 + Th1_phenotype);
    _171_Vm1 = 800 MWDERIVEDUNIT_molecule__second; _171_Km1 = 400 MWBUILTINUNIT_molecule;
  _172: GATA_3 + Th1_phenotype => Immune_tolerance + GATA_3; _172_Vm1*Th1_phenotype^_172_n/(_172_Kp + Th1_phenotype^_172_n);
    _172_Vm1 = 400 MWDERIVEDUNIT_molecule__second; _172_n = 1; _172_Kp = 200 MWBUILTINUNIT_molecule;
  _173: FoxP3 + Th_17 => Immune_Response + FoxP3; _173_Vm1*Th_17^_173_n/(_173_Kp + Th_17^_173_n);
    _173_Vm1 = 600 MWDERIVEDUNIT_molecule__second; _173_n = 1; _173_Kp = 300 MWBUILTINUNIT_molecule;
  _174: Smad_4 + RORgt_gene => RORgt + Smad_4; _174_Vm1*RORgt_gene^_174_n/(_174_Kp1 + RORgt_gene^_174_n);
    _174_Vm1 = 10 MWDERIVEDUNIT_molecule__second; _174_n = 1; _174_Kp1 = 5 MWBUILTINUNIT_molecule;
  _175: JNK => AP1_TUMOR_CELL; _175_Vm1*JNK/(_175_Km1 + JNK);
    _175_Vm1 = 650 MWDERIVEDUNIT_molecule__second; _175_Km1 = 325 MWBUILTINUNIT_molecule;
  _176: p38 => AP1_TUMOR_CELL; _176_Vm1*p38/(_176_Km1 + p38);
    _176_Vm1 = 650 MWDERIVEDUNIT_molecule__second; _176_Km1 = 325 MWBUILTINUNIT_molecule;
  _177: iNOS => Immune_tolerance; _177_Vm1*iNOS/(_177_Km1 + iNOS);
    _177_Vm1 = 300 MWDERIVEDUNIT_molecule__second; _177_Km1 = 150 MWBUILTINUNIT_molecule;
  _178: IL_18 => Chronic_Inflammation; _178_Vm1*IL_18/(_178_Km1 + IL_18);
    _178_Vm1 = 3500 MWDERIVEDUNIT_molecule__second; _178_Km1 = 1750 MWBUILTINUNIT_molecule;

  // Events:
  event_441: at (time >= 70): Th_IL6_complex = 10000, Treg = 10000, Immune_Response = 0;
  event_442: at (time >= 70): IFN_g_T_CELL_MEDIATED_IMMUNE_RESPONSE = 50000, Th_17 = 50000, Immune_Response = 0;
  event_443: at (time >= 70): IL10 = 35000, Th1_phenotype = 35000, Immune_tolerance = 0;
  event_444: at (time >= 70): GATA_3 = 40000, Th1_phenotype = 40000, Immune_tolerance = 0;
  event_445: at (time >= 70): FoxP3 = 10000, Th_17 = 10000, Immune_Response = 0;

  // Unit definitions:
  unit MWBUILTINUNIT_molecule = 1.660539e-24 mole;
  unit MWDERIVEDUNIT_1__molecule_second = 6.022142e23 dimensionless / (mole * second); MWDERIVEDUNIT_1__molecule_second is "1/(molecule*second)";
  unit MWDERIVEDUNIT_molecule__second = mole * 1.660539e-24 dimensionless / second; MWDERIVEDUNIT_molecule__second is "molecule/second";
  unit MWDERIVEDUNIT_1__second = dimensionless / second; MWDERIVEDUNIT_1__second is "1/second";
  unit MWDERIVEDUNIT_1__molecule_molecule_second = 3.626619e47 dimensionless / (mole^2 * second); MWDERIVEDUNIT_1__molecule_molecule_second is "1/(molecule*molecule*second)";
  unit MWDERIVEDUNIT_1__molecule_molecule_molecule_molecule_second = 1.315237e95 dimensionless / (mole^4 * second); MWDERIVEDUNIT_1__molecule_molecule_molecule_molecule_second is "1/(molecule*molecule*molecule*molecule*second)";
  unit MWDERIVEDUNIT_1__molecule_molecule_molecule_second = 2.184002e71 dimensionless / (mole^3 * second); MWDERIVEDUNIT_1__molecule_molecule_molecule_second is "1/(molecule*molecule*molecule*second)";
end
