// SBML level 2 version 4

model Burbano2023_HGFsignaling_in_FattyLiverDisease()
  // Chronic liver diseases are worldwide on the rise. Due to the rapidly increasing incidence, in particular in Western countries, non-alcoholic fatty liver disease (NAFLD) is gaining importance. As the disease progresses it can develop into hepatocellular carcinoma. Lipid accumulation in hepatocytes has been identified as the characteristic structural change in NAFLD development, but the molecular mechanisms responsible for disease development remained unresolved. Here, we uncover a strong downregulation of the PI3K-AKT pathway and an upregulation of the MAPK pathway in primary hepatocytes from a preclinical model fed with a Western diet (WD). Dynamic pathway modeling of hepatocyte growth factor (HGF) signal transduction combined with global proteomics identifies that an elevated basal MET phosphorylation rate is the main driver of altered signaling leading to increased proliferation of WD-hepatocytes. Model-adaptation to patient-derived hepatocytes reveals a patient-specific variability in basal MET phosphorylation, which correlates with the outcome of patients after liver surgery. Thus, dysregulated basal MET phosphorylation could be an indicator for the health status of the liver and thereby inform on the risk of a patient to suffer from liver failure after surgery.
  // isDescribedBy pubmed:38216754 doi:10.1038/s44320-023-00007-4
  // hasProperty mamo:MAMO_0000046
  // biomodels.db:MODEL2306280002 biomodels.db:BIOMD0000001102

  // Compartments:
  compartment cytoplasm = 1;

  // Species:
  species MET in cytoplasm = 1/cytoplasm;
  species HGF in cytoplasm = 1/cytoplasm;
  species pMET in cytoplasm = MET*k_phospho_MET_basal/k_pMET_degradation;
  species MEK in cytoplasm = 1/cytoplasm;
  species pMEK in cytoplasm = MEK*MET*k_phospho_MEK*k_phospho_MET_basal/(k_dephospho_pMEK*k_pMET_degradation);
  species ERK in cytoplasm = 1/cytoplasm;
  species pERK in cytoplasm = ERK*MEK*MET*k_phospho_ERK*k_phospho_MEK*k_phospho_MET_basal/(k_dephospho_pERK*k_dephospho_pMEK*k_pMET_degradation);
  species PI3K in cytoplasm = 1/cytoplasm;
  species PI3K_atMembrane in cytoplasm = MET*PI3K*k_dephospho_S6K*k_dissociate_mTORC1*k_phospho_MET_basal*k_recruit_PI3K_MET/(k_pMET_degradation*k_release_PI3K*(Rptor_free*S6K*k_build_mTORC1*k_inhibit_IRS1_S6K*k_phospho_S6K*mTOR_free*(TSC*k_phospho_TSC_ERK*(ERK*MEK*MET*k_phospho_ERK*k_phospho_MEK*k_phospho_MET_basal/(k_dephospho_pERK*k_dephospho_pMEK*k_pMET_degradation))/k_dephospho_TSC) + k_dephospho_S6K*k_dissociate_mTORC1));
  species AKT in cytoplasm = 1/cytoplasm;
  species pAKT_T308 in cytoplasm = AKT*MET*PI3K*k_dephospho_S6K*k_dissociate_mTORC1*k_phospho_AKT_T308*k_phospho_MET_basal*k_recruit_PI3K_MET/(k_dephospho_pAKT_T308*k_pMET_degradation*k_release_PI3K*(Rptor_free*S6K*k_build_mTORC1*k_inhibit_IRS1_S6K*k_phospho_S6K*mTOR_free*(TSC*k_phospho_TSC_ERK*(ERK*MEK*MET*k_phospho_ERK*k_phospho_MEK*k_phospho_MET_basal/(k_dephospho_pERK*k_dephospho_pMEK*k_pMET_degradation))/k_dephospho_TSC) + k_dephospho_S6K*k_dissociate_mTORC1));
  species pAKT_T308_S473 in cytoplasm = AKT*MET^2*Mapkap1_free*PI3K^2*k_build_mTORC2*k_dephospho_S6K^3*k_dissociate_mTORC1^3*k_phospho_AKT_S473*k_phospho_AKT_T308*k_phospho_MET_basal^2*k_recruit_PI3K_MET^2*mTOR_free/(k_dephospho_pAKT_S473*k_dephospho_pAKT_T308*k_dissociate_mTORC2*k_pMET_degradation^2*k_release_PI3K^2*(Rptor_free^3*S6K^3*k_build_mTORC1^3*k_inhibit_IRS1_S6K^2*k_inhibit_mTORC2_S6K*k_phospho_S6K^3*mTOR_free^3*(TSC*k_phospho_TSC_ERK*(ERK*MEK*MET*k_phospho_ERK*k_phospho_MEK*k_phospho_MET_basal/(k_dephospho_pERK*k_dephospho_pMEK*k_pMET_degradation))/k_dephospho_TSC)^3 + Rptor_free^2*S6K^2*k_build_mTORC1^2*k_dephospho_S6K*k_dissociate_mTORC1*k_inhibit_IRS1_S6K^2*k_phospho_S6K^2*mTOR_free^2*(TSC*k_phospho_TSC_ERK*(ERK*MEK*MET*k_phospho_ERK*k_phospho_MEK*k_phospho_MET_basal/(k_dephospho_pERK*k_dephospho_pMEK*k_pMET_degradation))/k_dephospho_TSC)^2 + 2*Rptor_free^2*S6K^2*k_build_mTORC1^2*k_dephospho_S6K*k_dissociate_mTORC1*k_inhibit_IRS1_S6K*k_inhibit_mTORC2_S6K*k_phospho_S6K^2*mTOR_free^2*(TSC*k_phospho_TSC_ERK*(ERK*MEK*MET*k_phospho_ERK*k_phospho_MEK*k_phospho_MET_basal/(k_dephospho_pERK*k_dephospho_pMEK*k_pMET_degradation))/k_dephospho_TSC)^2 + 2*Rptor_free*S6K*k_build_mTORC1*k_dephospho_S6K^2*k_dissociate_mTORC1^2*k_inhibit_IRS1_S6K*k_phospho_S6K*mTOR_free*(TSC*k_phospho_TSC_ERK*(ERK*MEK*MET*k_phospho_ERK*k_phospho_MEK*k_phospho_MET_basal/(k_dephospho_pERK*k_dephospho_pMEK*k_pMET_degradation))/k_dephospho_TSC) + Rptor_free*S6K*k_build_mTORC1*k_dephospho_S6K^2*k_dissociate_mTORC1^2*k_inhibit_mTORC2_S6K*k_phospho_S6K*mTOR_free*(TSC*k_phospho_TSC_ERK*(ERK*MEK*MET*k_phospho_ERK*k_phospho_MEK*k_phospho_MET_basal/(k_dephospho_pERK*k_dephospho_pMEK*k_pMET_degradation))/k_dephospho_TSC) + k_dephospho_S6K^3*k_dissociate_mTORC1^3));
  species mTOR_free in cytoplasm = 1/cytoplasm;
  species Mapkap1_free in cytoplasm = 1/cytoplasm;
  species mTORC2 in cytoplasm = MET*Mapkap1_free*PI3K*k_build_mTORC2*k_dephospho_S6K^2*k_dissociate_mTORC1^2*k_phospho_MET_basal*k_recruit_PI3K_MET*mTOR_free/(k_dissociate_mTORC2*k_pMET_degradation*k_release_PI3K*(Rptor_free^2*S6K^2*k_build_mTORC1^2*k_inhibit_IRS1_S6K*k_inhibit_mTORC2_S6K*k_phospho_S6K^2*mTOR_free^2*(TSC*k_phospho_TSC_ERK*(ERK*MEK*MET*k_phospho_ERK*k_phospho_MEK*k_phospho_MET_basal/(k_dephospho_pERK*k_dephospho_pMEK*k_pMET_degradation))/k_dephospho_TSC)^2 + Rptor_free*S6K*k_build_mTORC1*k_dephospho_S6K*k_dissociate_mTORC1*k_inhibit_IRS1_S6K*k_phospho_S6K*mTOR_free*(TSC*k_phospho_TSC_ERK*(ERK*MEK*MET*k_phospho_ERK*k_phospho_MEK*k_phospho_MET_basal/(k_dephospho_pERK*k_dephospho_pMEK*k_pMET_degradation))/k_dephospho_TSC) + Rptor_free*S6K*k_build_mTORC1*k_dephospho_S6K*k_dissociate_mTORC1*k_inhibit_mTORC2_S6K*k_phospho_S6K*mTOR_free*(TSC*k_phospho_TSC_ERK*(ERK*MEK*MET*k_phospho_ERK*k_phospho_MEK*k_phospho_MET_basal/(k_dephospho_pERK*k_dephospho_pMEK*k_pMET_degradation))/k_dephospho_TSC) + k_dephospho_S6K^2*k_dissociate_mTORC1^2));
  species pTSC in cytoplasm = TSC*k_phospho_TSC_ERK*(ERK*MEK*MET*k_phospho_ERK*k_phospho_MEK*k_phospho_MET_basal/(k_dephospho_pERK*k_dephospho_pMEK*k_pMET_degradation))/k_dephospho_TSC;
  species TSC in cytoplasm = 1/cytoplasm;
  species Rptor_free in cytoplasm = 1/cytoplasm;
  species mTORC1 in cytoplasm = Rptor_free*k_build_mTORC1*mTOR_free*(TSC*k_phospho_TSC_ERK*(ERK*MEK*MET*k_phospho_ERK*k_phospho_MEK*k_phospho_MET_basal/(k_dephospho_pERK*k_dephospho_pMEK*k_pMET_degradation))/k_dephospho_TSC)/k_dissociate_mTORC1;
  species S6K in cytoplasm = 1/cytoplasm;
  species pS6K in cytoplasm = Rptor_free*S6K*k_build_mTORC1*k_phospho_S6K*mTOR_free*(TSC*k_phospho_TSC_ERK*(ERK*MEK*MET*k_phospho_ERK*k_phospho_MEK*k_phospho_MET_basal/(k_dephospho_pERK*k_dephospho_pMEK*k_pMET_degradation))/k_dephospho_TSC)/(k_dephospho_S6K*k_dissociate_mTORC1);
  species S6 in cytoplasm = 1/cytoplasm;
  species pS6 in cytoplasm = Rptor_free*S6*S6K*k_build_mTORC1*k_phospho_S6*k_phospho_S6K*mTOR_free*(TSC*k_phospho_TSC_ERK*(ERK*MEK*MET*k_phospho_ERK*k_phospho_MEK*k_phospho_MET_basal/(k_dephospho_pERK*k_dephospho_pMEK*k_pMET_degradation))/k_dephospho_TSC)/(k_dephospho_S6K*k_dephospho_pS6*k_dissociate_mTORC1);

  // Parameters:
  k_phospho_MET = 0.1;
  k_phospho_MET_basal = 0.1333333;
  k_pMET_degradation = 0.1666667;
  k_MET_expression = MET*k_MET_degradation + MET*k_phospho_MET_basal;
  k_MET_degradation = 0.2333333;
  k_phospho_MEK = 0.2666667;
  k_dephospho_pMEK = 0.3;
  k_phospho_ERK = 0.3333333;
  k_dephospho_pERK = 0.3666667;
  k_recruit_PI3K_MET = 0.4;
  k_inhibit_IRS1_S6K = 0.4333333;
  k_release_PI3K = 0.4666667;
  k_phospho_AKT_T308 = 0.5;
  k_phospho_AKT_S473 = 0.5333333;
  k_dephospho_pAKT_S473 = 0.5666667;
  k_dephospho_pAKT_T308 = 0.6;
  k_build_mTORC2 = 0.6333333;
  k_inhibit_mTORC2_S6K = 0.6666667;
  k_dissociate_mTORC2 = 0.7;
  k_dephospho_TSC = 0.7333333;
  k_phospho_TSC_ERK = 0.7666667;
  k_phospho_TSC_AKT = 0.8;
  k_build_mTORC1 = 0.8333333;
  k_dissociate_mTORC1 = 0.8666667;
  k_phospho_S6K = 0.9;
  k_dephospho_S6K = 0.9333333;
  k_phospho_S6 = 0.9666667;
  k_dephospho_pS6 = 1;

  // Reactions:
  HGFinducedMETphosphorylationNISS: MET + HGF => pMET; k_phospho_MET*MET*HGF*cytoplasm;
  basalMETphosphorylation: MET => pMET; k_phospho_MET_basal*MET*cytoplasm;
  pMETdegradation: pMET => ; k_pMET_degradation*pMET*cytoplasm;
  METexpression: => MET; k_MET_expression*cytoplasm;
  METdegradation: MET => ; k_MET_degradation*MET*cytoplasm;
  METinducedMEKphosphorylation: MEK => pMEK; k_phospho_MEK*MEK*pMET*cytoplasm;  // modifiers: pMET
  MEKdephosphorylation: pMEK => MEK; k_dephospho_pMEK*pMEK*cytoplasm;
  MEKinducedERKphosphorylation: ERK => pERK; k_phospho_ERK*ERK*pMEK*cytoplasm;  // modifiers: pMEK
  ERKdephosphorylation: pERK => ERK; k_dephospho_pERK*pERK*cytoplasm;
  PI3KactivationinhibitedbypS6K: PI3K => PI3K_atMembrane; k_recruit_PI3K_MET*PI3K*pMET*(1/(1 + k_inhibit_IRS1_S6K*pS6K))*cytoplasm;  // modifiers: pMET, pS6K
  PI3Kinactivation: PI3K_atMembrane => PI3K; k_release_PI3K*PI3K_atMembrane*cytoplasm;
  PhosphorylationofAKTatT308: AKT => pAKT_T308; k_phospho_AKT_T308*AKT*PI3K_atMembrane*cytoplasm;  // modifiers: PI3K_atMembrane
  PhosphorylationofAKTatS473: pAKT_T308 => pAKT_T308_S473; k_phospho_AKT_S473*pAKT_T308*mTORC2*cytoplasm;  // modifiers: mTORC2
  DephosphorylationofAKTatS473: pAKT_T308_S473 => pAKT_T308; k_dephospho_pAKT_S473*pAKT_T308_S473*cytoplasm;
  DephosphorylationofAKTatT308: pAKT_T308 => AKT; k_dephospho_pAKT_T308*pAKT_T308*cytoplasm;
  mTORC2complexformationinhibitedbypS6K: mTOR_free + Mapkap1_free => mTORC2; k_build_mTORC2*mTOR_free*Mapkap1_free*PI3K_atMembrane*(1/(1 + k_inhibit_mTORC2_S6K*pS6K))*cytoplasm;  // modifiers: PI3K_atMembrane, pS6K
  mTORC2complexdissociation: mTORC2 => mTOR_free + Mapkap1_free; k_dissociate_mTORC2*mTORC2*cytoplasm;
  TSCdephosphorylation: pTSC => TSC; k_dephospho_TSC*pTSC*cytoplasm;
  TSCphosphorylationbypERK: TSC => pTSC; k_phospho_TSC_ERK*TSC*pERK*cytoplasm;  // modifiers: pERK
  TSCphosphorylationbypAKT: TSC => pTSC; k_phospho_TSC_AKT*TSC*pAKT_T308*cytoplasm;  // modifiers: pAKT_T308
  mTORC1complexformation: mTOR_free + Rptor_free => mTORC1; k_build_mTORC1*mTOR_free*Rptor_free*pTSC*cytoplasm;  // modifiers: pTSC
  mTORC1complexdissociation: mTORC1 => mTOR_free + Rptor_free; k_dissociate_mTORC1*mTORC1*cytoplasm;
  S6KphosphorylationbymTORC1: S6K => pS6K; k_phospho_S6K*S6K*mTORC1*cytoplasm;  // modifiers: mTORC1
  S6Kdephosphorylation: pS6K => S6K; k_dephospho_S6K*pS6K*cytoplasm;
  S6phosphorylationbypS6K: S6 => pS6; k_phospho_S6*S6*pS6K*cytoplasm;  // modifiers: pS6K
  S6dephosphorylation: pS6 => S6; k_dephospho_pS6*pS6*cytoplasm;

  // Unit definitions:
  unit time = 60 second;
end
