// SBML level 2 version 4
// dcterms:bibliographicCitation: urn:miriam:pubmed:29370865

function function_for_X2_degradation(k_ma, E_bile, X5, X2)
  k_ma*(1 + E_bile*X5)*X2;
end

model New_Model()
  // Back2018 - Mechanistic PK model of Fenofibrate
  // A mechanistic GI absorption model for quantitatively evaluating the effects of food on fenofibrate absorption was successfully developed, and acceptable parameters were obtained. The mechanism-based PK model of fenofibrate can quantify the effects of food on drug absorption by food type and calorie content. Model is encoded by Matthew Roberts and submitted to BioModels by Krishna Tiwari.
  // isDescribedBy pubmed:29370865
  // hasProperty mamo:MAMO_0000046
  // biomodels.db:MODEL2003030002

  // Compartments:
  compartment Compartment = 1;

  // Species:
  species X1 in Compartment = 250;
  species X2 in Compartment = 1e-5;
  species X3 in Compartment = 1e-5;
  species X4 in Compartment = 0;
  species X5 in Compartment = 0;

  // Parameters:
  k_g = 0.067;
  k_ma = 0.24;
  E_bile = 0.0239;
  k_el = 0.27;
  k_g_prime = 0.00971;
  k_out = 0.00972;
  k_g_individual = 0;
  TV_k_g = 0;
  E_food = 0;
  m_past_1 = 0;
  m_past_2 = 0;
  eta_i = 0;

  // Reactions:
  reaction: X1 => X2; Compartment*k_g*X1;
  reaction_1: X2 => X3; Compartment*function_for_X2_degradation(k_ma, E_bile, X5, X2);  // modifiers: X5
  reaction_2: X3 => ; Compartment*k_el*X3;
  reaction_3: X4 => X5; Compartment*k_g_prime*X4;
  reaction_4: X5 => ; Compartment*k_out*X5;

  // Unit definitions:
  unit volume = 1e-3 litre;
  unit substance = 1e-3 mole;
end
