// SBML level 2 version 4
// dcterms:bibliographicCitation: urn:miriam:pubmed:22391791

model Wu2017___Murine_Bevacizumab_PK_model()
  // Wu2017 - Murine Bevacizumab PK model
  // This is the first report evaluating the use of fluorescent imaging to determine the pharmacokinetics, lymphatic uptake, and bioavailability of a near-infrared dye-labeled antibody conjugate. Model is encoded by Matthew Roberts and submitted to BioModels by Krishna Tiwari.
  // isDescribedBy pubmed:22391791
  // hasProperty mamo:MAMO_0000046
  // biomodels.db:MODEL2003030003

  // Compartments:
  compartment compartment = 1;

  // Species:
  species $Cs_iv in compartment = 0.45;
  species $At_iv in compartment = 0;
  species $Cs_sc in compartment = 0;
  species $At_sc in compartment = 0;
  species $CLN_sc in compartment = 0;
  species $Asc in compartment = 0.45;

  // Parameters:
  k_10 = 0.0162;
  k_12 = 0.0314;
  k_21 = 0.0131;
  V_c = 319;
  V_LN = 0.33;
  k_a2 = 0.723;
  k_a1 = 4.82;
  BIO = 1;
  Frc = 0.00964;
  AUC_sc = 91.4;
  AUC_iv = 64.7;
  dose_iv = 0.45;
  dose_sc = 0.45;

  // Rate rules:
  Cs_iv' = (-1*(k_12 + k_10)*Cs_iv*V_c + k_21*At_iv)/V_c;
  At_iv' = k_12*Cs_iv*V_c - k_21*At_sc;
  Cs_sc' = (-1*(k_12 + k_10)*Cs_sc*V_c + k_21*At_sc + k_a2*CLN_sc*V_LN + BIO*(1 - Frc)*k_a1*Asc)/V_c;
  At_sc' = k_12*Cs_sc*V_c - k_21*At_sc;
  CLN_sc' = (BIO*Frc*k_a1*Asc - k_a2*CLN_sc*V_LN)/V_LN;
  Asc' = -BIO*k_a1*Asc;

  // Unit definitions:
  unit volume = 1e-3 litre;
  unit substance = 1e-3 mole;
end
