// SBML level 2 version 4
// dcterms:bibliographicCitation: urn:miriam:doi:10.20944/preprints201802.0004.v1

function secondary_death(substrate, const)
  substrate*substrate*const;
end

function linear_growth(substrate, const)
  substrate*const;
end

function immune_source_0(s, b)
  s*b;
end

function estrogen_source_0(e, k)
  e*(1 - k);
end

function tumor_growth_0(T, d, a2)
  T*d*a2;
end

function tumor_kill_0(y2, M, T)
  y2*M*T;
end

function tumor_growth_estrogen_0(k, l1, N, E)
  (1 - k)*l1*N*E;
end
tumor_growth_estrogen_0 is "tumor growth-estrogen";

function IS_estrogen(k, l3, M, E, g)
  (1 - k)*l3*M*E/(g + E);
end
IS_estrogen is "IS-estrogen";

function immune_stimulation_0(p, M, T, w)
  p*M*T/(w + T);
end

function immune_deplete_tumor_0(y3, M, T)
  y3*M*T;
end
immune_deplete_tumor_0 is "immune deplete-tumor";

function cell_death_tumor_0(N, f1, T)
  N*f1*T;
end
cell_death_tumor_0 is "cell death-tumor";

function cell_death_estrogen_0(k, l1, N, E)
  (1 - k)*l1*N*E;
end
cell_death_estrogen_0 is "cell death-estrogen";

model Matadi2018()
  // Segun2018 - model of breast cancer determing Chemotherapy and Keto diet response
  // optimal control theory is applied to find out the optimal drug adjustment as an input control of the system therapies to minimize the number of cancerous cells by considering different controlled combinations of administering the chemotherapy agent and ketogenic diet using the popular Pontryagin’s Maximum Principle. Numerical simulations were presented to validate our theoretical results. Model is encoded by Jinghoa Men and submitted to BioModels by Krishna Tiwari.
  // isDescribedBy doi:10.20944/preprints201802.0004.v1
  // hasProperty mamo:MAMO_0000046
  // biomodels.db:MODEL2003050001

  // Compartments:
  compartment tumor = 1;

  // Species:
  // normal cells count
  species N in tumor = 2000;
  // tumor cells count
  species T in tumor = 800;
  // immune response
  species M in tumor = 500;
  // estrogen
  species E in tumor = 20;

  // Parameters:
  // normal cell growth rate
  a1 = 0.7 unit_0;
  // tumor cell growth rate
  a2 = 0.514 unit_0;
  // normal cell death
  u1 = 3e-5 unit_0;
  // tumor cell death
  u2 = 0.01 unit_0;
  // inhibition of normal cells
  f1 = 6e-8 unit_0;
  // tumor cell killing
  y2 = 3e-6 unit_0;
  // interaction coeff. with immune response
  y3 = 1e-7 unit_0;
  // immune cell source
  s = 13000 unit_0;
  // estrogen source
  e = 13000 unit_0;
  // immune threshold rate
  w = 300000 unit_1;
  // immune response rate
  p = 0.2 unit_0;
  // immune cell death
  u3 = 0.29 unit_0;
  // 0 to 1
  // efficacy of anti-cancer drug
  k = 0 unit_1;
  // supplement for immune booster
  b = 0.01 unit_1;
  // tumor formation rate as result of DNA damage by estrogen
  l1 = 0.2 unit_0;
  // immune suppression due to estrogen
  l3 = 0.002 unit_0;
  // decay factor (assume)
  g = 0.1 unit_1;
  // estrogen decay
  u4 = 0.97 unit_0;
  // death rate due to ketogenic diet
  u5 = 2 unit_0;
  // ketogenic diet
  d = 0.5 unit_1;

  // Reactions:
  tumor_kill: T => ; tumor*tumor_kill_0(y2, M, T);  // modifiers: M
  tumor_growth: => T; tumor*tumor_growth_0(T, d, a2);
  tumor_growth_estrogen: => T; tumor*tumor_growth_estrogen_0(k, l1, E, N); tumor_growth_estrogen is "tumor growth-estrogen";  // modifiers: E, N
  tumor_death: T => ; tumor*secondary_death(T, u2);
  tumor_death_diet: T => ; tumor*u5*T; tumor_death_diet is "tumor death-diet";
  cell_growth: => N; tumor*linear_growth(N, a1);
  cell_death: N => ; tumor*secondary_death(N, u1);
  cell_death_tumor: N => ; tumor*cell_death_tumor_0(N, f1, T); cell_death_tumor is "cell death-tumor";  // modifiers: T
  cell_death_estrogen: N => ; tumor*cell_death_estrogen_0(k, l1, N, E); cell_death_estrogen is "cell death-estrogen";  // modifiers: E
  immune_source: => M; tumor*immune_source_0(s, b);
  immune_stimulation: => M; tumor*immune_stimulation_0(p, M, T, w);  // modifiers: T
  immune_deplete_tumor: M => ; tumor*immune_deplete_tumor_0(y3, M, T); immune_deplete_tumor is "immune deplete-tumor";  // modifiers: T
  immune_decay: M => ; tumor*u3*M;
  immune_suppression_estrogen: M => ; tumor*IS_estrogen(k, l3, M, E, g); immune_suppression_estrogen is "immune suppression-estrogen";  // modifiers: E
  estrogen_source: => E; tumor*estrogen_source_0(e, k);
  estrogen_decay: E => ; tumor*u4*E;

  // Unit definitions:
  unit volume = 1e-3 litre;
  unit time = 86400 second;
  unit substance = 1e-3 mole;
  unit unit_0 = 1 / (8640 second); unit_0 is "1/d";
  unit unit_1 = dimensionless^0;
end
