// SBML level 3 version 1

model Dual_G_protein_Model()
  // biomodels.db:MODEL2306210001
  // hasProperty mamo:MAMO_0000046
  // isDescribedBy pubmed:40392940
  // model units - substance: substance, time: time, volume: volume, area: area, length: length, extent: substance

  // Compartments:
  compartment compartment = 1 volume;

  // Species:
  species L in compartment = 0;
  species LRi in compartment = 0;
  species Ri in compartment = 4.15e-10;
  species Ra in compartment = 0;
  species LRa in compartment = 0;
  species G1 in compartment = 4.15e-10;
  species RiG1 in compartment = 0;
  species LRiG1 in compartment = 0;
  species RaG1 in compartment = 0;
  species LRaG1 in compartment = 0;
  species G2 in compartment = 4.15e-10;
  species RiG2 in compartment = 0;
  species LRiG2 in compartment = 0;
  species RaG2 in compartment = 0;
  species LRaG2 in compartment = 0;
  species G1aGTP in compartment = 0;
  species Gbg in compartment = 0;
  species G2aGTP in compartment = 0;
  species G1aGDP in compartment = 0;
  species G2aGDP in compartment = 0;

  // Parameters:
  kL = 13600000 unit_0; kL is "kL+";
  kL_0 = 3.61 unit_1; kL_0 is "kL-";
  kact = 3.84e-6 unit_1; kact is "kact+";
  kact_0 = 25.4 unit_1; kact_0 is "kact-";
  kG1 = 16000000 unit_0; kG1 is "kG1+";
  kG1_0 = 5.33e-5 unit_1; kG1_0 is "kG1-";
  kG2 = 16000000 unit_0; kG2 is "kG2+";
  kG2_0 = 5.33e-5 unit_1; kG2_0 is "kG2-";
  alpha = 2580 unit_2; alpha is "alpha+";
  alpha_0 = 0.0102 unit_2; alpha_0 is "alpha-";
  beta1 = 0.785 unit_2; beta1 is "beta1+";
  beta1_0 = 5240000 unit_2; beta1_0 is "beta1-";
  beta2 = 0.785 unit_2; beta2 is "beta2+";
  beta2_0 = 5240000 unit_2; beta2_0 is "beta2-";
  gamma1 = 0.0986 unit_2; gamma1 is "gamma1+";
  gamma1_0 = 0.0135 unit_2; gamma1_0 is "gamma1-";
  gamma2 = 0.0986 unit_2; gamma2 is "gamma2+";
  gamma2_0 = 0.0135 unit_2; gamma2_0 is "gamma2-";
  k_GDA1 = 548690100 unit_3; k_GDA1 is "k_GDA1+";
  k_GDA1_0 = 1e-10 unit_0; k_GDA1_0 is "k_GDA1-";
  k_GDA2 = 548690100 unit_3; k_GDA2 is "k_GDA2+";
  k_GDA2_0 = 1e-10 unit_0; k_GDA2_0 is "k_GDA2-";
  k_hyd1 = 0.515 unit_4; k_hyd1 is "k_hyd1+";
  k_hyd1_0 = 2e-5 unit_1; k_hyd1_0 is "k_hyd1-";
  k_hyd2 = 0.515 unit_4; k_hyd2 is "k_hyd2+";
  k_hyd2_0 = 2e-5 unit_1; k_hyd2_0 is "k_hyd2-";
  k_GRA1 = 242000000 unit_0; k_GRA1 is "k_GRA1+";
  k_GRA1_0 = 1e-10 unit_1; k_GRA1_0 is "k_GRA1-";
  k_GRA2 = 242000000 unit_0; k_GRA2 is "k_GRA2+";
  k_GRA2_0 = 1e-10 unit_1; k_GRA2_0 is "k_GRA2-";
  k01 has unit_0; k01 is "k01+";
  k01_0 has unit_0; k01_0 is "k01-";
  k02 has unit_0; k02 is "k02+";
  k02_0 has unit_0; k02_0 is "k02-";
  k03 has unit_0; k03 is "k03+";
  k03_0 has unit_0; k03_0 is "k03-";
  k04 has unit_0; k04 is "k04+";
  k04_0 has unit_0; k04_0 is "k04-";
  k05 has unit_0; k05 is "k05+";
  k05_0 has unit_0; k05_0 is "k05-";
  k06 has unit_0; k06 is "k06+";
  k06_0 has unit_0; k06_0 is "k06-";
  k07 has unit_0; k07 is "k07+";
  k07_0 has unit_0; k07_0 is "k07-";
  k08 has unit_0; k08 is "k08+";
  k08_0 has unit_0; k08_0 is "k08-";
  k09 has unit_0; k09 is "k09+";
  k09_0 has unit_0; k09_0 is "k09-";
  k10 has unit_0; k10 is "k10+";
  k10_0 has unit_0; k10_0 is "k10-";
  k11 has unit_0; k11 is "k11+";
  k11_0 has unit_0; k11_0 is "k11-";
  k12 has unit_0; k12 is "k12+";
  k12_0 has unit_0; k12_0 is "k12-";
  k13 has unit_0; k13 is "k13+";
  k13_0 has unit_0; k13_0 is "k13-";
  k14 has unit_0; k14 is "k14+";
  k14_0 has unit_0; k14_0 is "k14-";
  k15 has unit_0; k15 is "k15+";
  k15_0 has unit_0; k15_0 is "k15-";
  k16 has unit_0; k16 is "k16+";
  k16_0 has unit_0; k16_0 is "k16-";
  k17 has unit_0; k17 is "k17+";
  k17_0 has unit_0; k17_0 is "k17-";
  k18 has unit_0; k18 is "k18+";
  k18_0 has unit_0; k18_0 is "k18-";
  k19 has unit_0; k19 is "k19+";
  k19_0 has unit_0; k19_0 is "k19-";
  k20 has unit_0; k20 is "k20+";
  k20_0 has unit_0; k20_0 is "k20-";
  k21 has unit_0; k21 is "k21+";
  k21_0 has unit_0; k21_0 is "k21-";
  k22 has unit_0; k22 is "k22+";
  k22_0 has unit_0; k22_0 is "k22-";
  k23 has unit_0; k23 is "k23+";
  k23_0 has unit_0; k23_0 is "k23-";
  k24 has unit_0; k24 is "k24+";
  k24_0 has unit_0; k24_0 is "k24-";
  k25 has unit_0; k25 is "k25+";
  k25_0 has unit_0; k25_0 is "k25-";
  k26 has unit_0; k26 is "k26+";
  k26_0 has unit_0; k26_0 is "k26-";
  k27 has unit_0; k27 is "k27+";
  k27_0 has unit_0; k27_0 is "k27-";
  k28 has unit_0; k28 is "k28+";
  k28_0 has unit_0; k28_0 is "k28-";
  LigandConcAdded = 1e-6;
  v_Gtot1_at_L = 1;
  v_Gtot2_at_L = 1;
  v_Gtot_Total_at_L = 1;
  TRUPATH_Sys_Max = 1.389682;

  // Assignment rules:
  k28_0 := k_GRA2_0;
  k28 := k_GRA2;
  k02_0 := kact_0;
  k03 := kact*alpha;
  k05 := kG1;
  k06_0 := kG1_0*gamma1_0;
  v_Gtot1 := G1 + RiG1 + LRiG1 + RaG1 + LRaG1;
  k06 := kG1*gamma1;
  k05_0 := kG1_0;
  k08_0 := kG1_0*beta1_0*gamma1_0;
  k10_0 := kG2_0*gamma2_0;
  k04 := kL*alpha;
  k13_0 := kL_0*gamma1_0;
  k13 := kL*gamma1;
  k04_0 := kL_0*alpha_0;
  k08 := kG1*beta1*gamma1;
  k14 := kact*beta1;
  k07 := kG1*beta1;
  k09_0 := kG2_0;
  k09 := kG2;
  k07_0 := kG1_0*beta1_0;
  k10 := kG2*gamma2;
  k11 := kG2*beta2;
  k11_0 := kG2_0*beta2_0;
  k12 := kG2*beta2*gamma2;
  k12_0 := kG2_0*beta2_0*gamma2_0;
  k14_0 := kact_0*beta1_0;
  k15 := kact*alpha*beta1;
  k15_0 := kact_0*alpha_0*beta1_0;
  k16 := kL*alpha*gamma1;
  k16_0 := kL_0*alpha_0*gamma1_0;
  k17 := kL*gamma2;
  k17_0 := kL_0*gamma2_0;
  k18 := kact*beta2;
  k18_0 := kact_0*beta2_0;
  k19 := kact*alpha*beta2;
  v_Gtot2 := G2 + RiG2 + LRiG2 + RaG2 + LRaG2;
  v_Gtot_Total := v_Gtot1 + v_Gtot2;
  k01_0 := kL_0;
  k02 := kact;
  v_Simulated_TRUPATH_Total := (v_Gtot_Total - v_Gtot_Total_at_L)/v_Gtot_Total*TRUPATH_Sys_Max;
  v_Simulated_TRUPATH_G1 := (v_Gtot1 - v_Gtot1_at_L)/v_Gtot1_at_L*TRUPATH_Sys_Max;
  v_Simulated_TRUPATH_G2 := (v_Gtot2 - v_Gtot2_at_L)/v_Gtot2_at_L*TRUPATH_Sys_Max;
  k01 := kL;
  k03_0 := kact_0*alpha_0;
  k20_0 := kL_0*alpha_0*gamma2_0;
  k21 := k_GDA1;
  k21_0 := k_GDA1_0;
  k22 := k_GDA2;
  k22_0 := k_GDA2_0;
  k23 := k_GDA1*gamma1_0;
  k23_0 := k_GDA1_0*gamma1;
  k24 := k_GDA2*gamma2_0;
  k24_0 := k_GDA2_0*gamma2;
  k25 := k_hyd1;
  k25_0 := k_hyd1_0;
  k26 := k_hyd2;
  k26_0 := k_hyd2_0;
  k27 := k_GRA1;
  k27_0 := k_GRA1_0;
  k19_0 := kact_0*alpha_0*beta2_0;
  k20 := kL*alpha*gamma2;

  // Reactions:
  Ligand_Binding_Receptor: L + Ri -> LRi; compartment*(k01*L*Ri - k01_0*LRi);
  Receptor_Activation: Ri -> Ra; compartment*(k02*Ri - k02_0*Ra);
  Ligand_Bound_Receptor_Activation: LRi -> LRa; compartment*(k03*LRi - k03_0*LRa); Ligand_Bound_Receptor_Activation is "Ligand-Bound Receptor Activation";
  Ligand_Binding_Active_Receptor: L + Ra -> LRa; compartment*(k04*L*Ra - k04_0*LRa);
  G_protein1_Binding_Inactive_Receptor: Ri + G1 -> RiG1; compartment*(k05*Ri*G1 - k05_0*RiG1);
  G_protein1_Binding_Ligand_Bound__Inactive_Receptor: LRi + G1 -> LRiG1; compartment*(k06*LRi*G1 - k06_0*LRiG1); G_protein1_Binding_Ligand_Bound__Inactive_Receptor is "G protein1 Binding Ligand-Bound, Inactive Receptor";
  G_protein1_Binding_Active_Receptor: Ra + G1 -> RaG1; compartment*(k07*Ra*G1 - k07_0*RaG1);
  G_protein1_Binding_Ligand_Bound__Active_Receptor: LRa + G1 -> LRaG1; compartment*(k08*LRa*G1 - k08_0*LRaG1); G_protein1_Binding_Ligand_Bound__Active_Receptor is "G protein1 Binding Ligand-Bound, Active Receptor";
  G_protein2_Binding_Inactive_Receptor: Ri + G2 -> RiG2; compartment*(k09*Ri*G2 - k09_0*RiG2);
  G_protein2_Binding_Ligand_Bound__Inactive_Receptor: LRi + G2 -> LRiG2; compartment*(k10*LRi*G2 - k10_0*LRiG2); G_protein2_Binding_Ligand_Bound__Inactive_Receptor is "G protein2 Binding Ligand-Bound, Inactive Receptor";
  G_protein2_Binding_Active_Receptor: Ra + G2 -> RaG2; compartment*(k11*Ra*G2 - k11_0*RaG2);
  G_protein2_Binding_Ligand_Bound__Active_Receptor: LRa + G2 -> LRaG2; compartment*(k12*LRa*G2 - k12_0*LRaG2); G_protein2_Binding_Ligand_Bound__Active_Receptor is "G protein2 Binding Ligand-Bound, Active Receptor";
  Ligand_Binding_G_protein1_Bound_Receptor: L + RiG1 -> LRiG1; compartment*(k13*L*RiG1 - k13_0*LRiG1); Ligand_Binding_G_protein1_Bound_Receptor is "Ligand Binding G protein1-Bound Receptor";
  G_protein1_Bound_Receptor_Activation: RiG1 -> RaG1; compartment*(k14*RiG1 - k14_0*RaG1); G_protein1_Bound_Receptor_Activation is "G protein1-Bound Receptor Activation";
  Ligand_Bound__G_protein1_Bound_Receptor_Activation: LRiG1 -> LRaG1; compartment*(k15*LRiG1 - k15_0*LRaG1); Ligand_Bound__G_protein1_Bound_Receptor_Activation is "Ligand-Bound, G protein1-Bound Receptor Activation";
  Ligand_Binding_Active__G_protein1_Bound_Receptor: L + RaG1 -> LRaG1; compartment*(k16*L*RaG1 - k16_0*LRaG1); Ligand_Binding_Active__G_protein1_Bound_Receptor is "Ligand Binding Active, G protein1-Bound Receptor";
  Ligand_Binding_G_protein2_Bound_Receptor: L + RiG2 -> LRiG2; compartment*(k17*L*RiG2 - k17_0*LRiG2); Ligand_Binding_G_protein2_Bound_Receptor is "Ligand Binding G protein2-Bound Receptor";
  G_protein2_Bound_Receptor_Activation: RiG2 -> RaG2; compartment*(k18*RiG2 - k18_0*RaG2); G_protein2_Bound_Receptor_Activation is "G protein2-Bound Receptor Activation";
  Ligand_Bound__G_protein2_Bound_Receptor_Activation: LRiG2 -> LRaG2; compartment*(k19*LRiG2 - k19_0*LRaG2); Ligand_Bound__G_protein2_Bound_Receptor_Activation is "Ligand-Bound, G protein2-Bound Receptor Activation";
  Ligand_Binding_Active__G_protein2_Bound_Receptor: L + RaG2 -> LRaG2; compartment*(k20*L*RaG2 - k20_0*LRaG2); Ligand_Binding_Active__G_protein2_Bound_Receptor is "Ligand Binding Active, G protein2-Bound Receptor";
  G_protein1_Activation_by_Active_Receptor: RaG1 -> Ra + G1aGTP + Gbg; compartment*(k21*RaG1 - k21_0*Ra*G1aGTP*Gbg);
  G_protein2_Activation_by_Active_Receptor: RaG2 -> Ra + G2aGTP + Gbg; compartment*(k22*RaG2 - k22_0*Ra*G2aGTP*Gbg);
  G_protein1_Activation_by_Ligand_Bound__Active_Receptor: LRaG1 -> LRa + G1aGTP + Gbg; compartment*(k23*LRaG1 - k23_0*LRa*G1aGTP*Gbg); G_protein1_Activation_by_Ligand_Bound__Active_Receptor is "G protein1 Activation by Ligand-Bound, Active Receptor";
  G_protein2_Activation_by_Ligand_Bound__Active_Receptor: LRaG2 -> LRa + G2aGTP + Gbg; compartment*(k24*LRaG2 - k24_0*LRa*G2aGTP*Gbg); G_protein2_Activation_by_Ligand_Bound__Active_Receptor is "G protein2 Activation by Ligand-Bound, Active Receptor";
  Galpha_protein1_Hydrolysis: G1aGTP -> G1aGDP; compartment*(k25*G1aGTP - k25_0*G1aGDP);
  Galpha_protein2_Hydrolysis: G2aGTP -> G2aGDP; compartment*(k26*G2aGTP - k26_0*G2aGDP);
  Reformation_of_G_protein1: G1aGDP + Gbg -> G1; compartment*(k27*G1aGDP*Gbg - k27_0*G1);
  Reformation_of_G_protein2: G2aGDP + Gbg -> G2; compartment*(k28*G2aGDP*Gbg - k28_0*G2);

  // Events:
  Ligand_Addition: at (time > 1000000), persistent=false, fromTrigger=false: L = LigandConcAdded;
  Gtot1_Measurement_before_Ligand_Addition: at (time > 1000000 - 1), persistent=false, fromTrigger=false: v_Gtot1_at_L = v_Gtot1;
  Gtot2_Measurement_before_Ligand_Addition: at (time > 1000000 - 1), persistent=false, fromTrigger=false: v_Gtot2_at_L = v_Gtot2;
  Gtot_Total_Measurement_before_Ligand_Addition: at (time > 1000000 - 1), persistent=false, fromTrigger=false: v_Gtot_Total_at_L = v_Gtot_Total;

  // Unit definitions:
  unit length = metre;
  unit area = metre^2;
  unit volume = litre;
  unit time = second;
  unit substance = mole;
  unit unit_0 = litre / (mole * second); unit_0 is "l/(mol*s)";
  unit unit_1 = 1 / second; unit_1 is "1/(s)";
  unit unit_2 = dimensionless^0; unit_2 is "1";
  unit unit_3 = litre / (mole^2 * second); unit_3 is "l/(mol*mol*s)";
  unit unit_4 = litre / second; unit_4 is "l/(s)";
end
