// SBML level 3 version 1

model GPCR_Cubic_Ternary_Complex_with_G_protein_Cycle__Redfern_Nichols_2023()
  // GPCR Cubic Ternary Complex with G protein Cycle, Redfern-Nichols 2023
  // biomodels.db:MODEL2306220001
  // hasProperty mamo:MAMO_0000046
  // isDescribedBy pubmed:40392940
  // hasProperty mamo:MAMO_0000046
  // model units - substance: substance, time: time, volume: volume, area: area, length: length, extent: substance

  // Compartments:
  compartment compartment = 1 volume;

  // Species:
  species L in compartment = 0;
  species LRi in compartment = 0;
  species Ri in compartment = 4.15e-10;
  species Ra in compartment = 0;
  species G in compartment = 4.15e-10;
  species RiG in compartment = 0;
  species LRa in compartment = 0;
  species LRiG in compartment = 0;
  species RaG in compartment = 0;
  species LRaG in compartment = 0;
  species GaGTP in compartment = 0;
  species Gbg in compartment = 0;
  species GaGDP in compartment = 0;
  species ATP in compartment = 0.0001;
  species cAMP in compartment = 0;
  species AC in compartment = 4.15e-6;
  species GaGTPAC in compartment = 0;

  // Parameters:
  KL_f = 13600000 unit_0; KL_f is "kL+";
  KL_r = 3.614099 unit_1; KL_r is "kL-";
  KG_f = 16043300 unit_0; KG_f is "kG+";
  KG_r = 5.33e-5 unit_1; KG_r is "kG-";
  Kact_f = 3.8416967e-6 unit_1; Kact_f is "kact+";
  Kact_r = 25.4417 unit_1; Kact_r is "kact-";
  alpha_f = 2582.23 unit_2; alpha_f is "alpha+";
  alpha_r = 0.0101912 unit_2; alpha_r is "alpha-";
  beta_f = 0.785066 unit_2; beta_f is "beta+";
  beta_r = 5240000 unit_2; beta_r is "beta-";
  gamma_f = 0.0986129 unit_2; gamma_f is "gamma+";
  gamma_r = 0.0134553 unit_2; gamma_r is "gamma-";
  delta_f = 1 unit_2; delta_f is "delta+";
  delta_r = 1 unit_2; delta_r is "delta-";
  var kf_01; kf_01 is "k01+";
  var kr_01; kr_01 is "k01-";
  var kf_02; kf_02 is "k02+";
  var kr_02; kr_02 is "k02-";
  var kf_03; kf_03 is "k03+";
  var kr_03; kr_03 is "k03-";
  var kf_04; kf_04 is "k04+";
  var kr_04; kr_04 is "k04-";
  var kf_05; kf_05 is "k05+";
  var kr_05; kr_05 is "k05-";
  var kf_06; kf_06 is "k06+";
  var kr_06; kr_06 is "k06-";
  var kf_07; kf_07 is "k07+";
  var kr_07; kr_07 is "k07-";
  var kf_08; kf_08 is "k08+";
  var kr_08; kr_08 is "k08-";
  var kf_09; kf_09 is "k09+";
  var kr_09; kr_09 is "k09-";
  var kf_10; kf_10 is "k10+";
  var kr_10; kr_10 is "k10-";
  var kf_11; kf_11 is "k11+";
  var kr_11; kr_11 is "k11-";
  var kf_12; kf_12 is "k12+";
  var kr_12; kr_12 is "k12-";
  Event__Ligand__Applied = 1e-6 unit_3; Event__Ligand__Applied is "Event_[Ligand] Applied";
  var k13; k13 is "k13+";
  var k14; k14 is "k14+";
  kGRA = 242000000; kGRA is "kGRA+";
  khyd = 0.514947; khyd is "khyd+";
  khyd_0 = 2.004472e-5; khyd_0 is "khyd-";
  kGDA = 548700000; kGDA is "kGDA+";
  var _G_tot; _G_tot is "[G]tot";
  LigandConcAdded = 2.718904e-10;
  var k13_0; k13_0 is "k13-";
  kGRA_0 = 1e-10; kGRA_0 is "kGRA-";
  var k14_0; k14_0 is "k14-";
  kGDA_0 = 1e-10; kGDA_0 is "kGDA-";
  var k16; k16 is "k16+";
  var k16_0; k16_0 is "k16-";
  var k15; k15 is "k15+";
  var k15_0; k15_0 is "k15-";
  TRUPATH_System_Max = 1.389682;
  var Simulated_TRUPATH;
  kdeg = 0.1; kdeg is "kdeg+";
  ksyn = 100000; ksyn is "ksyn+";
  kACU = 0.001; kACU is "kACU+";
  var k17; k17 is "k17+";
  var k17_0; k17_0 is "k17-";
  var k18; k18 is "k18+";
  var k18_0; k18_0 is "k18-";
  var k19; k19 is "k19+";
  var k19_0; k19_0 is "k19-";
  ksyn_0 = 1e-20; ksyn_0 is "ksyn-";
  kACU_0 = 1e-20; kACU_0 is "kACU-";
  kdeg_0 = 1e-20; kdeg_0 is "kdeg-";
  ModelValue_38 = Event__Ligand__Applied; ModelValue_38 is "Initial for Event_[Ligand] Applied";
  ModelValue_6 = alpha_f; ModelValue_6 is "Initial for alpha+";
  ModelValue_7 = alpha_r; ModelValue_7 is "Initial for alpha-";
  ModelValue_8 = beta_f; ModelValue_8 is "Initial for beta+";
  ModelValue_9 = beta_r; ModelValue_9 is "Initial for beta-";
  ModelValue_12 = delta_f; ModelValue_12 is "Initial for delta+";
  ModelValue_13 = delta_r; ModelValue_13 is "Initial for delta-";
  ModelValue_10 = gamma_f; ModelValue_10 is "Initial for gamma+";
  ModelValue_11 = gamma_r; ModelValue_11 is "Initial for gamma-";
  ModelValue_2 = KG_f; ModelValue_2 is "Initial for kG+";
  ModelValue_3 = KG_r; ModelValue_3 is "Initial for kG-";
  ModelValue_0 = KL_f; ModelValue_0 is "Initial for kL+";
  ModelValue_1 = KL_r; ModelValue_1 is "Initial for kL-";
  ModelValue_4 = Kact_f; ModelValue_4 is "Initial for kact+";
  ModelValue_5 = Kact_r; ModelValue_5 is "Initial for kact-";

  // Assignment rules:
  kr_11 := ModelValue_1*ModelValue_7*ModelValue_11*ModelValue_13;
  kf_12 := ModelValue_4*ModelValue_6*ModelValue_8*ModelValue_12;
  kr_10 := ModelValue_3*ModelValue_9*ModelValue_11*ModelValue_13;
  kf_11 := ModelValue_0*ModelValue_6*ModelValue_10*ModelValue_12;
  kf_10 := ModelValue_2*ModelValue_8*ModelValue_10*ModelValue_12;
  kr_09 := ModelValue_5*ModelValue_9;
  kr_12 := ModelValue_5*ModelValue_7*ModelValue_9*ModelValue_13;
  k13 := kGDA;
  k14 := kGDA*gamma_r;
  _G_tot := G + RiG + RaG + LRiG + LRaG;
  k13_0 := kGDA_0;
  k14_0 := kGDA_0*gamma_f;
  k16 := kGRA;
  k16_0 := kGRA_0;
  k15 := khyd;
  k15_0 := khyd_0;
  Simulated_TRUPATH := (_G_tot - LigandConcAdded)/LigandConcAdded*TRUPATH_System_Max;
  k17 := ksyn;
  k17_0 := ksyn_0;
  k18 := kdeg;
  k18_0 := kdeg_0;
  k19 := kACU;
  k19_0 := kACU_0;
  timePostLigandAddition := time - 1000000;
  kf_01 := ModelValue_0;
  kr_01 := ModelValue_1;
  kf_02 := ModelValue_4;
  kr_02 := ModelValue_5;
  kf_03 := ModelValue_2;
  kr_03 := ModelValue_3;
  kf_04 := ModelValue_4*ModelValue_6;
  kr_04 := ModelValue_5*ModelValue_7;
  kf_05 := ModelValue_2*ModelValue_10;
  kr_05 := ModelValue_3*ModelValue_11;
  kf_06 := ModelValue_2*ModelValue_8;
  kr_06 := ModelValue_3*ModelValue_9;
  kf_07 := ModelValue_0*ModelValue_6;
  kr_07 := ModelValue_1*ModelValue_7;
  kf_08 := ModelValue_0*ModelValue_10;
  kr_08 := ModelValue_1*ModelValue_11;
  kf_09 := ModelValue_4*ModelValue_8;

  // Reactions:
  Ligand_binding_to_Ri: L + Ri -> LRi; compartment*(kf_01*L*Ri - kr_01*LRi); Ligand_binding_to_Ri is "01 Ligand binding to Ri";
  Activation_of_Ri: Ri -> Ra; compartment*(kf_02*Ri - kr_02*Ra); Activation_of_Ri is "02 Activation of Ri";
  G_protein_binding_to_Ri: Ri + G -> RiG; compartment*(kf_03*Ri*G - kr_03*RiG); G_protein_binding_to_Ri is "03 G protein binding to Ri";
  Activation_of_LRi: LRi -> LRa; compartment*(kf_04*LRi - kr_04*LRa); Activation_of_LRi is "04 Activation of LRi";
  G_protein_binding_to_LRi: LRi + G -> LRiG; compartment*(kf_05*LRi*G - kr_05*LRiG); G_protein_binding_to_LRi is "05 G protein binding to LRi";
  G_protein_binding_to_Ra: Ra + G -> RaG; compartment*(kf_06*Ra*G - kr_06*RaG); G_protein_binding_to_Ra is "06 G protein binding to Ra";
  Ligand_binding_to_Ra: L + Ra -> LRa; compartment*(kf_07*L*Ra - kr_07*LRa); Ligand_binding_to_Ra is "07 Ligand binding to Ra";
  Ligand_binding_to_RiG: L + RiG -> LRiG; compartment*(kf_08*L*RiG - kr_08*LRiG); Ligand_binding_to_RiG is "08 Ligand binding to RiG";
  Activation_of_RiG: RiG -> RaG; compartment*(kf_09*RiG - kr_09*RaG); Activation_of_RiG is "09 Activation of RiG";
  G_protein_binding_to_LRa: LRa + G -> LRaG; compartment*(kf_10*LRa*G - kr_10*LRaG); G_protein_binding_to_LRa is "10 G protein binding to LRa";
  Ligand_binding_to_RaG: L + RaG -> LRaG; compartment*(kf_11*L*RaG - kr_11*LRaG); Ligand_binding_to_RaG is "11 Ligand binding to RaG";
  Activation_of_LRiG: LRiG -> LRaG; compartment*(kf_12*LRiG - kr_12*LRaG); Activation_of_LRiG is "12 Activation of LRiG";
  _13_Dissociation_of_RaG: RaG -> Ra + GaGTP + Gbg; compartment*(k13*RaG - k13_0*Ra*GaGTP*Gbg);
  _14_Dissociation_of_LRaG: LRaG -> LRa + GaGTP + Gbg; compartment*(k14*LRaG - k14_0*LRa*GaGTP*Gbg);
  _16_Heterotrimeric_G_protein_formation: GaGDP + Gbg -> G; compartment*(k16*GaGDP*Gbg - k16_0*G);
  _15_GaGTP_GaGDP_Hydrolysis_Phosphorylation: GaGTP -> GaGDP; compartment*(k15*GaGTP - k15_0*GaGDP); _15_GaGTP_GaGDP_Hydrolysis_Phosphorylation is "15 GaGTP/GaGDP Hydrolysis/Phosphorylation";
  _17_cAMP_Synthesis_and_GaGTP_binding_to_AC: GaGTP + AC + ATP -> GaGTPAC + cAMP; compartment*(k17*GaGTP*AC*ATP - k17_0*GaGTPAC*cAMP);
  _18_cAMP_Degradation_and_ATP_Generation: cAMP -> ATP; compartment*(k18*cAMP - k18_0*ATP);
  _19_GaGTP_Hydrolysis_and_Unbinding_from_AC: GaGTPAC -> GaGDP + AC; compartment*(k19*GaGTPAC - k19_0*GaGDP*AC);

  // Events:
  Add_Ligand_at_Ligand_Addition_Time: at (time > 1000000), persistent=false, fromTrigger=false: L = ModelValue_38;
  Set__G_tot_at_L: at (time > 1000000 - 10), persistent=false, fromTrigger=false: LigandConcAdded = _G_tot; Set__G_tot_at_L is "Set [G]tot at L";

  // Unit definitions:
  unit length = metre;
  unit area = metre^2;
  unit volume = litre;
  unit time = second;
  unit substance = mole;
  unit unit_0 = 1 / (mole * second); unit_0 is "1/(mol*s)";
  unit unit_1 = 1 / second; unit_1 is "1/s";
  unit unit_2 = dimensionless^0; unit_2 is "1";
  unit unit_3 = mole / litre; unit_3 is "mol/l";
end
