// SBML level 2 version 4

function Henri_Michaelis_Menten__irreversible(substrate, Km, V)
  V*substrate/(Km + substrate);
end
Henri_Michaelis_Menten__irreversible is "Henri-Michaelis-Menten (irreversible)";

function Competitive_inhibition__irr(substrate, Inhibitor, Km, V, Ki)
  V*substrate/(Km + substrate + Km*Inhibitor/Ki);
end
Competitive_inhibition__irr is "Competitive inhibition (irr)";

function Hill_Cooperativity(substrate, Shalve, V, h)
  V*(substrate/Shalve)^h/(1 + (substrate/Shalve)^h);
end

model New_Model()
  // biomodels.db:MODEL2502210001
  // hasProperty mamo:MAMO_0000046
  // isDescribedBy doi:10.1101/2025.07.22.666125

  // Compartments:
  compartment compartment = 1;

  // Species:
  species A in compartment = 1;
  species B in compartment = 0;
  species C in compartment = 0;
  species D in compartment = 0;
  species E in compartment = 0;
  species F in compartment = 0;
  species G in compartment = 0;
  species H in compartment = 0;
  species I in compartment = 0;
  species J in compartment = 0;
  species K in compartment = 0;

  // Assignment rules:
  r3 := r3_0;
  r1 := r1_0;
  r7 := r7_0;
  r9 := r9_0;
  r2 := r2_0;
  r6 := r6_0;
  r4 := r4_0;
  r5 := r5_0;
  r8 := r8_0;

  // Reactions:
  r1_0: A => B; compartment*r1_0_k1*A;
    r1_0_k1 = 0.1;
  r2_0: B => C; compartment*Competitive_inhibition__irr(B, G, r2_0_Km, r2_0_V, Ki);  // modifiers: G
    r2_0_Km = 0.1; r2_0_V = 0.1; Ki = 0.01;
  r3_0: C => D + 2 E; compartment*Henri_Michaelis_Menten__irreversible(C, r3_0_Km, r3_0_V);
    r3_0_Km = 0.1; r3_0_V = 0.1;
  r4_0: B => F; compartment*Henri_Michaelis_Menten__irreversible(B, r4_0_Km, r4_0_V);
    r4_0_Km = 0.1; r4_0_V = 0.1;
  r5_0: F => G; compartment*Henri_Michaelis_Menten__irreversible(F, r5_0_Km, r5_0_V);
    r5_0_Km = 0.1; r5_0_V = 0.1;
  r6_0: G => H; compartment*Henri_Michaelis_Menten__irreversible(G, r6_0_Km, r6_0_V);
    r6_0_Km = 0.1; r6_0_V = 0.1;
  r7_0: G => I + K; compartment*Hill_Cooperativity(G, Shalve, r7_0_V, h);
    Shalve = 0.1; r7_0_V = 0.1; h = 1.5;
  r8_0: I => J; compartment*Henri_Michaelis_Menten__irreversible(I, r8_0_Km, r8_0_V);
    r8_0_Km = 0.1; r8_0_V = 0.1;
  r9_0: J => F; compartment*r9_0_k1*J;
    r9_0_k1 = 0.1;

  // Unit definitions:
  unit length = metre;
  unit area = metre^2;
  unit volume = litre;
  unit time = 0.06 second;
  unit substance = mole;
end
