// SBML level 3 version 2

model kurpad23_study1()
  // Kurpad 2023 - vitamin B12 metabolism in humans [study 1]
  // "Bioavailability and daily requirement of vitamin B12 in adult humans: an observational study of its colonic absorption and daily excretion as measured by [13C]-cyanocobalamin kinetics" by Anura Kurpad and friends (2023)
  // This model represents Study 1 with the oral dose.
  // isDescribedBy doi:10.1016/j.ajcnut.2023.08.020
  // hasTaxon taxonomy:9606
  // hasProperty mamo:MAMO_0000046 GO:0009235
  // biomodels.db:MODEL2503310002
  // model units - substance: pmol, time: h, volume: litre, area: dimensionless, length: dimensionless, extent: pmol

  // Compartments:
  compartment V = 3.85 litre;
  compartment comp = 0.63 litre;

  // Species:
  species C_0_dose in comp = 1738.3; C_0_dose is "C_0 [dose]";  // CHEBI:176843
  species C_1_plasma in V = 0; C_1_plasma is "C_1 [plasma]";  // CHEBI:176843
  species C_2_tissue in V = 0; C_2_tissue is "C_2 [tissue]";  // CHEBI:176843

  // Parameters:
  k_1 = 8e-6 per_h;
  k_2 = 0.0002 per_h;
  k_12 = 4.32 per_h;
  k_21 = 0.15 per_h;
  Tk_1 = 7.14 h;
  Tk_2 = 2.2 h;
  Tk_3 = 1.46 h;
  F_1 = 0.63 dimensionless;
  F_2 = 0.25 dimensionless;
  Tlag_2 = 4.09 h;
  Tlag_3 = 8.65 h;
  D = 1738.3 pmol;
  f = 0.63 dimensionless;

  // Reactions:
  w_1: C_1_plasma => ; V*k_1*C_1_plasma;
  w_2: C_2_tissue => ; V*k_2*C_2_tissue;
  l_2_1: C_1_plasma => C_2_tissue; V*k_12*C_1_plasma;
  l_1_2: C_2_tissue => C_1_plasma; V*k_21*C_2_tissue;
  Ab_1: C_0_dose => C_1_plasma; piecewise(f*D*F_1/Tk_1, time <= Tk_1, 0 pmol_per_h);
  Ab_2: C_0_dose => C_1_plasma; piecewise(f*D*F_2/Tk_2, (time > Tlag_2) && (time <= Tlag_2 + Tk_2), 0 pmol_per_h);
  Ab_3: C_0_dose => C_1_plasma; piecewise(f*D*(1 - F_1 - F_2)/Tk_3, (time > Tlag_3) && (time <= Tlag_3 + Tk_3), 0 pmol_per_h);

  // Unit definitions:
  unit h = 3600 second;
  unit pmol = 1e-12 mole;
  unit per_h = 1 / (3600 second);
  unit pmol_per_h = 1e-12 mole / (3600 second);
end
