// SBML level 2 version 4

function Henri_Michaelis_Menten__irreversible(substrate, Km, V)
  V*substrate/(Km + substrate);
end
Henri_Michaelis_Menten__irreversible is "Henri-Michaelis-Menten (irreversible)";

function growth_0(Y, X, sink)
  Y*X*sink;
end

function Reversible_Michaelis_Menten(substrate, product, Kms, Kmp, Vf, Vr)
  (Vf*substrate/Kms - Vr*product/Kmp)/(1 + substrate/Kms + product/Kmp);
end
Reversible_Michaelis_Menten is "Reversible Michaelis-Menten";

function Rate_Law_for_r1(V, S, KM, I, Ki)
  V*S/((KM + S)*(1 + I/Ki));
end

function pta_0(v_PTA_Vmax, ACCOA, P, ACP, COA, KEQ, v_PTA_KiACCOA, v_PTA_KmP, v_PTA_KiP, v_PTA_KiACP, v_PTA_KiCOA, v_PTA_KmACP)
  v_PTA_Vmax*(ACCOA*P - ACP*COA/KEQ)/(v_PTA_KiACCOA*v_PTA_KmP)/(1 + ACCOA/v_PTA_KiACCOA + P/v_PTA_KiP + ACP/v_PTA_KiACP + COA/v_PTA_KiCOA + ACCOA*P/(v_PTA_KiACCOA*v_PTA_KmP) + ACP*COA/(v_PTA_KmACP*v_PTA_KiCOA));
end

function ack(v_ACK_Vmax, ACP, ADP, ATP, v_ACK_KmACP, v_ACK_KmADP, ACE, v_ACK_KmACE, v_ACK_KmATP, v_ACK_Keq)
  v_ACK_Vmax*(ACP*ADP - ACE*ATP/v_ACK_Keq)/(v_ACK_KmACP*v_ACK_KmADP)/((1 + ACP/v_ACK_KmACP + ACE/v_ACK_KmACE)*(1 + ADP/v_ACK_KmADP + ATP/v_ACK_KmATP));
end

function function_sink(A, At, V, n, Km, I, Ki)
  A/At*V*At^n/((At^n + Km)*(1 + I/Ki));
end

model E__coli_model___Glc_Ace_metabolism()
  // Gosselin2025 - Ecoli_bioproduction_insensitive
  // Kinetic model for bioproduction via an acetyl-CoA insensitive pathway, as detailed in DOI 10.1101/2025.06.17.659982.
  // biomodels.db:MODEL2506160001
  // hasProperty mamo:MAMO_0000046
  // isDescribedBy doi:10.1101/2025.06.17.659982v1

  // Compartments:
  compartment cell = 1;

  // Species:
  species $Glc in cell = 20;
  species AcP in cell = 1;
  species Ace in cell = 1;
  species AcCoA in cell = 1.46;
  species $X in cell = 0.1;
  // calibrated with 0.009988794769
  species $Ace_out in cell = 10;
  species $product in cell = 1;

  // Parameters:
  r_PTA_Vmax = 9565522;
  r_PTA_KiACCOA = 0.2;
  r_PTA_KmP = 2.6;
  r_PTA_KiP = 2.6;
  r_PTA_KiACP = 0.2;
  r_PTA_KiCOA = 0.029;
  r_PTA_KmACP = 0.7;
  P = 10;
  CoA = 1.22;
  r_PTA_Keq = 0.0281;
  r_ACK_Vmax = 336940;
  ADP = 0.606;
  r_ACK_KmACP = 0.16;
  r_ACK_KmADP = 0.5;
  r_ACK_KmACE = 7;
  ATP = 2.4;
  r_ACK_KmATP = 0.07;
  r_ACK_Keq = 174;
  r_sink_Vmax = 740859.9;
  r_sink_Km = 24.75918;
  Y = 9.980426e-5;
  volume = 0.00177;
  r_sink_Ki = 2.326165;
  r_TRP_Km = 33.15358;
  r_TRP_Vmax = 480034.6;
  r_TRP_Ki = 60;
  // dilution rate (in h-1), used to simulate chemostat experiment
  // default value: 0
  _dilution_rate = 0;
  // feed (in mmolGlc/h-1), used to simulate chemostat experiment
  // default value: 0
  _feed = 0;
  // biomass concentration at which a 30mM acetate pulse it performed
  // default value: 10000 (i.e., no pulse)
  _X_conc_pulse = 10000;
  Initial_for_Y = Y;
  Initial_for_volume = volume;

  // Assignment rules:
  v_sink := sink;
  v_growth_rate := sink*Initial_for_Y;
  v_glc_uptake := glc_upt*Initial_for_volume;
  v_ace_net := ace_xch*Initial_for_volume;
  v_bioproduction := production*Initial_for_volume;

  // Reactions:
  glc_upt: $Glc => 1.4 AcCoA; cell*Rate_Law_for_r1(glc_upt_V, Glc, KM, Ace_out, Ki);  // modifiers: Ace_out
    glc_upt_V = 5557.64; KM = 0.02; Ki = 36.6776;
  ackA: AcP -> Ace; cell*ack(r_ACK_Vmax, AcP, ADP, ATP, r_ACK_KmACP, r_ACK_KmADP, Ace, r_ACK_KmACE, r_ACK_KmATP, r_ACK_Keq);
  pta: AcCoA -> AcP; cell*pta_0(r_PTA_Vmax, AcCoA, P, AcP, CoA, r_PTA_Keq, r_PTA_KiACCOA, r_PTA_KmP, r_PTA_KiP, r_PTA_KiACP, r_PTA_KiCOA, r_PTA_KmACP);
  sink: AcCoA => ; cell*function_sink(AcCoA, AcCoA, r_sink_Vmax, n, r_sink_Km, Ace_out, r_sink_Ki);  // modifiers: Ace_out
    n = 1;
  growth: => $X; cell*growth_0(Y, X, v_sink);
  ace_xch: Ace -> $Ace_out; cell*Reversible_Michaelis_Menten(Ace, Ace_out, r_TRP_Km, r_TRP_Km, r_TRP_Vmax, r_TRP_Vmax);
  production: AcCoA => $product; cell*Henri_Michaelis_Menten__irreversible(AcCoA, Km, production_V);
    Km = 0.005; production_V = 555;

  // Unit definitions:
  unit length = metre;
  unit area = metre^2;
  unit volume = litre;
  unit time = 3600 second;
  unit substance = 1e-3 mole;
end
