// SBML level 3 version 1
// Issue #183: an event whose trigger becomes true exactly at a sample time.
//   BIOMD0000000104's shape, reduced to two species and one event. `time > 1` is
//   STRICTLY false at t = 1, so the sample recorded at t = 1 must hold the
//   pre-event state; the assignment belongs to every later sample.
//   That ordering is what single-stepping the #183 refresh ladder can disturb.
//   CV_ONE_STEP does not stop short for tout, so a step permitted to run past t = 1
//   finds the root sitting there and fires the event before the t = 1 sample is
//   recorded — the sample then carries a state the trigger is false for. On
//   BIOMD0000000104 it read as a 60% difference at an identical step count.
//   A is p-dependent so the model has a sensitivity column at all; B is what the
//   event writes, and nothing about B depends on p, so any difference in B is
//   ordering and never tolerance.

model sens_ladder_event_ordering()

  // Compartments:
  compartment c = 1;

  // Species:
  species A in c = 1;
  species B in c = 1;

  // Parameters:
  p = 1;

  // Reactions:
  R1: A => ; p*A*c;

  // Events:
  at_one: at (time > 1), t0=false: B = 0.25;
end
